simulations WheatValidation
  folder shared
    outputfiledescription DailyVariables
      variables
        variables: Date, day, year, zadok_stage, stage_name, biomass, yield, grain_size, biomass_wt, biomass_n, lai, head_wt, grain_wt, leaf_wt, head_n, grain_n, leaf_n, stem_n, stem_wt, grain_no, sw_dep, n_conc_grain, grain_protein
      events: event=global.Daily
    soil APS26Field: Site=APS26Site; Region=Lawes; LocalName=APS26Site; SoilType=APS26Soil; NearestTown=Unknown; NaturalVegetation=Unknown
      Water: Cona=3.5; DiffusConst=88; DiffusSlope=35.4; U=6; Salb=0.13; Cn2Bare=60; CnRed=20; CnCov=0.8
        layer:
          thickness  bd    ll15  airdry  dul   sat   sw    swcon
          150        1.38  0.2   0.1     0.38  0.44  0.31  0.3
          150        1.38  0.2   0.1     0.38  0.44  0.36  0.3
          150        1.38  0.2   0.1     0.38  0.44  0.37  0.3
          150        1.38  0.2   0.1     0.38  0.44  0.37  0.3
          300        1.46  0.21  0.1     0.38  0.43  0.35  0.3
          300        1.51  0.19  0.1     0.4   0.42  0.34  0.3
          300        1.49  0.14  0.1     0.38  0.43  0.34  0.3
          300        1.47  0.14  0.1     0.38  0.43  0.28  0.3
      Nitrogen: CnCanopyFact=0.8; RootCn=40; RootWt=500; SoilCn=14.5; EnrACoeff=1.0; EnrBCoeff=1.0
        layer:
          fbiom  finert  oc    ph
          0.03   0.4     2.20  7.5
          0.02   0.6     1.60  8.0
          0.01   0.7     1.35  8.0
          0.01   0.5     0.95  8.0
          0.01   0.9     1.00  8.0
          0.01   0.9     0.80  8.0
          0.01   0.9     0.45  8.0
          0.01   0.9     0.45  8.0
      InitWater
        sw=[0.31, 0.36, 0.37, 0.37, 0.35, 0.34, 0.34, 0.28]
      InitNitrogen
        layer:
          no3    nh4
          1.500  1.300
          1.800  1.000
          1.500  1.000
          1.500  0.800
          0.400  0.800
          0.200  0.500
          0.400  0.500
          0.300  0.500
      SoilCrop Wheat
        layer:
          ll    kl    xf
          0.2   0.06  1
          0.2   0.06  1
          0.2   0.06  1
          0.2   0.06  1
          0.21  0.06  1
          0.19  0.06  1
          0.14  0.06  1
          0.14  0.06  1
    soil APS14Field: Site=APS14Site; Region=Lawes; LocalName=APS14Site; SoilType=APS14Soil; NearestTown=Unknown; NaturalVegetation=Unknown
      Water: Cona=3.5; DiffusConst=40; DiffusSlope=16; U=6; Salb=0.13; Cn2Bare=60; CnRed=20; CnCov=0.8
        layer:
          thickness  bd    ll15  airdry  dul   sat   sw     swcon
          150        1.38  0.2   0.1     0.38  0.43  0.336  0.3
          150        1.34  0.2   0.2     0.38  0.43  0.336  0.3
          150        1.31  0.24  0.24    0.4   0.45  0.302  0.3
          150        1.4   0.19  0.19    0.41  0.45  0.302  0.3
          300        1.5   0.18  0.18    0.4   0.43  0.319  0.3
          300        1.49  0.14  0.14    0.39  0.43  0.345  0.3
          300        1.46  0.2   0.2     0.38  0.4   0.294  0.3
          300        1.46  0.2   0.2     0.38  0.4   0.264  0.3
      Nitrogen: CnCanopyFact=0.8; RootCn=40; RootWt=1500; SoilCn=14.5; EnrACoeff=1.0; EnrBCoeff=1.0
        layer:
          fbiom  finert  oc    ph
          0.02   0.4     2.20  7.5
          0.02   0.6     1.60  8.0
          0.01   0.7     1.35  8.0
          0.01   0.8     0.95  8.0
          0.01   0.9     1.00  8.0
          0.01   0.9     0.80  8.0
          0.01   0.9     0.45  8.0
          0.01   0.9     0.45  8.0
      InitWater
        sw=[0.336, 0.336, 0.302, 0.302, 0.319, 0.345, 0.294, 0.264]
      InitNitrogen
        layer:
          no3    nh4
          2.000  0.300
          0.500  0.300
          0.200  0.200
          0.200  0.100
          0.200  0.100
          0.200  0.100
          0.200  0.100
          0.200  0.100
      SoilCrop Wheat
        layer:
          ll    kl    xf
          0.2   0.06  1
          0.2   0.06  1
          0.24  0.06  1
          0.19  0.05  1
          0.18  0.04  1
          0.14  0.03  1
          0.25  0.02  1
          0.28  0.02  1
    soil MER-86Field: Site=Merredin; Region=WA; LocalName=Merredin; SoilType=MER-86Soil; NearestTown=Unknown; NaturalVegetation=Unknown
      Water: Cona=2; DiffusConst=88; DiffusSlope=35; U=6; Salb=0.13; Cn2Bare=60; CnRed=20; CnCov=0.8
        layer:
          thickness  bd    ll15  airdry  dul   sat   sw    swcon
          100        1.7   0.03  0.03    0.16  0.26  0.03  1
          100        1.75  0.03  0.03    0.21  0.26  0.03  1
          100        1.8   0.03  0.03    0.22  0.25  0.07  1
          100        1.85  0.05  0.04    0.23  0.24  0.1   1
          100        1.85  0.1   0.04    0.22  0.23  0.22  0.3
          100        1.85  0.12  0.04    0.22  0.22  0.22  1
          100        1.85  0.17  0.04    0.22  0.22  0.22  1
          200        1.85  0.17  0.04    0.22  0.23  0.22  1
          200        1.85  0.17  0.04    0.22  0.23  0.21  1
          200        1.85  0.17  0.04    0.22  0.23  0.19  1
      Nitrogen: CnCanopyFact=0.8; RootCn=40; RootWt=1000; SoilCn=13; EnrACoeff=1.0; EnrBCoeff=1.0
        layer:
          oc    finert  fbiom  ph
          0.50  0.1     0.04   4.7
          0.10  0.1     0.03   4.7
          0.10  0.2     0.02   4.7
          0.05  0.8     0.01   6.0
          0.05  0.9     0.01   6.0
          0.05  0.9     0.01   6.0
          0.05  0.9     0.01   6.0
          0.05  0.9     0.01   6.0
          0.05  0.9     0.01   6.0
          0.05  0.9     0.01   6.0
      InitWater
        sw=[0.03, 0.03, 0.07, 0.1, 0.22, 0.22, 0.22, 0.22, 0.21, 0.19]
      InitNitrogen
        layer:
          no3     nh4
          10.000  5.000
          5.000   3.000
          0.300   1.000
          0.000   0.000
          0.000   0.000
          0.000   0.000
          0.000   0.000
          0.000   0.000
          0.000   0.000
          0.000   0.000
      SoilCrop Wheat
        layer:
          ll    kl    xf
          0.03  0.06  0.2
          0.03  0.06  0.6
          0.03  0.06  0.6
          0.05  0.06  0.6
          0.1   0.06  0.6
          0.12  0.06  0.6
          0.17  0.06  0.6
          0.17  0.06  0.6
          0.17  0.06  0.6
          0.17  0.06  0.6
    soil MER-73Field: Site=Merredin; Region=WA; LocalName=Merredin; SoilType=MER-73Soil; NearestTown=Unknown; NaturalVegetation=Unknown
      Water: Cona=2; DiffusConst=88; DiffusSlope=35; U=6; Salb=0.13; Cn2Bare=60; CnRed=20; CnCov=0.8
        layer:
          thickness  bd    ll15  airdry  dul   sat   sw    swcon
          100        1.7   0.03  0.03    0.15  0.28  0.04  1
          100        1.85  0.04  0.03    0.2   0.27  0.05  1
          100        1.75  0.04  0.03    0.2   0.27  0.08  1
          100        1.7   0.05  0.04    0.2   0.25  0.15  1
          100        1.7   0.05  0.04    0.21  0.25  0.1   0.1
          100        1.85  0.08  0.04    0.21  0.25  0.2   1
          100        1.95  0.11  0.04    0.21  0.25  0.22  1
          200        2     0.14  0.04    0.21  0.23  0.22  1
          200        2     0.16  0.04    0.23  0.23  0.21  1
          200        2     0.14  0.04    0.23  0.23  0.19  1
      Nitrogen: CnCanopyFact=0.8; RootCn=20; RootWt=1500; SoilCn=13; EnrACoeff=1.0; EnrBCoeff=1.0
        layer:
          oc    ph   fbiom  finert
          1.20  4.7  0.04   0.1
          0.80  4.7  0.03   0.1
          0.30  4.7  0.02   0.2
          0.05  6.0  0.01   0.8
          0.05  6.0  0.01   0.9
          0.05  6.0  0.01   0.9
          0.05  6.0  0.01   0.9
          0.05  6.0  0.01   0.9
          0.05  6.0  0.01   0.9
          0.05  6.0  0.01   0.9
      InitWater
        sw=[0.04, 0.05, 0.08, 0.15, 0.1, 0.2, 0.22, 0.22, 0.21, 0.19]
      InitNitrogen
        layer:
          no3    nh4
          2.000  1.000
          1.000  0.000
          0.000  0.000
          0.000  0.000
          0.000  0.000
          0.000  0.000
          0.000  0.000
          0.000  0.000
          0.000  0.000
          0.000  0.000
      SoilCrop Wheat: same as shared.MER-86Field.Wheat
    soil LincolnField: Site=Lincoln; Region=NZ; LocalName=Lincoln; SoilType=LincolnSoil; NearestTown=Unknown; NaturalVegetation=Unknown
      Water: Cona=3; DiffusConst=88; DiffusSlope=35; U=7; Salb=0.2; Cn2Bare=60; CnRed=20; CnCov=0.8
        layer:
          thickness  bd   ll15  airdry  dul  sat   sw   swcon
          100        1.3  0.12  0.08    0.3  0.44  0.3  0.6
          200        1.3  0.12  0.08    0.3  0.44  0.3  0.6
          200        1.3  0.12  0.08    0.3  0.44  0.3  0.6
          200        1.3  0.12  0.08    0.3  0.44  0.3  0.6
          200        1.3  0.12  0.08    0.3  0.44  0.3  0.6
          200        1.3  0.12  0.08    0.3  0.44  0.3  0.6
          200        1.3  0.14  0.08    0.3  0.44  0.3  0.6
          200        1.3  0.14  0.08    0.3  0.44  0.3  0.6
          200        1.3  0.16  0.08    0.3  0.44  0.3  0.6
          200        1.3  0.16  0.08    0.3  0.44  0.3  0.6
          200        1.3  0.16  0.08    0.3  0.44  0.3  0.6
          200        1.3  0.16  0.08    0.3  0.44  0.3  0.6
          200        1.3  0.16  0.08    0.3  0.44  0.3  0.6
      Nitrogen: CnCanopyFact=0.8; RootCn=20; RootWt=4000; SoilCn=15; EnrACoeff=1.0; EnrBCoeff=1.0
        layer:
          oc    ph   fbiom  finert  no3   nh4
          0.35  8.5  0.04   0.31    24.9  1.3
          0.27  8.5  0.03   0.31    16    1
          0.24  8.6  0.02   0.31    9.8   1
          0.16  8.6  0.01   0.31    9.8   0.8
          0.16  8.6  0.01   0.31    2.1   0.8
          0.3   8.6  0.01   0.25    2.1   0.5
          0.1   8.6  0.01   0.2     2.1   0.5
          0.1   8.6  0.01   0.2     2.1   0.5
          0.1   8.6  0.01   0.2     0.2   0.5
          0.1   8.6  0.01   0.2     0.2   0.5
          0.1   8.6  0.01   0.2     0.2   0.5
          0.1   8.6  0.01   0.2     0.2   0.5
          0.1   8.6  0.01   0.2     0.2   0.5
      InitWater
        sw=[0.3, 0.3, 0.3, 0.3, 0.3, 0.3, 0.3, 0.3, 0.3, 0.3, 0.3, 0.3, 0.3]
      InitNitrogen
        layer:
          no3   nh4
          24.9  1.3
          16    1
          9.8   1
          9.8   0.8
          2.1   0.8
          2.1   0.5
          2.1   0.5
          2.1   0.5
          0.2   0.5
          0.2   0.5
          0.2   0.5
          0.2   0.5
          0.2   0.5
      SoilCrop Wheat
        layer:
          ll    kl    xf
          0.2   0.07  1
          0.2   0.07  1
          0.2   0.07  1
          0.2   0.07  1
          0.2   0.07  1
          0.19  0.05  1
          0.16  0.05  1
          0.16  0.05  1
          0.16  0.05  1
          0.14  0.05  1
          0.14  0.05  1
          0.13  0.05  1
          0.13  0.05  1
  simulation Wheat_APS26_DryN000
    clock
      start_date = 13/06/1995  # Select the start date of the simulation
      end_date = 31/10/1995  # Select the end date of the simulation
    summaryfile: filename=Wheat_APS26_DryN000.sum
    metfile met: filename=APS26.met
    area paddock
      registrations global
      outputfile: filename=Wheat_APS26_DryN000.out
        outputfiledescription DailyVariables -> DailyVariables
      manager
        rule Sow on a fixed date
          condition start_of_day:
            if (paddock_is_fallow() = 1 and today = date('[date]')) then
                          [crop] sow plants =[density], sowing_depth = [depth], cultivar = [cultivar], row_spacing = [row_spacing]
                        endif
          category Sowing criteria
          category Sowing parameters
        rule Harvesting rule
          condition end_of_day:
            if [crop].stage_name = 'harvest_ripe' or [crop].plant_status = 'dead' then
                          [crop]  harvest
                          [crop]  end_crop
                       endif
          category Harvesting criteria
      wheat
      irrigation
        automatic_irrigation = off  # switch
        asw_depth = 600.0  # Depth to which ASW is calculated. (mm)
        crit_fr_asw = 0.9  # Fraction of ASW below which irrigation is applied (0-1.0)
        irrigation_efficiency = 1.0  # Efficiency of the irrigation. (0-1.0)
      logic Irrigator
        on startofday:
```
           if (day = 151) then
               irrigation apply amount = 31 (mm)
           endif



           if (day = 152) then
               irrigation apply amount = 13 (mm)
           endif



           if (day = 153) then
               irrigation apply amount = 26 (mm)
           endif



           if (day = 156) then
               irrigation apply amount = 26 (mm)
           endif



           if (day = 157) then
               irrigation apply amount = 26 (mm)
           endif



           if (day = 158) then
               irrigation apply amount = 26 (mm)
           endif



           if (day = 159) then
               irrigation apply amount = 26 (mm)
           endif



           if (day = 186) then
               irrigation apply amount = 26 (mm)
           endif
```
      fertiliser
      logic Fertilizer
      soil -> APS26Field
  simulation Wheat_APS26_DryN040
    clock
      start_date = 13/06/1995  # Select the start date of the simulation
      end_date = 31/10/1995  # Select the end date of the simulation
    summaryfile: filename=Wheat_APS26_DryN040.sum
    metfile met: filename=APS26.met
    area paddock
      registrations global
      outputfile: filename=Wheat_APS26_DryN040.out
        outputfiledescription DailyVariables -> DailyVariables
      manager: same as Wheat_APS26_DryN000.paddock.Manager
      wheat
      irrigation
        automatic_irrigation = off  # switch
        asw_depth = 600.0  # Depth to which ASW is calculated. (mm)
        crit_fr_asw = 0.9  # Fraction of ASW below which irrigation is applied (0-1.0)
        irrigation_efficiency = 1.0  # Efficiency of the irrigation. (0-1.0)
      logic Irrigator: same as Wheat_APS26_DryN000.paddock.Irrigator
      fertiliser
      logic Fertilizer
        on startofday:
```
           if (day = 186) then
               fertiliser apply amount = 40 (kg/ha), depth = 50 (mm), type = NO3_N ()
           endif
```
      soil -> APS26Field
  simulation Wheat_APS26_DryN080
    clock
      start_date = 13/06/1995  # Select the start date of the simulation
      end_date = 31/10/1995  # Select the end date of the simulation
    summaryfile: filename=Wheat_APS26_DryN080.sum
    metfile met: filename=APS26.met
    area paddock
      registrations global
      outputfile: filename=Wheat_APS26_DryN080.out
        outputfiledescription DailyVariables -> DailyVariables
      manager: same as Wheat_APS26_DryN000.paddock.Manager
      wheat
      irrigation
        automatic_irrigation = off  # switch
        asw_depth = 600.0  # Depth to which ASW is calculated. (mm)
        crit_fr_asw = 0.9  # Fraction of ASW below which irrigation is applied (0-1.0)
        irrigation_efficiency = 1.0  # Efficiency of the irrigation. (0-1.0)
      logic Irrigator: same as Wheat_APS26_DryN000.paddock.Irrigator
      fertiliser
      logic Fertilizer
        on startofday:
```
           if (day = 186) then
               fertiliser apply amount = 80 (kg/ha), depth = 50 (mm), type = NO3_N ()
           endif
```
      soil -> APS26Field
  simulation Wheat_APS26_DryN160
    clock
      start_date = 13/06/1995  # Select the start date of the simulation
      end_date = 31/10/1995  # Select the end date of the simulation
    summaryfile: filename=Wheat_APS26_DryN160.sum
    metfile met: filename=APS26.met
    area paddock
      registrations global
      outputfile: filename=Wheat_APS26_DryN160.out
        outputfiledescription DailyVariables -> DailyVariables
      manager: same as Wheat_APS26_DryN000.paddock.Manager
      wheat
      irrigation
        automatic_irrigation = off  # switch
        asw_depth = 600.0  # Depth to which ASW is calculated. (mm)
        crit_fr_asw = 0.9  # Fraction of ASW below which irrigation is applied (0-1.0)
        irrigation_efficiency = 1.0  # Efficiency of the irrigation. (0-1.0)
      logic Irrigator: same as Wheat_APS26_DryN000.paddock.Irrigator
      fertiliser
      logic Fertilizer
        on startofday:
```
           if (day = 186) then
               fertiliser apply amount = 160 (kg/ha), depth = 50 (mm), type = NO3_N ()
           endif
```
      soil -> APS26Field
  simulation Wheat_APS26_WetN000
    clock
      start_date = 13/06/1995  # Select the start date of the simulation
      end_date = 31/10/1995  # Select the end date of the simulation
    summaryfile: filename=Wheat_APS26_WetN000.sum
    metfile met: filename=APS26.met
    area paddock
      registrations global
      outputfile: filename=Wheat_APS26_WetN000.out
        outputfiledescription DailyVariables -> DailyVariables
      manager: same as Wheat_APS26_DryN000.paddock.Manager
      wheat
      irrigation
        automatic_irrigation = off  # switch
        asw_depth = 600.0  # Depth to which ASW is calculated. (mm)
        crit_fr_asw = 0.9  # Fraction of ASW below which irrigation is applied (0-1.0)
        irrigation_efficiency = 1.0  # Efficiency of the irrigation. (0-1.0)
      logic Irrigator
        on startofday:
```
           if (day = 151) then
               irrigation apply amount = 31 (mm)
           endif



           if (day = 152) then
               irrigation apply amount = 13 (mm)
           endif



           if (day = 153) then
               irrigation apply amount = 26 (mm)
           endif



           if (day = 156) then
               irrigation apply amount = 26 (mm)
           endif



           if (day = 157) then
               irrigation apply amount = 26 (mm)
           endif



           if (day = 158) then
               irrigation apply amount = 26 (mm)
           endif



           if (day = 159) then
               irrigation apply amount = 26 (mm)
           endif



           if (day = 186) then
               irrigation apply amount = 26 (mm)
           endif



           if (day = 202) then
               irrigation apply amount = 14 (mm)
           endif



           if (day = 213) then
               irrigation apply amount = 28 (mm)
           endif



           if (day = 223) then
               irrigation apply amount = 30 (mm)
           endif



           if (day = 237) then
               irrigation apply amount = 15 (mm)
           endif



           if (day = 243) then
               irrigation apply amount = 14 (mm)
           endif



           if (day = 247) then
               irrigation apply amount = 15 (mm)
           endif



           if (day = 258) then
               irrigation apply amount = 25 (mm)
           endif



           if (day = 265) then
               irrigation apply amount = 20 (mm)
           endif



           if (day = 275) then
               irrigation apply amount = 11 (mm)
           endif
```
      fertiliser
      logic Fertilizer
      soil -> APS26Field
  simulation Wheat_APS26_WetN040
    clock
      start_date = 13/06/1995  # Select the start date of the simulation
      end_date = 31/10/1995  # Select the end date of the simulation
    summaryfile: filename=Wheat_APS26_WetN040.sum
    metfile met: filename=APS26.met
    area paddock
      registrations global
      outputfile: filename=Wheat_APS26_WetN040.out
        outputfiledescription DailyVariables -> DailyVariables
      manager: same as Wheat_APS26_DryN000.paddock.Manager
      wheat
      irrigation
        automatic_irrigation = off  # switch
        asw_depth = 600.0  # Depth to which ASW is calculated. (mm)
        crit_fr_asw = 0.9  # Fraction of ASW below which irrigation is applied (0-1.0)
        irrigation_efficiency = 1.0  # Efficiency of the irrigation. (0-1.0)
      logic Irrigator: same as Wheat_APS26_WetN000.paddock.Irrigator
      fertiliser
      logic Fertilizer
        on startofday:
```
           if (day = 186) then
               fertiliser apply amount = 40 (kg/ha), depth = 50 (mm), type = NO3_N ()
           endif
```
      soil -> APS26Field
  simulation Wheat_APS26_WetN080
    clock
      start_date = 13/06/1995  # Select the start date of the simulation
      end_date = 31/10/1995  # Select the end date of the simulation
    summaryfile: filename=Wheat_APS26_WetN080.sum
    metfile met: filename=APS26.met
    area paddock
      registrations global
      outputfile: filename=Wheat_APS26_WetN080.out
        outputfiledescription DailyVariables -> DailyVariables
      manager: same as Wheat_APS26_DryN000.paddock.Manager
      wheat
      irrigation
        automatic_irrigation = off  # switch
        asw_depth = 600.0  # Depth to which ASW is calculated. (mm)
        crit_fr_asw = 0.9  # Fraction of ASW below which irrigation is applied (0-1.0)
        irrigation_efficiency = 1.0  # Efficiency of the irrigation. (0-1.0)
      logic Irrigator: same as Wheat_APS26_WetN000.paddock.Irrigator
      fertiliser
      logic Fertilizer
        on startofday:
```
           if (day = 186) then
               fertiliser apply amount = 80 (kg/ha), depth = 50 (mm), type = NO3_N ()
           endif
```
      soil -> APS26Field
  simulation Wheat_APS26_WetN160
    clock
      start_date = 13/06/1995  # Select the start date of the simulation
      end_date = 31/10/1995  # Select the end date of the simulation
    summaryfile: filename=Wheat_APS26_WetN160.sum
    metfile met: filename=APS26.met
    area paddock
      registrations global
      outputfile: filename=Wheat_APS26_WetN160.out
        outputfiledescription DailyVariables -> DailyVariables
      manager: same as Wheat_APS26_DryN000.paddock.Manager
      wheat
      irrigation
        automatic_irrigation = off  # switch
        asw_depth = 600.0  # Depth to which ASW is calculated. (mm)
        crit_fr_asw = 0.9  # Fraction of ASW below which irrigation is applied (0-1.0)
        irrigation_efficiency = 1.0  # Efficiency of the irrigation. (0-1.0)
      logic Irrigator: same as Wheat_APS26_WetN000.paddock.Irrigator
      fertiliser
      logic Fertilizer
        on startofday:
```
           if (day = 186) then
               fertiliser apply amount = 160 (kg/ha), depth = 50 (mm), type = NO3_N ()
           endif
```
      soil -> APS26Field
  simulation Wheat_APS6_N000
    clock
      start_date = 14/06/1992  # Select the start date of the simulation
      end_date = 17/11/1992  # Select the end date of the simulation
    summaryfile: filename=Wheat_APS6_N000.sum
    metfile met: filename=APS6.met
    area paddock
      registrations global
      outputfile: filename=Wheat_APS6_N000.out
        outputfiledescription DailyVariables -> DailyVariables
      manager: same as Wheat_APS26_DryN000.paddock.Manager
      soil APS6Field: Site=APS6Site; Region=Lawes; LocalName=APS6Site; SoilType=APS6Soil; NearestTown=Unknown; NaturalVegetation=Unknown
        Water: Cona=3.5; DiffusConst=88; DiffusSlope=35.4; U=6; Salb=0.13; Cn2Bare=60; CnRed=20; CnCov=0.8
          layer:
            thickness  bd    ll15  airdry  dul   sat   sw     swcon
            150        1.38  0.2   0.1     0.38  0.43  0.326  0.3
            150        1.34  0.2   0.1     0.38  0.43  0.326  0.3
            300        1.35  0.22  0.1     0.4   0.43  0.346  0.3
            300        1.5   0.18  0.1     0.4   0.43  0.333  0.3
            300        1.49  0.14  0.1     0.39  0.42  0.315  0.3
            300        1.46  0.2   0.1     0.38  0.4   0.326  0.3
            300        1.46  0.2   0.1     0.38  0.4   0.326  0.3
        Nitrogen: CnCanopyFact=0.8; RootCn=60; RootWt=2000; SoilCn=14.5; EnrACoeff=1.0; EnrBCoeff=1.0
          layer:
            oc    ph   fbiom  finert  no3   nh4
            2.2   7.5  0.03   0.45    1.3   0.98333
            1.6   8    0.02   0.6     0.6   1.44167
            1.15  8    0.01   0.78    0.25  2.25833
            1     8    0.01   0.9     0.2   1.65833
            0.8   8    0.01   0.99    0.1   1.1
            0.45  8    0.01   0.99    0.1   1.025
            0.45  8    0.01   0.99    0.1   0.73
        InitWater
          sw=[0.326, 0.326, 0.346, 0.333, 0.315, 0.326, 0.326]
        InitNitrogen
          layer:
            no3   nh4
            1.3   0.98333
            0.6   1.44167
            0.25  2.25833
            0.2   1.65833
            0.1   1.1
            0.1   1.025
            0.1   0.73
        SoilCrop Wheat
          layer:
            ll    kl    xf
            0.2   0.06  1
            0.2   0.06  1
            0.22  0.06  1
            0.18  0.06  1
            0.14  0.06  1
            0.25  0.06  1
            0.28  0.06  1
      wheat
      irrigation
        automatic_irrigation = off  # switch
        asw_depth = 600.0  # Depth to which ASW is calculated. (mm)
        crit_fr_asw = 0.9  # Fraction of ASW below which irrigation is applied (0-1.0)
        irrigation_efficiency = 1.0  # Efficiency of the irrigation. (0-1.0)
      logic Irrigator
        on startofday:
```
           if (day = 176) then
               irrigation apply amount = 10 (mm)
           endif



           if (day = 178) then
               irrigation apply amount = 10 (mm)
           endif



           if (day = 210) then
               irrigation apply amount = 30 (mm)
           endif



           if (day = 218) then
               irrigation apply amount = 30 (mm)
           endif



           if (day = 232) then
               irrigation apply amount = 40 (mm)
           endif



           if (day = 239) then
               irrigation apply amount = 40 (mm)
           endif



           if (day = 253) then
               irrigation apply amount = 40 (mm)
           endif



           if (day = 265) then
               irrigation apply amount = 40 (mm)
           endif



           if (day = 275) then
               irrigation apply amount = 50 (mm)
           endif



           if (day = 281) then
               irrigation apply amount = 20 (mm)
           endif



           if (day = 282) then
               irrigation apply amount = 20 (mm)
           endif



           if (day = 283) then
               irrigation apply amount = 20 (mm)
           endif



           if (day = 287) then
               irrigation apply amount = 20 (mm)
           endif
```
      fertiliser
      logic Fertilizer
        on startofday:
```
           if (day = 167) then
               fertiliser apply amount = 0 (kg/ha), depth = 50 (mm), type = NO3_N ()
           endif
```
  simulation Wheat_APS6_N040
    clock
      start_date = 14/06/1992  # Select the start date of the simulation
      end_date = 17/11/1992  # Select the end date of the simulation
    summaryfile: filename=Wheat_APS6_N040.sum
    metfile met: filename=APS6.met
    area paddock
      registrations global
      outputfile: filename=Wheat_APS6_N040.out
        outputfiledescription DailyVariables -> DailyVariables
      manager: same as Wheat_APS26_DryN000.paddock.Manager
      soil APS6Field: same as Wheat_APS6_N000.paddock.APS6Field
      wheat
      irrigation
        automatic_irrigation = off  # switch
        asw_depth = 600.0  # Depth to which ASW is calculated. (mm)
        crit_fr_asw = 0.9  # Fraction of ASW below which irrigation is applied (0-1.0)
        irrigation_efficiency = 1.0  # Efficiency of the irrigation. (0-1.0)
      logic Irrigator: same as Wheat_APS6_N000.paddock.Irrigator
      fertiliser
      logic Fertilizer
        on startofday:
```
           if (day = 167) then
               fertiliser apply amount = 40 (kg/ha), depth = 50 (mm), type = NO3_N ()
           endif
```
  simulation Wheat_APS6_N080
    clock
      start_date = 14/06/1992  # Select the start date of the simulation
      end_date = 17/11/1992  # Select the end date of the simulation
    summaryfile: filename=Wheat_APS6_N080.sum
    metfile met: filename=APS6.met
    area paddock
      registrations global
      outputfile: filename=Wheat_APS6_N080.out
        outputfiledescription DailyVariables -> DailyVariables
      manager: same as Wheat_APS26_DryN000.paddock.Manager
      soil APS6Field: same as Wheat_APS6_N000.paddock.APS6Field
      wheat
      irrigation
        automatic_irrigation = off  # switch
        asw_depth = 600.0  # Depth to which ASW is calculated. (mm)
        crit_fr_asw = 0.9  # Fraction of ASW below which irrigation is applied (0-1.0)
        irrigation_efficiency = 1.0  # Efficiency of the irrigation. (0-1.0)
      logic Irrigator: same as Wheat_APS6_N000.paddock.Irrigator
      fertiliser
      logic Fertilizer
        on startofday:
```
           if (day = 167) then
               fertiliser apply amount = 80 (kg/ha), depth = 50 (mm), type = NO3_N ()
           endif
```
  simulation Wheat_APS6_N120
    clock
      start_date = 14/06/1992  # Select the start date of the simulation
      end_date = 17/11/1992  # Select the end date of the simulation
    summaryfile: filename=Wheat_APS6_N120.sum
    metfile met: filename=APS6.met
    area paddock
      registrations global
      outputfile: filename=Wheat_APS6_N120.out
        outputfiledescription DailyVariables -> DailyVariables
      manager: same as Wheat_APS26_DryN000.paddock.Manager
      soil APS6Field: same as Wheat_APS6_N000.paddock.APS6Field
      wheat
      irrigation
        automatic_irrigation = off  # switch
        asw_depth = 600.0  # Depth to which ASW is calculated. (mm)
        crit_fr_asw = 0.9  # Fraction of ASW below which irrigation is applied (0-1.0)
        irrigation_efficiency = 1.0  # Efficiency of the irrigation. (0-1.0)
      logic Irrigator: same as Wheat_APS6_N000.paddock.Irrigator
      fertiliser
      logic Fertilizer
        on startofday:
```
           if (day = 217) then
               fertiliser apply amount = 60 (kg/ha), depth = 50 (mm), type = NO3_N ()
           endif



           if (day = 167) then
               fertiliser apply amount = 60 (kg/ha), depth = 50 (mm), type = NO3_N ()
           endif
```
  simulation Wheat_APS6_N160
    clock
      start_date = 14/06/1992  # Select the start date of the simulation
      end_date = 17/11/1992  # Select the end date of the simulation
    summaryfile: filename=Wheat_APS6_N160.sum
    metfile met: filename=APS6.met
    area paddock
      registrations global
      outputfile: filename=Wheat_APS6_N160.out
        outputfiledescription DailyVariables -> DailyVariables
      manager: same as Wheat_APS26_DryN000.paddock.Manager
      soil APS6Field: same as Wheat_APS6_N000.paddock.APS6Field
      wheat
      irrigation
        automatic_irrigation = off  # switch
        asw_depth = 600.0  # Depth to which ASW is calculated. (mm)
        crit_fr_asw = 0.9  # Fraction of ASW below which irrigation is applied (0-1.0)
        irrigation_efficiency = 1.0  # Efficiency of the irrigation. (0-1.0)
      logic Irrigator: same as Wheat_APS6_N000.paddock.Irrigator
      fertiliser
      logic Fertilizer
        on startofday:
```
           if (day = 217) then
               fertiliser apply amount = 120 (kg/ha), depth = 50 (mm), type = NO3_N ()
           endif



           if (day = 167) then
               fertiliser apply amount = 40 (kg/ha), depth = 50 (mm), type = NO3_N ()
           endif
```
  simulation Wheat_APS6_N360
    clock
      start_date = 14/06/1992  # Select the start date of the simulation
      end_date = 17/11/1992  # Select the end date of the simulation
    summaryfile: filename=Wheat_APS6_N360.sum
    metfile met: filename=APS6.met
    area paddock
      registrations global
      outputfile: filename=Wheat_APS6_N360.out
        outputfiledescription DailyVariables -> DailyVariables
      manager: same as Wheat_APS26_DryN000.paddock.Manager
      soil APS6Field: same as Wheat_APS6_N000.paddock.APS6Field
      wheat
      irrigation
        automatic_irrigation = off  # switch
        asw_depth = 600.0  # Depth to which ASW is calculated. (mm)
        crit_fr_asw = 0.9  # Fraction of ASW below which irrigation is applied (0-1.0)
        irrigation_efficiency = 1.0  # Efficiency of the irrigation. (0-1.0)
      logic Irrigator: same as Wheat_APS6_N000.paddock.Irrigator
      fertiliser
      logic Fertilizer
        on startofday:
```
           if (day = 217) then
               fertiliser apply amount = 120 (kg/ha), depth = 50 (mm), type = NO3_N ()
           endif



           if (day = 251) then
               fertiliser apply amount = 120 (kg/ha), depth = 50 (mm), type = NO3_N ()
           endif



           if (day = 167) then
               fertiliser apply amount = 120 (kg/ha), depth = 50 (mm), type = NO3_N ()
           endif
```
  simulation Wheat_APS14_BareN000
    clock
      start_date = 2/06/1993  # Select the start date of the simulation
      end_date = 26/11/1993  # Select the end date of the simulation
    summaryfile: filename=Wheat_APS14_BareN000.sum
    metfile met: filename=APS14.met
    area paddock
      registrations global
      outputfile: filename=Wheat_APS14_BareN000.out
        outputfiledescription DailyVariables -> DailyVariables
      manager: same as Wheat_APS26_DryN000.paddock.Manager
      soil -> APS14Field
      wheat
      irrigation
        automatic_irrigation = off  # switch
        asw_depth = 600.0  # Depth to which ASW is calculated. (mm)
        crit_fr_asw = 0.9  # Fraction of ASW below which irrigation is applied (0-1.0)
        irrigation_efficiency = 1.0  # Efficiency of the irrigation. (0-1.0)
      logic Irrigator
        on startofday:
```
           if (day = 155) then
               irrigation apply amount = 14 (mm)
           endif



           if (day = 169) then
               irrigation apply amount = 26 (mm)
           endif



           if (day = 174) then
               irrigation apply amount = 13 (mm)
           endif



           if (day = 190) then
               irrigation apply amount = 25 (mm)
           endif



           if (day = 203) then
               irrigation apply amount = 20 (mm)
           endif



           if (day = 218) then
               irrigation apply amount = 31 (mm)
           endif



           if (day = 230) then
               irrigation apply amount = 36 (mm)
           endif



           if (day = 239) then
               irrigation apply amount = 38 (mm)
           endif



           if (day = 249) then
               irrigation apply amount = 33 (mm)
           endif



           if (day = 267) then
               irrigation apply amount = 35 (mm)
           endif



           if (day = 274) then
               irrigation apply amount = 36 (mm)
           endif
```
      fertiliser
      logic Fertilizer
        on startofday:
```
           if (day = 169) then
               fertiliser apply amount = 0 (kg/ha), depth = 50 (mm), type = NO3_N ()
           endif
```
  simulation Wheat_APS14_BareN040
    clock
      start_date = 2/06/1993  # Select the start date of the simulation
      end_date = 26/11/1993  # Select the end date of the simulation
    summaryfile: filename=Wheat_APS14_BareN040.sum
    metfile met: filename=APS14.met
    area paddock
      registrations global
      outputfile: filename=Wheat_APS14_BareN040.out
        outputfiledescription DailyVariables -> DailyVariables
      manager: same as Wheat_APS26_DryN000.paddock.Manager
      soil -> APS14Field
      wheat
      irrigation
        automatic_irrigation = off  # switch
        asw_depth = 600.0  # Depth to which ASW is calculated. (mm)
        crit_fr_asw = 0.9  # Fraction of ASW below which irrigation is applied (0-1.0)
        irrigation_efficiency = 1.0  # Efficiency of the irrigation. (0-1.0)
      logic Irrigator: same as Wheat_APS14_BareN000.paddock.Irrigator
      fertiliser
      logic Fertilizer
        on startofday:
```
           if (day = 169) then
               fertiliser apply amount = 40 (kg/ha), depth = 50 (mm), type = NO3_N ()
           endif
```
  simulation Wheat_APS14_BareN080
    clock
      start_date = 2/06/1993  # Select the start date of the simulation
      end_date = 26/11/1993  # Select the end date of the simulation
    summaryfile: filename=Wheat_APS14_BareN080.sum
    metfile met: filename=APS14.met
    area paddock
      registrations global
      outputfile: filename=Wheat_APS14_BareN080.out
        outputfiledescription DailyVariables -> DailyVariables
      manager: same as Wheat_APS26_DryN000.paddock.Manager
      soil -> APS14Field
      wheat
      irrigation
        automatic_irrigation = off  # switch
        asw_depth = 600.0  # Depth to which ASW is calculated. (mm)
        crit_fr_asw = 0.9  # Fraction of ASW below which irrigation is applied (0-1.0)
        irrigation_efficiency = 1.0  # Efficiency of the irrigation. (0-1.0)
      logic Irrigator: same as Wheat_APS14_BareN000.paddock.Irrigator
      fertiliser
      logic Fertilizer
        on startofday:
```
           if (day = 169) then
               fertiliser apply amount = 80 (kg/ha), depth = 50 (mm), type = NO3_N ()
           endif
```
  simulation Wheat_APS14_BareN200
    clock
      start_date = 2/06/1993  # Select the start date of the simulation
      end_date = 26/11/1993  # Select the end date of the simulation
    summaryfile: filename=Wheat_APS14_BareN200.sum
    metfile met: filename=APS14.met
    area paddock
      registrations global
      outputfile: filename=Wheat_APS14_BareN200.out
        outputfiledescription DailyVariables -> DailyVariables
      manager: same as Wheat_APS26_DryN000.paddock.Manager
      soil -> APS14Field
      wheat
      irrigation
        automatic_irrigation = off  # switch
        asw_depth = 600.0  # Depth to which ASW is calculated. (mm)
        crit_fr_asw = 0.9  # Fraction of ASW below which irrigation is applied (0-1.0)
        irrigation_efficiency = 1.0  # Efficiency of the irrigation. (0-1.0)
      logic Irrigator: same as Wheat_APS14_BareN000.paddock.Irrigator
      fertiliser
      logic Fertilizer
        on startofday:
```
           if (day = 169) then
               fertiliser apply amount = 120 (kg/ha), depth = 50 (mm), type = NO3_N ()
           endif



           if (day = 230) then
               fertiliser apply amount = 80 (kg/ha), depth = 50 (mm), type = NO3_N ()
           endif
```
  simulation Wheat_APS14_LucN000
    clock
      start_date = 2/06/1993  # Select the start date of the simulation
      end_date = 26/11/1993  # Select the end date of the simulation
    summaryfile: filename=Wheat_APS14_LucN000.sum
    metfile met: filename=APS14.met
    area paddock
      registrations global
      outputfile: filename=Wheat_APS14_LucN000.out
        outputfiledescription DailyVariables -> DailyVariables
      manager: same as Wheat_APS26_DryN000.paddock.Manager
      soil -> APS14Field
      wheat
      irrigation
        automatic_irrigation = off  # switch
        asw_depth = 600.0  # Depth to which ASW is calculated. (mm)
        crit_fr_asw = 0.9  # Fraction of ASW below which irrigation is applied (0-1.0)
        irrigation_efficiency = 1.0  # Efficiency of the irrigation. (0-1.0)
      logic Irrigator: same as Wheat_APS14_BareN000.paddock.Irrigator
      fertiliser
      logic Fertilizer
        on startofday:
```
           if (day = 169) then
               fertiliser apply amount = 0 (kg/ha), depth = 50 (mm), type = NO3_N ()
           endif
```
  simulation Wheat_APS14_LucN040
    clock
      start_date = 2/06/1993  # Select the start date of the simulation
      end_date = 26/11/1993  # Select the end date of the simulation
    summaryfile: filename=Wheat_APS14_LucN040.sum
    metfile met: filename=APS14.met
    area paddock
      registrations global
      outputfile: filename=Wheat_APS14_LucN040.out
        outputfiledescription DailyVariables -> DailyVariables
      manager: same as Wheat_APS26_DryN000.paddock.Manager
      soil -> APS14Field
      wheat
      irrigation
        automatic_irrigation = off  # switch
        asw_depth = 600.0  # Depth to which ASW is calculated. (mm)
        crit_fr_asw = 0.9  # Fraction of ASW below which irrigation is applied (0-1.0)
        irrigation_efficiency = 1.0  # Efficiency of the irrigation. (0-1.0)
      logic Irrigator: same as Wheat_APS14_BareN000.paddock.Irrigator
      fertiliser
      logic Fertilizer
        on startofday:
```
           if (day = 169) then
               fertiliser apply amount = 40 (kg/ha), depth = 50 (mm), type = NO3_N ()
           endif
```
  simulation Wheat_APS14_LucN080
    clock
      start_date = 2/06/1993  # Select the start date of the simulation
      end_date = 26/11/1993  # Select the end date of the simulation
    summaryfile: filename=Wheat_APS14_LucN080.sum
    metfile met: filename=APS14.met
    area paddock
      registrations global
      outputfile: filename=Wheat_APS14_LucN080.out
        outputfiledescription DailyVariables -> DailyVariables
      manager: same as Wheat_APS26_DryN000.paddock.Manager
      soil -> APS14Field
      wheat
      irrigation
        automatic_irrigation = off  # switch
        asw_depth = 600.0  # Depth to which ASW is calculated. (mm)
        crit_fr_asw = 0.9  # Fraction of ASW below which irrigation is applied (0-1.0)
        irrigation_efficiency = 1.0  # Efficiency of the irrigation. (0-1.0)
      logic Irrigator: same as Wheat_APS14_BareN000.paddock.Irrigator
      fertiliser
      logic Fertilizer
        on startofday:
```
           if (day = 169) then
               fertiliser apply amount = 80 (kg/ha), depth = 50 (mm), type = NO3_N ()
           endif
```
  simulation Wheat_APS14_LucN200
    clock
      start_date = 2/06/1993  # Select the start date of the simulation
      end_date = 26/11/1993  # Select the end date of the simulation
    summaryfile: filename=Wheat_APS14_LucN200.sum
    metfile met: filename=APS14.met
    area paddock
      registrations global
      outputfile: filename=Wheat_APS14_LucN200.out
        outputfiledescription DailyVariables -> DailyVariables
      manager: same as Wheat_APS26_DryN000.paddock.Manager
      soil -> APS14Field
      wheat
      irrigation
        automatic_irrigation = off  # switch
        asw_depth = 600.0  # Depth to which ASW is calculated. (mm)
        crit_fr_asw = 0.9  # Fraction of ASW below which irrigation is applied (0-1.0)
        irrigation_efficiency = 1.0  # Efficiency of the irrigation. (0-1.0)
      logic Irrigator: same as Wheat_APS14_BareN000.paddock.Irrigator
      fertiliser
      logic Fertilizer
        on startofday:
        script: same as in Wheat_APS14_BareN200.paddock.Fertilizer
  simulation Wheat_APS14_StrawN000
    clock
      start_date = 2/06/1993  # Select the start date of the simulation
      end_date = 26/11/1993  # Select the end date of the simulation
    summaryfile: filename=Wheat_APS14_StrawN000.sum
    metfile met: filename=APS14.met
    area paddock
      registrations global
      outputfile: filename=Wheat_APS14_StrawN000.out
        outputfiledescription DailyVariables -> DailyVariables
      manager: same as Wheat_APS26_DryN000.paddock.Manager
      soil -> APS14Field
      wheat
      irrigation
        automatic_irrigation = off  # switch
        asw_depth = 600.0  # Depth to which ASW is calculated. (mm)
        crit_fr_asw = 0.9  # Fraction of ASW below which irrigation is applied (0-1.0)
        irrigation_efficiency = 1.0  # Efficiency of the irrigation. (0-1.0)
      logic Irrigator: same as Wheat_APS14_BareN000.paddock.Irrigator
      fertiliser
      logic Fertilizer
        on startofday:
```
           if (day = 169) then
               fertiliser apply amount = 0 (kg/ha), depth = 50 (mm), type = NO3_N ()
           endif
```
  simulation Wheat_APS14_StrawN040
    clock
      start_date = 2/06/1993  # Select the start date of the simulation
      end_date = 26/11/1993  # Select the end date of the simulation
    summaryfile: filename=Wheat_APS14_StrawN040.sum
    metfile met: filename=APS14.met
    area paddock
      registrations global
      outputfile: filename=Wheat_APS14_StrawN040.out
        outputfiledescription DailyVariables -> DailyVariables
      manager: same as Wheat_APS26_DryN000.paddock.Manager
      soil -> APS14Field
      wheat
      irrigation
        automatic_irrigation = off  # switch
        asw_depth = 600.0  # Depth to which ASW is calculated. (mm)
        crit_fr_asw = 0.9  # Fraction of ASW below which irrigation is applied (0-1.0)
        irrigation_efficiency = 1.0  # Efficiency of the irrigation. (0-1.0)
      logic Irrigator: same as Wheat_APS14_BareN000.paddock.Irrigator
      fertiliser
      logic Fertilizer
        on startofday:
```
           if (day = 169) then
               fertiliser apply amount = 40 (kg/ha), depth = 50 (mm), type = NO3_N ()
           endif
```
  simulation Wheat_APS14_StrawN080
    clock
      start_date = 2/06/1993  # Select the start date of the simulation
      end_date = 26/11/1993  # Select the end date of the simulation
    summaryfile: filename=Wheat_APS14_StrawN080.sum
    metfile met: filename=APS14.met
    area paddock
      registrations global
      outputfile: filename=Wheat_APS14_StrawN080.out
        outputfiledescription DailyVariables -> DailyVariables
      manager: same as Wheat_APS26_DryN000.paddock.Manager
      soil -> APS14Field
      wheat
      irrigation
        automatic_irrigation = off  # switch
        asw_depth = 600.0  # Depth to which ASW is calculated. (mm)
        crit_fr_asw = 0.9  # Fraction of ASW below which irrigation is applied (0-1.0)
        irrigation_efficiency = 1.0  # Efficiency of the irrigation. (0-1.0)
      logic Irrigator: same as Wheat_APS14_BareN000.paddock.Irrigator
      fertiliser
      logic Fertilizer
        on startofday:
```
           if (day = 169) then
               fertiliser apply amount = 80 (kg/ha), depth = 50 (mm), type = NO3_N ()
           endif
```
  simulation Wheat_APS14_StrawN200
    clock
      start_date = 2/06/1993  # Select the start date of the simulation
      end_date = 26/11/1993  # Select the end date of the simulation
    summaryfile: filename=Wheat_APS14_StrawN200.sum
    metfile met: filename=APS14.met
    area paddock
      registrations global
      outputfile: filename=Wheat_APS14_StrawN200.out
        outputfiledescription DailyVariables -> DailyVariables
      manager: same as Wheat_APS26_DryN000.paddock.Manager
      soil -> APS14Field
      wheat
      irrigation
        automatic_irrigation = off  # switch
        asw_depth = 600.0  # Depth to which ASW is calculated. (mm)
        crit_fr_asw = 0.9  # Fraction of ASW below which irrigation is applied (0-1.0)
        irrigation_efficiency = 1.0  # Efficiency of the irrigation. (0-1.0)
      logic Irrigator: same as Wheat_APS14_BareN000.paddock.Irrigator
      fertiliser
      logic Fertilizer
        on startofday:
        script: same as in Wheat_APS14_BareN200.paddock.Fertilizer
  simulation Wheat_MER-86_DryN015
    clock
      start_date = 1/05/1986  # Select the start date of the simulation
      end_date = 30/11/1986  # Select the end date of the simulation
    summaryfile: filename=Wheat_MER-86_DryN015.sum
    metfile met: filename=MER-86.met
    area paddock
      registrations global
      outputfile: filename=Wheat_MER-86_DryN015.out
        outputfiledescription DailyVariables -> DailyVariables
      manager: same as Wheat_APS26_DryN000.paddock.Manager
      soil -> MER-86Field
      wheat
      irrigation
        automatic_irrigation = off  # switch
        asw_depth = 600.0  # Depth to which ASW is calculated. (mm)
        crit_fr_asw = 0.9  # Fraction of ASW below which irrigation is applied (0-1.0)
        irrigation_efficiency = 1.0  # Efficiency of the irrigation. (0-1.0)
      logic Irrigator
      fertiliser
      logic Fertilizer
        on startofday:
```
           if (day = 165) then
               fertiliser apply amount = 15 (kg/ha), depth = 50 (mm), type = NO3_N ()
           endif
```
  simulation Wheat_MER-86_DryN060
    clock
      start_date = 1/05/1986  # Select the start date of the simulation
      end_date = 30/11/1986  # Select the end date of the simulation
    summaryfile: filename=Wheat_MER-86_DryN060.sum
    metfile met: filename=MER-86.met
    area paddock
      registrations global
      outputfile: filename=Wheat_MER-86_DryN060.out
        outputfiledescription DailyVariables -> DailyVariables
      manager: same as Wheat_APS26_DryN000.paddock.Manager
      soil -> MER-86Field
      wheat
      irrigation
        automatic_irrigation = off  # switch
        asw_depth = 600.0  # Depth to which ASW is calculated. (mm)
        crit_fr_asw = 0.9  # Fraction of ASW below which irrigation is applied (0-1.0)
        irrigation_efficiency = 1.0  # Efficiency of the irrigation. (0-1.0)
      logic Irrigator
      fertiliser
      logic Fertilizer
        on startofday:
```
           if (day = 149) then
               fertiliser apply amount = 30 (kg/ha), depth = 50 (mm), type = NO3_N ()
           endif
```
  simulation Wheat_MER-86_WetN015
    clock
      start_date = 1/05/1986  # Select the start date of the simulation
      end_date = 30/11/1986  # Select the end date of the simulation
    summaryfile: filename=Wheat_MER-86_WetN015.sum
    metfile met: filename=MER-86.met
    area paddock
      registrations global
      outputfile: filename=Wheat_MER-86_WetN015.out
        outputfiledescription DailyVariables -> DailyVariables
      manager: same as Wheat_APS26_DryN000.paddock.Manager
      soil -> MER-86Field
      wheat
      irrigation
        automatic_irrigation = off  # switch
        asw_depth = 600.0  # Depth to which ASW is calculated. (mm)
        crit_fr_asw = 0.9  # Fraction of ASW below which irrigation is applied (0-1.0)
        irrigation_efficiency = 1.0  # Efficiency of the irrigation. (0-1.0)
      logic Irrigator
        on startofday:
```
           if (day = 246) then
               irrigation apply amount = 10 (mm)
           endif



           if (day = 247) then
               irrigation apply amount = 10 (mm)
           endif



           if (day = 248) then
               irrigation apply amount = 20 (mm)
           endif



           if (day = 253) then
               irrigation apply amount = 20 (mm)
           endif



           if (day = 254) then
               irrigation apply amount = 10 (mm)
           endif



           if (day = 257) then
               irrigation apply amount = 10 (mm)
           endif



           if (day = 259) then
               irrigation apply amount = 10 (mm)
           endif



           if (day = 261) then
               irrigation apply amount = 10 (mm)
           endif



           if (day = 264) then
               irrigation apply amount = 10 (mm)
           endif



           if (day = 266) then
               irrigation apply amount = 10 (mm)
           endif



           if (day = 267) then
               irrigation apply amount = 20 (mm)
           endif



           if (day = 273) then
               irrigation apply amount = 30 (mm)
           endif



           if (day = 275) then
               irrigation apply amount = 20 (mm)
           endif



           if (day = 277) then
               irrigation apply amount = 20 (mm)
           endif



           if (day = 283) then
               irrigation apply amount = 20 (mm)
           endif



           if (day = 285) then
               irrigation apply amount = 20 (mm)
           endif



           if (day = 287) then
               irrigation apply amount = 20 (mm)
           endif



           if (day = 289) then
               irrigation apply amount = 20 (mm)
           endif



           if (day = 291) then
               irrigation apply amount = 20 (mm)
           endif



           if (day = 293) then
               irrigation apply amount = 20 (mm)
           endif



           if (day = 295) then
               irrigation apply amount = 20 (mm)
           endif



           if (day = 298) then
               irrigation apply amount = 20 (mm)
           endif



           if (day = 299) then
               irrigation apply amount = 20 (mm)
           endif



           if (day = 301) then
               irrigation apply amount = 20 (mm)
           endif



           if (day = 303) then
               irrigation apply amount = 20 (mm)
           endif



           if (day = 305) then
               irrigation apply amount = 20 (mm)
           endif



           if (day = 307) then
               irrigation apply amount = 20 (mm)
           endif



           if (day = 309) then
               irrigation apply amount = 20 (mm)
           endif



           if (day = 311) then
               irrigation apply amount = 20 (mm)
           endif
```
      fertiliser
      logic Fertilizer
        on startofday:
```
           if (day = 165) then
               fertiliser apply amount = 15 (kg/ha), depth = 50 (mm), type = NO3_N ()
           endif
```
  simulation Wheat_MER-86_WetN060
    clock
      start_date = 1/05/1986  # Select the start date of the simulation
      end_date = 30/11/1986  # Select the end date of the simulation
    summaryfile: filename=Wheat_MER-86_WetN060.sum
    metfile met: filename=MER-86.met
    area paddock
      registrations global
      outputfile: filename=Wheat_MER-86_WetN060.out
        outputfiledescription DailyVariables -> DailyVariables
      manager: same as Wheat_APS26_DryN000.paddock.Manager
      soil -> MER-86Field
      wheat
      irrigation
        automatic_irrigation = off  # switch
        asw_depth = 600.0  # Depth to which ASW is calculated. (mm)
        crit_fr_asw = 0.9  # Fraction of ASW below which irrigation is applied (0-1.0)
        irrigation_efficiency = 1.0  # Efficiency of the irrigation. (0-1.0)
      logic Irrigator
        on startofday:
```
           if (day = 246) then
               irrigation apply amount = 10 (mm)
           endif



           if (day = 247) then
               irrigation apply amount = 10 (mm)
           endif



           if (day = 248) then
               irrigation apply amount = 20 (mm)
           endif



           if (day = 253) then
               irrigation apply amount = 20 (mm)
           endif



           if (day = 254) then
               irrigation apply amount = 10 (mm)
           endif



           if (day = 257) then
               irrigation apply amount = 10 (mm)
           endif



           if (day = 259) then
               irrigation apply amount = 10 (mm)
           endif



           if (day = 261) then
               irrigation apply amount = 10 (mm)
           endif



           if (day = 264) then
               irrigation apply amount = 10 (mm)
           endif



           if (day = 266) then
               irrigation apply amount = 30 (mm)
           endif



           if (day = 267) then
               irrigation apply amount = 20 (mm)
           endif



           if (day = 273) then
               irrigation apply amount = 30 (mm)
           endif



           if (day = 274) then
               irrigation apply amount = 20 (mm)
           endif



           if (day = 275) then
               irrigation apply amount = 20 (mm)
           endif



           if (day = 277) then
               irrigation apply amount = 20 (mm)
           endif



           if (day = 279) then
               irrigation apply amount = 20 (mm)
           endif



           if (day = 281) then
               irrigation apply amount = 20 (mm)
           endif



           if (day = 283) then
               irrigation apply amount = 20 (mm)
           endif



           if (day = 285) then
               irrigation apply amount = 20 (mm)
           endif



           if (day = 287) then
               irrigation apply amount = 20 (mm)
           endif



           if (day = 288) then
               irrigation apply amount = 20 (mm)
           endif



           if (day = 289) then
               irrigation apply amount = 20 (mm)
           endif



           if (day = 291) then
               irrigation apply amount = 20 (mm)
           endif



           if (day = 293) then
               irrigation apply amount = 20 (mm)
           endif



           if (day = 294) then
               irrigation apply amount = 20 (mm)
           endif



           if (day = 295) then
               irrigation apply amount = 40 (mm)
           endif



           if (day = 298) then
               irrigation apply amount = 20 (mm)
           endif



           if (day = 299) then
               irrigation apply amount = 20 (mm)
           endif



           if (day = 301) then
               irrigation apply amount = 20 (mm)
           endif



           if (day = 303) then
               irrigation apply amount = 20 (mm)
           endif
```
      fertiliser
      logic Fertilizer
        on startofday:
```
           if (day = 165) then
               fertiliser apply amount = 30 (kg/ha), depth = 50 (mm), type = NO3_N ()
           endif
```
  simulation Wheat_MER-73_DryN000
    clock
      start_date = 1/05/1973  # Select the start date of the simulation
      end_date = 30/11/1973  # Select the end date of the simulation
    summaryfile: filename=Wheat_MER-73_DryN000.sum
    metfile met: filename=MER-73.met
    area paddock
      registrations global
      outputfile: filename=Wheat_MER-73_DryN000.out
        outputfiledescription DailyVariables -> DailyVariables
      manager: same as Wheat_APS26_DryN000.paddock.Manager
      soil -> MER-73Field
      wheat
      irrigation
        automatic_irrigation = off  # switch
        asw_depth = 600.0  # Depth to which ASW is calculated. (mm)
        crit_fr_asw = 0.9  # Fraction of ASW below which irrigation is applied (0-1.0)
        irrigation_efficiency = 1.0  # Efficiency of the irrigation. (0-1.0)
      logic Irrigator
      fertiliser
      logic Fertilizer
  simulation Wheat_MER-73_DryN015
    clock
      start_date = 1/05/1973  # Select the start date of the simulation
      end_date = 30/11/1973  # Select the end date of the simulation
    summaryfile: filename=Wheat_MER-73_DryN015.sum
    metfile met: filename=MER-73.met
    area paddock
      registrations global
      outputfile: filename=Wheat_MER-73_DryN015.out
        outputfiledescription DailyVariables -> DailyVariables
      manager: same as Wheat_APS26_DryN000.paddock.Manager
      soil -> MER-73Field
      wheat
      irrigation
        automatic_irrigation = off  # switch
        asw_depth = 600.0  # Depth to which ASW is calculated. (mm)
        crit_fr_asw = 0.9  # Fraction of ASW below which irrigation is applied (0-1.0)
        irrigation_efficiency = 1.0  # Efficiency of the irrigation. (0-1.0)
      logic Irrigator
      fertiliser
      logic Fertilizer
        on startofday:
```
           if (day = 172) then
               fertiliser apply amount = 15 (kg/ha), depth = 50 (mm), type = NO3_N ()
           endif
```
  simulation Wheat_MER-73_I040N015
    clock
      start_date = 1/05/1973  # Select the start date of the simulation
      end_date = 30/11/1973  # Select the end date of the simulation
    summaryfile: filename=Wheat_MER-73_I040N015.sum
    metfile met: filename=MER-73.met
    area paddock
      registrations global
      outputfile: filename=Wheat_MER-73_I040N015.out
        outputfiledescription DailyVariables -> DailyVariables
      manager: same as Wheat_APS26_DryN000.paddock.Manager
      soil -> MER-73Field
      wheat
      irrigation
        automatic_irrigation = off  # switch
        asw_depth = 600.0  # Depth to which ASW is calculated. (mm)
        crit_fr_asw = 0.9  # Fraction of ASW below which irrigation is applied (0-1.0)
        irrigation_efficiency = 1.0  # Efficiency of the irrigation. (0-1.0)
      logic Irrigator
        on startofday:
```
           if (day = 264) then
               irrigation apply amount = 40 (mm)
           endif
```
      fertiliser
      logic Fertilizer
        on startofday:
```
           if (day = 172) then
               fertiliser apply amount = 15 (kg/ha), depth = 50 (mm), type = NO3_N ()
           endif
```
  simulation Wheat_MER-73_I150N015
    clock
      start_date = 1/05/1973  # Select the start date of the simulation
      end_date = 30/11/1973  # Select the end date of the simulation
    summaryfile: filename=Wheat_MER-73_I150N015.sum
    metfile met: filename=MER-73.met
    area paddock
      registrations global
      outputfile: filename=Wheat_MER-73_I150N015.out
        outputfiledescription DailyVariables -> DailyVariables
      manager: same as Wheat_APS26_DryN000.paddock.Manager
      soil -> MER-73Field
      wheat
      irrigation
        automatic_irrigation = off  # switch
        asw_depth = 600.0  # Depth to which ASW is calculated. (mm)
        crit_fr_asw = 0.9  # Fraction of ASW below which irrigation is applied (0-1.0)
        irrigation_efficiency = 1.0  # Efficiency of the irrigation. (0-1.0)
      logic Irrigator
        on startofday:
```
           if (day = 240) then
               irrigation apply amount = 20 (mm)
           endif



           if (day = 264) then
               irrigation apply amount = 30 (mm)
           endif



           if (day = 285) then
               irrigation apply amount = 50 (mm)
           endif



           if (day = 301) then
               irrigation apply amount = 50 (mm)
           endif
```
      fertiliser
      logic Fertilizer
        on startofday:
```
           if (day = 172) then
               fertiliser apply amount = 15 (kg/ha), depth = 50 (mm), type = NO3_N ()
           endif
```
  simulation Wheat_Lincoln9192_I01
    clock
      start_date = 8/06/1991  # Select the start date of the simulation
      end_date = 26/01/1992  # Select the end date of the simulation
    summaryfile: filename=Wheat_Lincoln9192_I01.sum
    metfile met: filename=Lincoln9192.met
    area paddock
      registrations global
      outputfile: filename=Wheat_Lincoln9192_I01.out
        outputfiledescription DailyVariables -> DailyVariables
      manager: same as Wheat_APS26_DryN000.paddock.Manager
      soil LincolnField: same as shared.LincolnField
      wheat
      irrigation
        automatic_irrigation = off  # switch
        asw_depth = 600.0  # Depth to which ASW is calculated. (mm)
        crit_fr_asw = 0.9  # Fraction of ASW below which irrigation is applied (0-1.0)
        irrigation_efficiency = 1.0  # Efficiency of the irrigation. (0-1.0)
      logic Irrigator
        on startofday:
```
           if (day = 161) then
               irrigation apply amount = 7 (mm)
           endif



           if (day = 228) then
               irrigation apply amount = 7 (mm)
           endif



           if (day = 241) then
               irrigation apply amount = 20 (mm)
           endif



           if (day = 250) then
               irrigation apply amount = 12 (mm)
           endif



           if (day = 255) then
               irrigation apply amount = 22 (mm)
           endif



           if (day = 262) then
               irrigation apply amount = 4 (mm)
           endif



           if (day = 269) then
               irrigation apply amount = 7 (mm)
           endif



           if (day = 276) then
               irrigation apply amount = 27 (mm)
           endif



           if (day = 283) then
               irrigation apply amount = 18 (mm)
           endif



           if (day = 290) then
               irrigation apply amount = 30 (mm)
           endif



           if (day = 297) then
               irrigation apply amount = 42 (mm)
           endif



           if (day = 304) then
               irrigation apply amount = 33 (mm)
           endif



           if (day = 311) then
               irrigation apply amount = 24 (mm)
           endif



           if (day = 318) then
               irrigation apply amount = 28 (mm)
           endif



           if (day = 325) then
               irrigation apply amount = 37 (mm)
           endif



           if (day = 331) then
               irrigation apply amount = 51 (mm)
           endif



           if (day = 339) then
               irrigation apply amount = 36 (mm)
           endif



           if (day = 346) then
               irrigation apply amount = 38 (mm)
           endif



           if (day = 353) then
               irrigation apply amount = 35 (mm)
           endif



           if (day = 360) then
               irrigation apply amount = 47 (mm)
           endif



           if (day = 3) then
               irrigation apply amount = 40 (mm)
           endif



           if (day = 9) then
               irrigation apply amount = 41 (mm)
           endif
```
      fertiliser
      logic Fertilizer
        on startofday:
```
           if (day = 161) then
               fertiliser apply amount = 30 (kg/ha), depth = 50 (mm), type = NO3_N ()
           endif



           if (day = 228) then
               fertiliser apply amount = 100 (kg/ha), depth = 50 (mm), type = NO3_N ()
           endif



           if (day = 269) then
               fertiliser apply amount = 50 (kg/ha), depth = 50 (mm), type = NO3_N ()
           endif
```
  simulation Wheat_Lincoln9192_I03
    clock
      start_date = 8/06/1991  # Select the start date of the simulation
      end_date = 26/01/1992  # Select the end date of the simulation
    summaryfile: filename=Wheat_Lincoln9192_I03.sum
    metfile met: filename=Lincoln9192.met
    area paddock
      registrations global
      outputfile: filename=Wheat_Lincoln9192_I03.out
        outputfiledescription DailyVariables -> DailyVariables
      manager: same as Wheat_APS26_DryN000.paddock.Manager
      soil LincolnField: same as shared.LincolnField
      wheat
      irrigation
        automatic_irrigation = off  # switch
        asw_depth = 600.0  # Depth to which ASW is calculated. (mm)
        crit_fr_asw = 0.9  # Fraction of ASW below which irrigation is applied (0-1.0)
        irrigation_efficiency = 1.0  # Efficiency of the irrigation. (0-1.0)
      logic Irrigator
        on startofday:
```
           if (day = 161) then
               irrigation apply amount = 7 (mm)
           endif



           if (day = 228) then
               irrigation apply amount = 7 (mm)
           endif



           if (day = 241) then
               irrigation apply amount = 20 (mm)
           endif



           if (day = 269) then
               irrigation apply amount = 7 (mm)
           endif



           if (day = 297) then
               irrigation apply amount = 42 (mm)
           endif



           if (day = 304) then
               irrigation apply amount = 33 (mm)
           endif



           if (day = 311) then
               irrigation apply amount = 24 (mm)
           endif



           if (day = 318) then
               irrigation apply amount = 28 (mm)
           endif



           if (day = 325) then
               irrigation apply amount = 37 (mm)
           endif



           if (day = 331) then
               irrigation apply amount = 51 (mm)
           endif



           if (day = 339) then
               irrigation apply amount = 36 (mm)
           endif



           if (day = 346) then
               irrigation apply amount = 38 (mm)
           endif



           if (day = 353) then
               irrigation apply amount = 35 (mm)
           endif



           if (day = 360) then
               irrigation apply amount = 47 (mm)
           endif



           if (day = 3) then
               irrigation apply amount = 40 (mm)
           endif



           if (day = 9) then
               irrigation apply amount = 41 (mm)
           endif
```
      fertiliser
      logic Fertilizer: same as Wheat_Lincoln9192_I01.paddock.Fertilizer
  simulation Wheat_Lincoln9192_I05
    clock
      start_date = 8/06/1991  # Select the start date of the simulation
      end_date = 26/01/1992  # Select the end date of the simulation
    summaryfile: filename=Wheat_Lincoln9192_I05.sum
    metfile met: filename=Lincoln9192.met
    area paddock
      registrations global
      outputfile: filename=Wheat_Lincoln9192_I05.out
        outputfiledescription DailyVariables -> DailyVariables
      manager: same as Wheat_APS26_DryN000.paddock.Manager
      soil LincolnField: same as shared.LincolnField
      wheat
      irrigation
        automatic_irrigation = off  # switch
        asw_depth = 600.0  # Depth to which ASW is calculated. (mm)
        crit_fr_asw = 0.9  # Fraction of ASW below which irrigation is applied (0-1.0)
        irrigation_efficiency = 1.0  # Efficiency of the irrigation. (0-1.0)
      logic Irrigator
        on startofday:
```
           if (day = 161) then
               irrigation apply amount = 7 (mm)
           endif



           if (day = 228) then
               irrigation apply amount = 7 (mm)
           endif



           if (day = 241) then
               irrigation apply amount = 20 (mm)
           endif



           if (day = 269) then
               irrigation apply amount = 7 (mm)
           endif



           if (day = 353) then
               irrigation apply amount = 35 (mm)
           endif



           if (day = 360) then
               irrigation apply amount = 47 (mm)
           endif



           if (day = 3) then
               irrigation apply amount = 40 (mm)
           endif
```
      fertiliser
      logic Fertilizer: same as Wheat_Lincoln9192_I01.paddock.Fertilizer
  simulation Wheat_Lincoln9192_I06
    clock
      start_date = 8/06/1991  # Select the start date of the simulation
      end_date = 26/01/1992  # Select the end date of the simulation
    summaryfile: filename=Wheat_Lincoln9192_I06.sum
    metfile met: filename=Lincoln9192.met
    area paddock
      registrations global
      outputfile: filename=Wheat_Lincoln9192_I06.out
        outputfiledescription DailyVariables -> DailyVariables
      manager: same as Wheat_APS26_DryN000.paddock.Manager
      soil LincolnField: same as shared.LincolnField
      wheat
      irrigation
        automatic_irrigation = off  # switch
        asw_depth = 600.0  # Depth to which ASW is calculated. (mm)
        crit_fr_asw = 0.9  # Fraction of ASW below which irrigation is applied (0-1.0)
        irrigation_efficiency = 1.0  # Efficiency of the irrigation. (0-1.0)
      logic Irrigator
        on startofday:
```
           if (day = 161) then
               irrigation apply amount = 7 (mm)
           endif



           if (day = 228) then
               irrigation apply amount = 7 (mm)
           endif



           if (day = 241) then
               irrigation apply amount = 20 (mm)
           endif



           if (day = 250) then
               irrigation apply amount = 12 (mm)
           endif



           if (day = 255) then
               irrigation apply amount = 22 (mm)
           endif



           if (day = 262) then
               irrigation apply amount = 14 (mm)
           endif



           if (day = 269) then
               irrigation apply amount = 7 (mm)
           endif
```
      fertiliser
      logic Fertilizer: same as Wheat_Lincoln9192_I01.paddock.Fertilizer
  simulation Wheat_Lincoln9192_I07
    clock
      start_date = 8/06/1991  # Select the start date of the simulation
      end_date = 26/01/1992  # Select the end date of the simulation
    summaryfile: filename=Wheat_Lincoln9192_I07.sum
    metfile met: filename=Lincoln9192.met
    area paddock
      registrations global
      outputfile: filename=Wheat_Lincoln9192_I07.out
        outputfiledescription DailyVariables -> DailyVariables
      manager: same as Wheat_APS26_DryN000.paddock.Manager
      soil LincolnField: same as shared.LincolnField
      wheat
      irrigation
        automatic_irrigation = off  # switch
        asw_depth = 600.0  # Depth to which ASW is calculated. (mm)
        crit_fr_asw = 0.9  # Fraction of ASW below which irrigation is applied (0-1.0)
        irrigation_efficiency = 1.0  # Efficiency of the irrigation. (0-1.0)
      logic Irrigator
        on startofday:
```
           if (day = 161) then
               irrigation apply amount = 7 (mm)
           endif



           if (day = 228) then
               irrigation apply amount = 7 (mm)
           endif



           if (day = 241) then
               irrigation apply amount = 20 (mm)
           endif



           if (day = 250) then
               irrigation apply amount = 12 (mm)
           endif



           if (day = 255) then
               irrigation apply amount = 22 (mm)
           endif



           if (day = 262) then
               irrigation apply amount = 14 (mm)
           endif



           if (day = 269) then
               irrigation apply amount = 7 (mm)
           endif



           if (day = 276) then
               irrigation apply amount = 27 (mm)
           endif



           if (day = 283) then
               irrigation apply amount = 18 (mm)
           endif



           if (day = 290) then
               irrigation apply amount = 30 (mm)
           endif
```
      fertiliser
      logic Fertilizer: same as Wheat_Lincoln9192_I01.paddock.Fertilizer
  simulation Wheat_Lincoln9192_I08
    clock
      start_date = 8/06/1991  # Select the start date of the simulation
      end_date = 26/01/1992  # Select the end date of the simulation
    summaryfile: filename=Wheat_Lincoln9192_I08.sum
    metfile met: filename=Lincoln9192.met
    area paddock
      registrations global
      outputfile: filename=Wheat_Lincoln9192_I08.out
        outputfiledescription DailyVariables -> DailyVariables
      manager: same as Wheat_APS26_DryN000.paddock.Manager
      soil LincolnField: same as shared.LincolnField
      wheat
      irrigation
        automatic_irrigation = off  # switch
        asw_depth = 600.0  # Depth to which ASW is calculated. (mm)
        crit_fr_asw = 0.9  # Fraction of ASW below which irrigation is applied (0-1.0)
        irrigation_efficiency = 1.0  # Efficiency of the irrigation. (0-1.0)
      logic Irrigator
        on startofday:
```
           if (day = 161) then
               irrigation apply amount = 7 (mm)
           endif



           if (day = 228) then
               irrigation apply amount = 7 (mm)
           endif



           if (day = 241) then
               irrigation apply amount = 20 (mm)
           endif



           if (day = 250) then
               irrigation apply amount = 12 (mm)
           endif



           if (day = 255) then
               irrigation apply amount = 22 (mm)
           endif



           if (day = 262) then
               irrigation apply amount = 14 (mm)
           endif



           if (day = 269) then
               irrigation apply amount = 7 (mm)
           endif



           if (day = 276) then
               irrigation apply amount = 27 (mm)
           endif



           if (day = 283) then
               irrigation apply amount = 18 (mm)
           endif



           if (day = 290) then
               irrigation apply amount = 30 (mm)
           endif



           if (day = 297) then
               irrigation apply amount = 42 (mm)
           endif



           if (day = 304) then
               irrigation apply amount = 33 (mm)
           endif



           if (day = 311) then
               irrigation apply amount = 24 (mm)
           endif
```
      fertiliser
      logic Fertilizer: same as Wheat_Lincoln9192_I01.paddock.Fertilizer
  simulation Wheat_Lincoln9192_I11
    clock
      start_date = 8/06/1991  # Select the start date of the simulation
      end_date = 26/01/1992  # Select the end date of the simulation
    summaryfile: filename=Wheat_Lincoln9192_I11.sum
    metfile met: filename=Lincoln9192.met
    area paddock
      registrations global
      outputfile: filename=Wheat_Lincoln9192_I11.out
        outputfiledescription DailyVariables -> DailyVariables
      manager: same as Wheat_APS26_DryN000.paddock.Manager
      soil LincolnField: same as shared.LincolnField
      wheat
      irrigation
        automatic_irrigation = off  # switch
        asw_depth = 600.0  # Depth to which ASW is calculated. (mm)
        crit_fr_asw = 0.9  # Fraction of ASW below which irrigation is applied (0-1.0)
        irrigation_efficiency = 1.0  # Efficiency of the irrigation. (0-1.0)
      logic Irrigator
        on startofday:
```
           if (day = 161) then
               irrigation apply amount = 7 (mm)
           endif



           if (day = 228) then
               irrigation apply amount = 7 (mm)
           endif



           if (day = 269) then
               irrigation apply amount = 7 (mm)
           endif
```
      fertiliser
      logic Fertilizer: same as Wheat_Lincoln9192_I01.paddock.Fertilizer
  simulation Wheat_FACE92_DryNormalCO2
    clock
      start_date = 14/12/1992  # Select the start date of the simulation
      end_date = 30/05/1993  # Select the end date of the simulation
    summaryfile: filename=Wheat_FACE92_DryNormalCO2.sum
    metfile met: filename=FACE92.met
    area paddock
      registrations global
      outputfile: filename=Wheat_FACE92_DryNormalCO2.out
        outputfiledescription DailyVariables -> DailyVariables
      manager: same as Wheat_APS26_DryN000.paddock.Manager
      soil FACEField: Site=Maricopa RS; Region=USA; LocalName=Maricopa RS; SoilType=FACESoil; NearestTown=Unknown; NaturalVegetation=Unknown
        Water: Cona=2; DiffusConst=88; DiffusSlope=35; U=6; Salb=0.2; Cn2Bare=60; CnRed=20; CnCov=0.8
          layer:
            thickness  bd    ll15  airdry  dul   sat   sw     swcon
            50         1.31  0.2   0.03    0.32  0.42  0.223  0.34
            100        1.27  0.2   0.03    0.32  0.42  0.223  0.34
            150        1.27  0.2   0.03    0.32  0.42  0.223  0.34
            200        1.3   0.2   0.02    0.32  0.42  0.228  0.34
            100        1.47  0.2   0.01    0.32  0.39  0.202  0.34
            100        1.47  0.2   0.01    0.32  0.39  0.202  0.34
            200        1.57  0.19  0.01    0.3   0.36  0.198  0.3
            200        1.57  0.16  0       0.28  0.35  0.192  0.25
            100        1.57  0.16  0       0.28  0.35  0.185  0.25
            100        1.57  0.16  0       0.28  0.35  0.185  0.25
            200        1.57  0.14  0       0.25  0.34  0.189  0.2
            200        1.57  0.14  0       0.25  0.34  0.19   0.2
            200        1.57  0.13  0       0.24  0.33  0.198  0.18
            200        1.57  0.13  0       0.24  0.33  0.196  0.18
        Nitrogen: CnCanopyFact=0.8; RootCn=20; RootWt=1500; SoilCn=15; EnrACoeff=1.0; EnrBCoeff=1.0
          layer:
            oc    ph   fbiom  finert  no3   nh4
            0.41  8.5  0.04   0.31    24.9  0.8
            0.35  8.5  0.04   0.31    24.9  0.8
            0.27  8.5  0.03   0.31    16    0.6
            0.24  8.6  0.02   0.31    9.8   0.4
            0.16  8.6  0.01   0.31    9.8   0.4
            0.16  8.6  0.01   0.31    2.1   0.2
            0.3   8.6  0.01   0.25    2.1   0.2
            0.1   8.6  0.01   0.2     2.1   0.2
            0.1   8.6  0.01   0.2     2.1   0.2
            0.1   8.6  0.01   0.2     0.2   0.2
            0.1   8.6  0.01   0.2     0.2   0.2
            0.1   8.6  0.01   0.2     0.2   0.2
            0.1   8.6  0.01   0.17    0.2   0.2
            0.1   8.6  0.01   0.17    0.2   0.2
        InitWater
          sw=[0.223, 0.223, 0.223, 0.228, 0.202, 0.202, 0.198, 0.192, 0.185, 0.185, 0.189, 0.19, 0.198, 0.196]
        InitNitrogen
          layer:
            no3   nh4
            24.9  0.8
            24.9  0.8
            16    0.6
            9.8   0.4
            9.8   0.4
            2.1   0.2
            2.1   0.2
            2.1   0.2
            2.1   0.2
            0.2   0.2
            0.2   0.2
            0.2   0.2
            0.2   0.2
            0.2   0.2
        SoilCrop Wheat
          layer:
            ll    kl    xf
            0.2   0.06  1
            0.2   0.06  1
            0.2   0.06  1
            0.2   0.06  0.8
            0.2   0.06  0.8
            0.2   0.06  0.8
            0.19  0.06  0.6
            0.16  0.06  0.6
            0.16  0.06  0.4
            0.16  0.06  0.2
            0.14  0.06  0.2
            0.14  0.06  0.2
            0.13  0.06  0.2
            0.13  0.06  0.2
      wheat
      irrigation
        automatic_irrigation = off  # switch
        asw_depth = 600.0  # Depth to which ASW is calculated. (mm)
        crit_fr_asw = 0.9  # Fraction of ASW below which irrigation is applied (0-1.0)
        irrigation_efficiency = 1.0  # Efficiency of the irrigation. (0-1.0)
      logic Irrigator
        on startofday:
```
           if (day = 30) then
               irrigation apply amount = 30 (mm)
           endif



           if (day = 31) then
               irrigation apply amount = 7 (mm)
           endif



           if (day = 77) then
               irrigation apply amount = 17 (mm)
           endif



           if (day = 84) then
               irrigation apply amount = 15 (mm)
           endif



           if (day = 95) then
               irrigation apply amount = 27 (mm)
           endif



           if (day = 96) then
               irrigation apply amount = 4 (mm)
           endif



           if (day = 102) then
               irrigation apply amount = 18 (mm)
           endif



           if (day = 107) then
               irrigation apply amount = 16 (mm)
           endif



           if (day = 108) then
               irrigation apply amount = 6 (mm)
           endif



           if (day = 111) then
               irrigation apply amount = 18 (mm)
           endif



           if (day = 116) then
               irrigation apply amount = 24 (mm)
           endif



           if (day = 117) then
               irrigation apply amount = 6 (mm)
           endif



           if (day = 120) then
               irrigation apply amount = 21 (mm)
           endif



           if (day = 125) then
               irrigation apply amount = 20 (mm)
           endif



           if (day = 130) then
               irrigation apply amount = 20 (mm)
           endif



           if (day = 131) then
               irrigation apply amount = 4 (mm)
           endif



           if (day = 134) then
               irrigation apply amount = 20 (mm)
           endif
```
      fertiliser
      logic Fertilizer
        on startofday:
```
           if (day = 351) then
               fertiliser apply amount = 40 (kg/ha), depth = 50 (mm), type = NO3_N ()
           endif



           if (day = 352) then
               fertiliser apply amount = 20 (kg/ha), depth = 50 (mm), type = NO3_N ()
           endif



           if (day = 30) then
               fertiliser apply amount = 13 (kg/ha), depth = 50 (mm), type = NO3_N ()
           endif



           if (day = 31) then
               fertiliser apply amount = 10 (kg/ha), depth = 50 (mm), type = NO3_N ()
           endif



           if (day = 32) then
               fertiliser apply amount = 92 (kg/ha), depth = 50 (mm), type = NO3_N ()
           endif



           if (day = 77) then
               fertiliser apply amount = 66 (kg/ha), depth = 50 (mm), type = NO3_N ()
           endif



           if (day = 78) then
               fertiliser apply amount = 10 (kg/ha), depth = 50 (mm), type = NO3_N ()
           endif



           if (day = 95) then
               fertiliser apply amount = 81 (kg/ha), depth = 50 (mm), type = NO3_N ()
           endif
```
  simulation Wheat_FACE92_WetNormalCO2
    clock
      start_date = 14/12/1992  # Select the start date of the simulation
      end_date = 30/05/1993  # Select the end date of the simulation
    summaryfile: filename=Wheat_FACE92_WetNormalCO2.sum
    metfile met: filename=FACE92.met
    area paddock
      registrations global
      outputfile: filename=Wheat_FACE92_WetNormalCO2.out
        outputfiledescription DailyVariables -> DailyVariables
      manager: same as Wheat_APS26_DryN000.paddock.Manager
      soil FACEField: Site=Maricopa RS; Region=USA; LocalName=Maricopa RS; SoilType=FACESoil; NearestTown=Unknown; NaturalVegetation=Unknown
        Water: Cona=2; DiffusConst=88; DiffusSlope=35; U=6; Salb=0.2; Cn2Bare=60; CnRed=20; CnCov=0.8
          layer:
            thickness  bd    ll15  airdry  dul   sat   sw     swcon
            50         1.31  0.2   0.03    0.32  0.42  0.22   0.34
            100        1.27  0.2   0.03    0.32  0.42  0.19   0.34
            150        1.27  0.2   0.03    0.32  0.42  0.19   0.34
            200        1.3   0.2   0.02    0.32  0.42  0.228  0.34
            100        1.47  0.2   0.01    0.32  0.39  0.216  0.34
            100        1.47  0.2   0.01    0.32  0.39  0.216  0.34
            200        1.57  0.19  0.01    0.3   0.36  0.167  0.3
            200        1.57  0.16  0       0.28  0.35  0.169  0.25
            100        1.57  0.16  0       0.28  0.35  0.181  0.25
            100        1.57  0.16  0       0.28  0.35  0.181  0.25
            200        1.57  0.14  0       0.25  0.34  0.174  0.2
            200        1.57  0.14  0       0.25  0.34  0.184  0.2
            200        1.57  0.13  0       0.24  0.33  0.178  0.18
            200        1.57  0.13  0       0.24  0.33  0.175  0.18
        Nitrogen: CnCanopyFact=0.8; RootCn=20; RootWt=1500; SoilCn=15; EnrACoeff=1.0; EnrBCoeff=1.0
          layer:
            oc    ph   fbiom  finert  no3   nh4
            0.41  8.5  0.04   0.31    26.2  0.7
            0.35  8.5  0.04   0.31    26.2  0.7
            0.27  8.5  0.03   0.31    14.4  0.6
            0.24  8.6  0.02   0.31    5.7   0.3
            0.16  8.6  0.01   0.31    5.7   0.3
            0.16  8.6  0.01   0.31    1.8   0.2
            0.3   8.6  0.01   0.25    1.8   0.2
            0.1   8.6  0.01   0.2     1.8   0.2
            0.1   8.6  0.01   0.2     1.8   0.2
            0.1   8.6  0.01   0.2     0.2   0.2
            0.1   8.6  0.01   0.2     0.2   0.2
            0.1   8.6  0.01   0.2     0.2   0.2
            0.1   8.6  0.01   0.17    0.2   0.2
            0.1   8.6  0.01   0.17    0.2   0.2
        InitWater
          sw=[0.22, 0.19, 0.19, 0.228, 0.216, 0.216, 0.167, 0.169, 0.181, 0.181, 0.174, 0.184, 0.178, 0.175]
        InitNitrogen
          layer:
            no3   nh4
            26.2  0.7
            26.2  0.7
            14.4  0.6
            5.7   0.3
            5.7   0.3
            1.8   0.2
            1.8   0.2
            1.8   0.2
            1.8   0.2
            0.2   0.2
            0.2   0.2
            0.2   0.2
            0.2   0.2
            0.2   0.2
        SoilCrop Wheat: same as Wheat_FACE92_DryNormalCO2.paddock.FACEField.Wheat
      wheat
      irrigation
        automatic_irrigation = off  # switch
        asw_depth = 600.0  # Depth to which ASW is calculated. (mm)
        crit_fr_asw = 0.9  # Fraction of ASW below which irrigation is applied (0-1.0)
        irrigation_efficiency = 1.0  # Efficiency of the irrigation. (0-1.0)
      logic Irrigator
        on startofday:
```
           if (day = 30) then
               irrigation apply amount = 30 (mm)
           endif



           if (day = 31) then
               irrigation apply amount = 7 (mm)
           endif



           if (day = 60) then
               irrigation apply amount = 12 (mm)
           endif



           if (day = 68) then
               irrigation apply amount = 60 (mm)
           endif



           if (day = 77) then
               irrigation apply amount = 34 (mm)
           endif



           if (day = 84) then
               irrigation apply amount = 50 (mm)
           endif



           if (day = 95) then
               irrigation apply amount = 54 (mm)
           endif



           if (day = 96) then
               irrigation apply amount = 4 (mm)
           endif



           if (day = 102) then
               irrigation apply amount = 47 (mm)
           endif



           if (day = 107) then
               irrigation apply amount = 38 (mm)
           endif



           if (day = 108) then
               irrigation apply amount = 6 (mm)
           endif



           if (day = 111) then
               irrigation apply amount = 36 (mm)
           endif



           if (day = 116) then
               irrigation apply amount = 48 (mm)
           endif



           if (day = 117) then
               irrigation apply amount = 6 (mm)
           endif



           if (day = 120) then
               irrigation apply amount = 42 (mm)
           endif



           if (day = 125) then
               irrigation apply amount = 41 (mm)
           endif



           if (day = 130) then
               irrigation apply amount = 41 (mm)
           endif



           if (day = 131) then
               irrigation apply amount = 4 (mm)
           endif



           if (day = 134) then
               irrigation apply amount = 41 (mm)
           endif
```
      fertiliser
      logic Fertilizer: same as Wheat_FACE92_DryNormalCO2.paddock.Fertilizer
  simulation Wheat_FACE92_DryHighCO2
    clock
      start_date = 14/12/1992  # Select the start date of the simulation
      end_date = 30/05/1993  # Select the end date of the simulation
    summaryfile: filename=Wheat_FACE92_DryHighCO2.sum
    metfile met: filename=FACE92.met
    area paddock
      registrations global
      outputfile: filename=Wheat_FACE92_DryHighCO2.out
        outputfiledescription DailyVariables -> DailyVariables
      manager: same as Wheat_APS26_DryN000.paddock.Manager
      soil FACEField: same as Wheat_FACE92_DryNormalCO2.paddock.FACEField
      wheat
      irrigation
        automatic_irrigation = off  # switch
        asw_depth = 600.0  # Depth to which ASW is calculated. (mm)
        crit_fr_asw = 0.9  # Fraction of ASW below which irrigation is applied (0-1.0)
        irrigation_efficiency = 1.0  # Efficiency of the irrigation. (0-1.0)
      logic Irrigator: same as Wheat_FACE92_DryNormalCO2.paddock.Irrigator
      fertiliser
      logic Fertilizer: same as Wheat_FACE92_DryNormalCO2.paddock.Fertilizer
  simulation Wheat_FACE92_WetHighCO2
    clock
      start_date = 14/12/1992  # Select the start date of the simulation
      end_date = 30/05/1993  # Select the end date of the simulation
    summaryfile: filename=Wheat_FACE92_WetHighCO2.sum
    metfile met: filename=FACE92.met
    area paddock
      registrations global
      outputfile: filename=Wheat_FACE92_WetHighCO2.out
        outputfiledescription DailyVariables -> DailyVariables
      manager: same as Wheat_APS26_DryN000.paddock.Manager
      soil FACEField: same as Wheat_FACE92_WetNormalCO2.paddock.FACEField
      wheat
      irrigation
        automatic_irrigation = off  # switch
        asw_depth = 600.0  # Depth to which ASW is calculated. (mm)
        crit_fr_asw = 0.9  # Fraction of ASW below which irrigation is applied (0-1.0)
        irrigation_efficiency = 1.0  # Efficiency of the irrigation. (0-1.0)
      logic Irrigator: same as Wheat_FACE92_WetNormalCO2.paddock.Irrigator
      fertiliser
      logic Fertilizer: same as Wheat_FACE92_DryNormalCO2.paddock.Fertilizer
  simulation Wheat_FACE93_DryNormalCO2
    clock
      start_date = 7/12/1993  # Select the start date of the simulation
      end_date = 30/05/1994  # Select the end date of the simulation
    summaryfile: filename=Wheat_FACE93_DryNormalCO2.sum
    metfile met: filename=FACE93.met
    area paddock
      registrations global
      outputfile: filename=Wheat_FACE93_DryNormalCO2.out
        outputfiledescription DailyVariables -> DailyVariables
      manager: same as Wheat_APS26_DryN000.paddock.Manager
      soil FACEField: Site=Maricopa RS; Region=USA; LocalName=Maricopa RS; SoilType=FACESoil; NearestTown=Unknown; NaturalVegetation=Unknown
        Water: Cona=2; DiffusConst=88; DiffusSlope=35; U=6; Salb=0.2; Cn2Bare=60; CnRed=20; CnCov=0.8
          layer:
            thickness  bd    ll15  airdry  dul   sat   sw     swcon
            50         1.31  0.2   0.03    0.32  0.42  0.313  0.34
            100        1.27  0.2   0.03    0.32  0.42  0.313  0.34
            150        1.27  0.2   0.03    0.32  0.42  0.313  0.34
            200        1.3   0.2   0.02    0.32  0.42  0.281  0.34
            100        1.47  0.2   0.01    0.32  0.39  0.226  0.34
            100        1.47  0.2   0.01    0.32  0.39  0.226  0.34
            200        1.57  0.19  0.01    0.3   0.36  0.217  0.3
            200        1.57  0.16  0       0.28  0.35  0.211  0.25
            100        1.57  0.16  0       0.28  0.35  0.206  0.25
            100        1.57  0.16  0       0.28  0.35  0.206  0.25
            200        1.57  0.14  0       0.25  0.34  0.211  0.2
            200        1.57  0.14  0       0.25  0.34  0.214  0.2
            200        1.57  0.13  0       0.24  0.33  0.224  0.18
            200        1.57  0.13  0       0.24  0.33  0.237  0.18
        Nitrogen: CnCanopyFact=0.8; RootCn=20; RootWt=1500; SoilCn=15; EnrACoeff=1.0; EnrBCoeff=1.0
          layer:
            oc    ph   fbiom  finert  no3   nh4
            0.41  8.5  0.04   0.31    6     0.7
            0.35  8.5  0.04   0.31    6     0.7
            0.27  8.5  0.03   0.31    28.3  0.6
            0.24  8.6  0.02   0.31    19    0.3
            0.16  8.6  0.01   0.31    19    0.3
            0.16  8.6  0.01   0.31    8.8   0.2
            0.3   8.6  0.01   0.25    8.8   0.2
            0.1   8.6  0.01   0.2     8.8   0.2
            0.1   8.6  0.01   0.2     8.8   0.2
            0.1   8.6  0.01   0.2     8.8   0.2
            0.1   8.6  0.01   0.2     8.8   0.2
            0.1   8.6  0.01   0.2     8.8   0.2
            0.1   8.6  0.01   0.17    8.8   0.2
            0.1   8.6  0.01   0.17    8.8   0.2
        InitWater
          sw=[0.313, 0.313, 0.313, 0.281, 0.226, 0.226, 0.217, 0.211, 0.206, 0.206, 0.211, 0.214, 0.224, 0.237]
        InitNitrogen
          layer:
            no3   nh4
            6     0.7
            6     0.7
            28.3  0.6
            19    0.3
            19    0.3
            8.8   0.2
            8.8   0.2
            8.8   0.2
            8.8   0.2
            8.8   0.2
            8.8   0.2
            8.8   0.2
            8.8   0.2
            8.8   0.2
        SoilCrop Wheat: same as Wheat_FACE92_DryNormalCO2.paddock.FACEField.Wheat
      wheat
      irrigation
        automatic_irrigation = off  # switch
        asw_depth = 600.0  # Depth to which ASW is calculated. (mm)
        crit_fr_asw = 0.9  # Fraction of ASW below which irrigation is applied (0-1.0)
        irrigation_efficiency = 1.0  # Efficiency of the irrigation. (0-1.0)
      logic Irrigator
        on startofday:
```
           if (day = 347) then
               irrigation apply amount = 13 (mm)
           endif



           if (day = 351) then
               irrigation apply amount = 17 (mm)
           endif



           if (day = 34) then
               irrigation apply amount = 30 (mm)
           endif



           if (day = 75) then
               irrigation apply amount = 30 (mm)
           endif



           if (day = 87) then
               irrigation apply amount = 30 (mm)
           endif



           if (day = 98) then
               irrigation apply amount = 50 (mm)
           endif



           if (day = 109) then
               irrigation apply amount = 50 (mm)
           endif



           if (day = 120) then
               irrigation apply amount = 7 (mm)
           endif



           if (day = 124) then
               irrigation apply amount = 60 (mm)
           endif
```
      fertiliser
      logic Fertilizer
        on startofday:
```
           if (day = 341) then
               fertiliser apply amount = 54 (kg/ha), depth = 50 (mm), type = NO3_N ()
           endif



           if (day = 342) then
               fertiliser apply amount = 10 (kg/ha), depth = 50 (mm), type = NO3_N ()
           endif



           if (day = 35) then
               fertiliser apply amount = 92 (kg/ha), depth = 50 (mm), type = NO3_N ()
           endif



           if (day = 36) then
               fertiliser apply amount = 10 (kg/ha), depth = 50 (mm), type = NO3_N ()
           endif



           if (day = 75) then
               fertiliser apply amount = 69 (kg/ha), depth = 50 (mm), type = NO3_N ()
           endif



           if (day = 76) then
               fertiliser apply amount = 10 (kg/ha), depth = 50 (mm), type = NO3_N ()
           endif



           if (day = 98) then
               fertiliser apply amount = 46 (kg/ha), depth = 50 (mm), type = NO3_N ()
           endif
```
  simulation Wheat_FACE93_WetNormalCO2
    clock
      start_date = 7/12/1993  # Select the start date of the simulation
      end_date = 30/05/1994  # Select the end date of the simulation
    summaryfile: filename=Wheat_FACE93_WetNormalCO2.sum
    metfile met: filename=FACE93.met
    area paddock
      registrations global
      outputfile: filename=Wheat_FACE93_WetNormalCO2.out
        outputfiledescription DailyVariables -> DailyVariables
      manager: same as Wheat_APS26_DryN000.paddock.Manager
      soil FACEField: Site=Maricopa RS; Region=USA; LocalName=Maricopa RS; SoilType=FACESoil; NearestTown=Unknown; NaturalVegetation=Unknown
        Water: Cona=2; DiffusConst=88; DiffusSlope=35; U=6; Salb=0.2; Cn2Bare=60; CnRed=20; CnCov=0.8
          layer:
            thickness  bd    ll15  airdry  dul   sat   sw     swcon
            50         1.31  0.2   0.03    0.32  0.42  0.302  0.34
            100        1.27  0.2   0.03    0.32  0.42  0.302  0.34
            150        1.27  0.2   0.03    0.32  0.42  0.302  0.34
            200        1.3   0.2   0.02    0.32  0.42  0.286  0.34
            100        1.47  0.2   0.01    0.32  0.39  0.217  0.34
            100        1.47  0.2   0.01    0.32  0.39  0.217  0.34
            200        1.57  0.19  0.01    0.3   0.36  0.186  0.3
            200        1.57  0.16  0       0.28  0.35  0.2    0.25
            100        1.57  0.16  0       0.28  0.35  0.199  0.25
            100        1.57  0.16  0       0.28  0.35  0.199  0.25
            200        1.57  0.14  0       0.25  0.34  0.197  0.2
            200        1.57  0.14  0       0.25  0.34  0.204  0.2
            200        1.57  0.13  0       0.24  0.33  0.208  0.18
            200        1.57  0.13  0       0.24  0.33  0.209  0.18
        Nitrogen: CnCanopyFact=0.8; RootCn=20; RootWt=1500; SoilCn=15; EnrACoeff=1.0; EnrBCoeff=1.0
          layer:
            oc    ph   fbiom  finert  no3   nh4
            0.41  8.5  0.04   0.31    4.2   0.7
            0.35  8.5  0.04   0.31    4.2   0.7
            0.27  8.5  0.03   0.31    12    0.6
            0.24  8.6  0.02   0.31    10.6  0.3
            0.16  8.6  0.01   0.31    10.6  0.3
            0.16  8.6  0.01   0.31    3.4   0.2
            0.3   8.6  0.01   0.25    3.4   0.2
            0.1   8.6  0.01   0.2     3.4   0.2
            0.1   8.6  0.01   0.2     3.4   0.2
            0.1   8.6  0.01   0.2     3.4   0.2
            0.1   8.6  0.01   0.2     3.4   0.2
            0.1   8.6  0.01   0.2     3.4   0.2
            0.1   8.6  0.01   0.17    3.4   0.2
            0.1   8.6  0.01   0.17    3.4   0.2
        InitWater
          sw=[0.302, 0.302, 0.302, 0.286, 0.217, 0.217, 0.186, 0.2, 0.199, 0.199, 0.197, 0.204, 0.208, 0.209]
        InitNitrogen
          layer:
            no3   nh4
            4.2   0.7
            4.2   0.7
            12    0.6
            10.6  0.3
            10.6  0.3
            3.4   0.2
            3.4   0.2
            3.4   0.2
            3.4   0.2
            3.4   0.2
            3.4   0.2
            3.4   0.2
            3.4   0.2
            3.4   0.2
        SoilCrop Wheat: same as Wheat_FACE92_DryNormalCO2.paddock.FACEField.Wheat
      wheat
      irrigation
        automatic_irrigation = off  # switch
        asw_depth = 600.0  # Depth to which ASW is calculated. (mm)
        crit_fr_asw = 0.9  # Fraction of ASW below which irrigation is applied (0-1.0)
        irrigation_efficiency = 1.0  # Efficiency of the irrigation. (0-1.0)
      logic Irrigator
        on startofday:
```
           if (day = 347) then
               irrigation apply amount = 13 (mm)
           endif



           if (day = 351) then
               irrigation apply amount = 17 (mm)
           endif



           if (day = 21) then
               irrigation apply amount = 30 (mm)
           endif



           if (day = 34) then
               irrigation apply amount = 30 (mm)
           endif



           if (day = 54) then
               irrigation apply amount = 35 (mm)
           endif



           if (day = 63) then
               irrigation apply amount = 30 (mm)
           endif



           if (day = 75) then
               irrigation apply amount = 36 (mm)
           endif



           if (day = 80) then
               irrigation apply amount = 25 (mm)
           endif



           if (day = 87) then
               irrigation apply amount = 30 (mm)
           endif



           if (day = 94) then
               irrigation apply amount = 30 (mm)
           endif



           if (day = 98) then
               irrigation apply amount = 50 (mm)
           endif



           if (day = 104) then
               irrigation apply amount = 50 (mm)
           endif



           if (day = 109) then
               irrigation apply amount = 50 (mm)
           endif



           if (day = 115) then
               irrigation apply amount = 50 (mm)
           endif



           if (day = 120) then
               irrigation apply amount = 7 (mm)
           endif



           if (day = 124) then
               irrigation apply amount = 60 (mm)
           endif



           if (day = 130) then
               irrigation apply amount = 48 (mm)
           endif



           if (day = 136) then
               irrigation apply amount = 38 (mm)
           endif
```
      fertiliser
      logic Fertilizer: same as Wheat_FACE93_DryNormalCO2.paddock.Fertilizer
  simulation Wheat_FACE93_DryHighCO2
    clock
      start_date = 7/12/1993  # Select the start date of the simulation
      end_date = 30/05/1994  # Select the end date of the simulation
    summaryfile: filename=Wheat_FACE93_DryHighCO2.sum
    metfile met: filename=FACE93.met
    area paddock
      registrations global
      outputfile: filename=Wheat_FACE93_DryHighCO2.out
        outputfiledescription DailyVariables -> DailyVariables
      manager: same as Wheat_APS26_DryN000.paddock.Manager
      soil FACEField: Site=Maricopa RS; Region=USA; LocalName=Maricopa RS; SoilType=FACESoil; NearestTown=Unknown; NaturalVegetation=Unknown
        Water: Cona=2; DiffusConst=88; DiffusSlope=35; U=6; Salb=0.2; Cn2Bare=60; CnRed=20; CnCov=0.8
          layer:
            thickness  bd    ll15  airdry  dul   sat   sw     swcon
            50         1.31  0.2   0.03    0.32  0.42  0.295  0.34
            100        1.27  0.2   0.03    0.32  0.42  0.295  0.34
            150        1.27  0.2   0.03    0.32  0.42  0.295  0.34
            200        1.3   0.2   0.02    0.32  0.42  0.287  0.34
            100        1.47  0.2   0.01    0.32  0.39  0.235  0.34
            100        1.47  0.2   0.01    0.32  0.39  0.235  0.34
            200        1.57  0.19  0.01    0.3   0.36  0.145  0.3
            200        1.57  0.16  0       0.28  0.35  0.126  0.25
            100        1.57  0.16  0       0.28  0.35  0.126  0.25
            100        1.57  0.16  0       0.28  0.35  0.126  0.25
            200        1.57  0.14  0       0.25  0.34  0.16   0.2
            200        1.57  0.14  0       0.25  0.34  0.158  0.2
            200        1.57  0.13  0       0.24  0.33  0.173  0.18
            200        1.57  0.13  0       0.24  0.33  0.174  0.18
        Nitrogen: CnCanopyFact=0.8; RootCn=20; RootWt=1500; SoilCn=15; EnrACoeff=1.0; EnrBCoeff=1.0
          layer:
            oc    ph   fbiom  finert  no3   nh4
            0.41  8.5  0.04   0.31    7.2   0.7
            0.35  8.5  0.04   0.31    7.2   0.7
            0.27  8.5  0.03   0.31    11.8  0.6
            0.24  8.6  0.02   0.31    10.9  0.3
            0.16  8.6  0.01   0.31    10.9  0.3
            0.16  8.6  0.01   0.31    5.5   0.2
            0.3   8.6  0.01   0.25    5.5   0.2
            0.1   8.6  0.01   0.2     5.5   0.2
            0.1   8.6  0.01   0.2     5.5   0.2
            0.1   8.6  0.01   0.2     5.5   0.2
            0.1   8.6  0.01   0.2     5.5   0.2
            0.1   8.6  0.01   0.2     5.5   0.2
            0.1   8.6  0.01   0.17    5.5   0.2
            0.1   8.6  0.01   0.17    5.5   0.2
        InitWater
          sw=[0.295, 0.295, 0.295, 0.287, 0.235, 0.235, 0.145, 0.126, 0.126, 0.126, 0.16, 0.158, 0.173, 0.174]
        InitNitrogen
          layer:
            no3   nh4
            7.2   0.7
            7.2   0.7
            11.8  0.6
            10.9  0.3
            10.9  0.3
            5.5   0.2
            5.5   0.2
            5.5   0.2
            5.5   0.2
            5.5   0.2
            5.5   0.2
            5.5   0.2
            5.5   0.2
            5.5   0.2
        SoilCrop Wheat: same as Wheat_FACE92_DryNormalCO2.paddock.FACEField.Wheat
      wheat
      irrigation
        automatic_irrigation = off  # switch
        asw_depth = 600.0  # Depth to which ASW is calculated. (mm)
        crit_fr_asw = 0.9  # Fraction of ASW below which irrigation is applied (0-1.0)
        irrigation_efficiency = 1.0  # Efficiency of the irrigation. (0-1.0)
      logic Irrigator: same as Wheat_FACE93_DryNormalCO2.paddock.Irrigator
      fertiliser
      logic Fertilizer: same as Wheat_FACE93_DryNormalCO2.paddock.Fertilizer
  simulation Wheat_FACE93_WetHighCO2
    clock
      start_date = 7/12/1993  # Select the start date of the simulation
      end_date = 30/05/1994  # Select the end date of the simulation
    summaryfile: filename=Wheat_FACE93_WetHighCO2.sum
    metfile met: filename=FACE93.met
    area paddock
      registrations global
      outputfile: filename=Wheat_FACE93_WetHighCO2.out
        outputfiledescription DailyVariables -> DailyVariables
      manager: same as Wheat_APS26_DryN000.paddock.Manager
      soil FACEField: Site=Maricopa RS; Region=USA; LocalName=Maricopa RS; SoilType=FACESoil; NearestTown=Unknown; NaturalVegetation=Unknown
        Water: Cona=2; DiffusConst=88; DiffusSlope=35; U=6; Salb=0.2; Cn2Bare=60; CnRed=20; CnCov=0.8
          layer:
            thickness  bd    ll15  airdry  dul   sat   sw     swcon
            50         1.31  0.2   0.03    0.32  0.42  0.31   0.34
            100        1.27  0.2   0.03    0.32  0.42  0.31   0.34
            150        1.27  0.2   0.03    0.32  0.42  0.31   0.34
            200        1.3   0.2   0.02    0.32  0.42  0.296  0.34
            100        1.47  0.2   0.01    0.32  0.39  0.242  0.34
            100        1.47  0.2   0.01    0.32  0.39  0.242  0.34
            200        1.57  0.19  0.01    0.3   0.36  0.163  0.3
            200        1.57  0.16  0       0.28  0.35  0.142  0.25
            100        1.57  0.16  0       0.28  0.35  0.129  0.25
            100        1.57  0.16  0       0.28  0.35  0.129  0.25
            200        1.57  0.14  0       0.25  0.34  0.151  0.2
            200        1.57  0.14  0       0.25  0.34  0.155  0.2
            200        1.57  0.13  0       0.24  0.33  0.166  0.18
            200        1.57  0.13  0       0.24  0.33  0.166  0.18
        Nitrogen: CnCanopyFact=0.8; RootCn=20; RootWt=1500; SoilCn=15; EnrACoeff=1.0; EnrBCoeff=1.0
          layer:
            oc    ph   fbiom  finert  no3   nh4
            0.41  8.5  0.04   0.31    10.6  0.7
            0.35  8.5  0.04   0.31    10.6  0.7
            0.27  8.5  0.03   0.31    14.8  0.6
            0.24  8.6  0.02   0.31    14.3  0.3
            0.16  8.6  0.01   0.31    14.3  0.3
            0.16  8.6  0.01   0.31    7.1   0.2
            0.3   8.6  0.01   0.25    7.1   0.2
            0.1   8.6  0.01   0.2     7.1   0.2
            0.1   8.6  0.01   0.2     7.1   0.2
            0.1   8.6  0.01   0.2     7.1   0.2
            0.1   8.6  0.01   0.2     7.1   0.2
            0.1   8.6  0.01   0.2     7.1   0.2
            0.1   8.6  0.01   0.17    7.1   0.2
            0.1   8.6  0.01   0.17    7.1   0.2
        InitWater
          sw=[0.31, 0.31, 0.31, 0.296, 0.242, 0.242, 0.163, 0.142, 0.129, 0.129, 0.151, 0.155, 0.166, 0.166]
        InitNitrogen
          layer:
            no3   nh4
            10.6  0.7
            10.6  0.7
            14.8  0.6
            14.3  0.3
            14.3  0.3
            7.1   0.2
            7.1   0.2
            7.1   0.2
            7.1   0.2
            7.1   0.2
            7.1   0.2
            7.1   0.2
            7.1   0.2
            7.1   0.2
        SoilCrop Wheat: same as Wheat_FACE92_DryNormalCO2.paddock.FACEField.Wheat
      wheat
      irrigation
        automatic_irrigation = off  # switch
        asw_depth = 600.0  # Depth to which ASW is calculated. (mm)
        crit_fr_asw = 0.9  # Fraction of ASW below which irrigation is applied (0-1.0)
        irrigation_efficiency = 1.0  # Efficiency of the irrigation. (0-1.0)
      logic Irrigator: same as Wheat_FACE93_WetNormalCO2.paddock.Irrigator
      fertiliser
      logic Fertilizer: same as Wheat_FACE93_DryNormalCO2.paddock.Fertilizer
  simulation Wheat_FACE95_LowNNormalCO2
    clock
      start_date = 15/12/1995  # Select the start date of the simulation
      end_date = 18/05/1996  # Select the end date of the simulation
    summaryfile: filename=Wheat_FACE95_LowNNormalCO2.sum
    metfile met: filename=FACE95.met
    area paddock
      registrations global
      outputfile: filename=Wheat_FACE95_LowNNormalCO2.out
        outputfiledescription DailyVariables -> DailyVariables
      manager: same as Wheat_APS26_DryN000.paddock.Manager
      soil FACEField: Site=Maricopa RS; Region=USA; LocalName=Maricopa RS; SoilType=FACESoil; NearestTown=Unknown; NaturalVegetation=Unknown
        Water: Cona=2; DiffusConst=88; DiffusSlope=35; U=6; Salb=0.2; Cn2Bare=60; CnRed=20; CnCov=0.8
          layer:
            thickness  bd    ll15  airdry  dul   sat   sw     swcon
            50         1.31  0.2   0.03    0.32  0.42  0.292  0.34
            100        1.27  0.2   0.03    0.32  0.42  0.292  0.34
            150        1.27  0.2   0.03    0.32  0.42  0.292  0.34
            200        1.3   0.2   0.02    0.32  0.42  0.271  0.34
            100        1.47  0.2   0.01    0.32  0.39  0.224  0.34
            100        1.47  0.2   0.01    0.32  0.39  0.224  0.34
            200        1.57  0.19  0.01    0.3   0.36  0.165  0.3
            200        1.57  0.16  0       0.28  0.35  0.179  0.25
            100        1.57  0.16  0       0.28  0.35  0.189  0.25
            100        1.57  0.16  0       0.28  0.35  0.189  0.25
            200        1.57  0.14  0       0.25  0.34  0.19   0.2
            200        1.57  0.14  0       0.25  0.34  0.188  0.2
            200        1.57  0.13  0       0.24  0.33  0.171  0.18
            200        1.57  0.13  0       0.24  0.33  0.164  0.18
        Nitrogen: CnCanopyFact=0.8; RootCn=20; RootWt=1500; SoilCn=15; EnrACoeff=1.0; EnrBCoeff=1.0
          layer:
            oc    ph   fbiom  finert  no3   nh4
            0.41  8.5  0.04   0.31    3.51  2.6
            0.35  8.5  0.04   0.31    3.51  2.6
            0.27  8.5  0.03   0.31    6.82  2.21
            0.24  8.6  0.02   0.31    6.22  1.4
            0.16  8.6  0.01   0.31    6.22  1.4
            0.16  8.6  0.01   0.31    4.01  0.86
            0.3   8.6  0.01   0.25    4.01  0.86
            0.1   8.6  0.01   0.2     2.07  0.71
            0.1   8.6  0.01   0.2     2.07  0.71
            0.1   8.6  0.01   0.2     2.69  0.64
            0.1   8.6  0.01   0.2     2.69  0.64
            0.1   8.6  0.01   0.2     2.47  1.13
            0.1   8.6  0.01   0.17    1.76  0.4
            0.1   8.6  0.01   0.17    1.76  0.4
        InitWater
          sw=[0.292, 0.292, 0.292, 0.271, 0.224, 0.224, 0.165, 0.179, 0.189, 0.189, 0.19, 0.188, 0.171, 0.164]
        InitNitrogen
          layer:
            no3   nh4
            3.51  2.6
            3.51  2.6
            6.82  2.21
            6.22  1.4
            6.22  1.4
            4.01  0.86
            4.01  0.86
            2.07  0.71
            2.07  0.71
            2.69  0.64
            2.69  0.64
            2.47  1.13
            1.76  0.4
            1.76  0.4
        SoilCrop Wheat: same as Wheat_FACE92_DryNormalCO2.paddock.FACEField.Wheat
      wheat
      irrigation
        automatic_irrigation = off  # switch
        asw_depth = 600.0  # Depth to which ASW is calculated. (mm)
        crit_fr_asw = 0.9  # Fraction of ASW below which irrigation is applied (0-1.0)
        irrigation_efficiency = 1.0  # Efficiency of the irrigation. (0-1.0)
      logic Irrigator
        on startofday:
```
           if (day = 355) then
               irrigation apply amount = 30 (mm)
           endif



           if (day = 30) then
               irrigation apply amount = 30 (mm)
           endif



           if (day = 31) then
               irrigation apply amount = 25 (mm)
           endif



           if (day = 53) then
               irrigation apply amount = 40 (mm)
           endif



           if (day = 65) then
               irrigation apply amount = 33 (mm)
           endif



           if (day = 71) then
               irrigation apply amount = 45 (mm)
           endif



           if (day = 82) then
               irrigation apply amount = 45 (mm)
           endif



           if (day = 90) then
               irrigation apply amount = 54 (mm)
           endif



           if (day = 91) then
               irrigation apply amount = 2 (mm)
           endif



           if (day = 96) then
               irrigation apply amount = 45 (mm)
           endif



           if (day = 101) then
               irrigation apply amount = 45 (mm)
           endif



           if (day = 106) then
               irrigation apply amount = 30 (mm)
           endif



           if (day = 109) then
               irrigation apply amount = 43 (mm)
           endif



           if (day = 113) then
               irrigation apply amount = 43 (mm)
           endif



           if (day = 117) then
               irrigation apply amount = 42 (mm)
           endif



           if (day = 122) then
               irrigation apply amount = 40 (mm)
           endif
```
      fertiliser
      logic Fertilizer
        on startofday:
```
           if (day = 355) then
               fertiliser apply amount = 2 (kg/ha), depth = 50 (mm), type = NO3_N ()
           endif



           if (day = 30) then
               fertiliser apply amount = 15 (kg/ha), depth = 50 (mm), type = NO3_N ()
           endif



           if (day = 31) then
               fertiliser apply amount = 2 (kg/ha), depth = 50 (mm), type = NO3_N ()
           endif



           if (day = 53) then
               fertiliser apply amount = 2 (kg/ha), depth = 50 (mm), type = NO3_N ()
           endif



           if (day = 65) then
               fertiliser apply amount = 2 (kg/ha), depth = 50 (mm), type = NO3_N ()
           endif



           if (day = 71) then
               fertiliser apply amount = 3 (kg/ha), depth = 50 (mm), type = NO3_N ()
           endif



           if (day = 82) then
               fertiliser apply amount = 3 (kg/ha), depth = 50 (mm), type = NO3_N ()
           endif



           if (day = 90) then
               fertiliser apply amount = 25 (kg/ha), depth = 50 (mm), type = NO3_N ()
           endif



           if (day = 91) then
               fertiliser apply amount = 2 (kg/ha), depth = 50 (mm), type = NO3_N ()
           endif



           if (day = 98) then
               fertiliser apply amount = 1 (kg/ha), depth = 50 (mm), type = NO3_N ()
           endif



           if (day = 102) then
               fertiliser apply amount = 2 (kg/ha), depth = 50 (mm), type = NO3_N ()
           endif



           if (day = 107) then
               fertiliser apply amount = 1 (kg/ha), depth = 50 (mm), type = NO3_N ()
           endif



           if (day = 111) then
               fertiliser apply amount = 2 (kg/ha), depth = 50 (mm), type = NO3_N ()
           endif



           if (day = 115) then
               fertiliser apply amount = 3 (kg/ha), depth = 50 (mm), type = NO3_N ()
           endif



           if (day = 118) then
               fertiliser apply amount = 3 (kg/ha), depth = 50 (mm), type = NO3_N ()
           endif



           if (day = 123) then
               fertiliser apply amount = 2 (kg/ha), depth = 50 (mm), type = NO3_N ()
           endif
```
  simulation Wheat_FACE95_HighNNormalCO2
    clock
      start_date = 15/12/1995  # Select the start date of the simulation
      end_date = 18/05/1996  # Select the end date of the simulation
    summaryfile: filename=Wheat_FACE95_HighNNormalCO2.sum
    metfile met: filename=FACE95.met
    area paddock
      registrations global
      outputfile: filename=Wheat_FACE95_HighNNormalCO2.out
        outputfiledescription DailyVariables -> DailyVariables
      manager: same as Wheat_APS26_DryN000.paddock.Manager
      soil FACEField: Site=Maricopa RS; Region=USA; LocalName=Maricopa RS; SoilType=FACESoil; NearestTown=Unknown; NaturalVegetation=Unknown
        Water: Cona=2; DiffusConst=88; DiffusSlope=35; U=6; Salb=0.2; Cn2Bare=60; CnRed=20; CnCov=0.8
          layer:
            thickness  bd    ll15  airdry  dul   sat   sw     swcon
            50         1.31  0.2   0.03    0.32  0.42  0.281  0.34
            100        1.27  0.2   0.03    0.32  0.42  0.281  0.34
            150        1.27  0.2   0.03    0.32  0.42  0.281  0.34
            200        1.3   0.2   0.02    0.32  0.42  0.277  0.34
            100        1.47  0.2   0.01    0.32  0.39  0.246  0.34
            100        1.47  0.2   0.01    0.32  0.39  0.246  0.34
            200        1.57  0.19  0.01    0.3   0.36  0.202  0.3
            200        1.57  0.16  0       0.28  0.35  0.189  0.25
            100        1.57  0.16  0       0.28  0.35  0.186  0.25
            100        1.57  0.16  0       0.28  0.35  0.186  0.25
            200        1.57  0.14  0       0.25  0.34  0.195  0.2
            200        1.57  0.14  0       0.25  0.34  0.191  0.2
            200        1.57  0.13  0       0.24  0.33  0.169  0.18
            200        1.57  0.13  0       0.24  0.33  0.148  0.18
        Nitrogen: CnCanopyFact=0.8; RootCn=20; RootWt=1500; SoilCn=15; EnrACoeff=1.0; EnrBCoeff=1.0
          layer:
            oc    ph   fbiom  finert  no3    nh4
            0.41  8.5  0.04   0.31    7.25   1.99
            0.35  8.5  0.04   0.31    7.25   1.99
            0.27  8.5  0.03   0.31    10.13  1.87
            0.24  8.6  0.02   0.31    7.8    1.77
            0.16  8.6  0.01   0.31    7.8    1.77
            0.16  8.6  0.01   0.31    3.67   0.85
            0.3   8.6  0.01   0.25    3.67   0.85
            0.1   8.6  0.01   0.2     1.56   0.43
            0.1   8.6  0.01   0.2     1.56   0.43
            0.1   8.6  0.01   0.2     0.76   0.97
            0.1   8.6  0.01   0.2     0.76   0.97
            0.1   8.6  0.01   0.2     0.35   0.39
            0.1   8.6  0.01   0.17    0.88   0.69
            0.1   8.6  0.01   0.17    0.88   0.69
        InitWater
          sw=[0.281, 0.281, 0.281, 0.277, 0.246, 0.246, 0.202, 0.189, 0.186, 0.186, 0.195, 0.191, 0.169, 0.148]
        InitNitrogen
          layer:
            no3    nh4
            7.25   1.99
            7.25   1.99
            10.13  1.87
            7.8    1.77
            7.8    1.77
            3.67   0.85
            3.67   0.85
            1.56   0.43
            1.56   0.43
            0.76   0.97
            0.76   0.97
            0.35   0.39
            0.88   0.69
            0.88   0.69
        SoilCrop Wheat: same as Wheat_FACE92_DryNormalCO2.paddock.FACEField.Wheat
      wheat
      irrigation
        automatic_irrigation = off  # switch
        asw_depth = 600.0  # Depth to which ASW is calculated. (mm)
        crit_fr_asw = 0.9  # Fraction of ASW below which irrigation is applied (0-1.0)
        irrigation_efficiency = 1.0  # Efficiency of the irrigation. (0-1.0)
      logic Irrigator
        on startofday:
```
           if (day = 355) then
               irrigation apply amount = 30 (mm)
           endif



           if (day = 30) then
               irrigation apply amount = 30 (mm)
           endif



           if (day = 31) then
               irrigation apply amount = 25 (mm)
           endif



           if (day = 53) then
               irrigation apply amount = 40 (mm)
           endif



           if (day = 65) then
               irrigation apply amount = 53 (mm)
           endif



           if (day = 71) then
               irrigation apply amount = 65 (mm)
           endif



           if (day = 82) then
               irrigation apply amount = 65 (mm)
           endif



           if (day = 90) then
               irrigation apply amount = 74 (mm)
           endif



           if (day = 91) then
               irrigation apply amount = 62 (mm)
           endif



           if (day = 96) then
               irrigation apply amount = 85 (mm)
           endif



           if (day = 101) then
               irrigation apply amount = 85 (mm)
           endif



           if (day = 106) then
               irrigation apply amount = 80 (mm)
           endif



           if (day = 109) then
               irrigation apply amount = 83 (mm)
           endif



           if (day = 113) then
               irrigation apply amount = 83 (mm)
           endif



           if (day = 117) then
               irrigation apply amount = 82 (mm)
           endif



           if (day = 122) then
               irrigation apply amount = 94 (mm)
           endif



           if (day = 127) then
               irrigation apply amount = 87 (mm)
           endif
```
      fertiliser
      logic Fertilizer
        on startofday:
```
           if (day = 355) then
               fertiliser apply amount = 3 (kg/ha), depth = 50 (mm), type = NO3_N ()
           endif



           if (day = 30) then
               fertiliser apply amount = 50 (kg/ha), depth = 50 (mm), type = NO3_N ()
           endif



           if (day = 31) then
               fertiliser apply amount = 2 (kg/ha), depth = 50 (mm), type = NO3_N ()
           endif



           if (day = 53) then
               fertiliser apply amount = 2 (kg/ha), depth = 50 (mm), type = NO3_N ()
           endif



           if (day = 65) then
               fertiliser apply amount = 2 (kg/ha), depth = 50 (mm), type = NO3_N ()
           endif



           if (day = 71) then
               fertiliser apply amount = 3 (kg/ha), depth = 50 (mm), type = NO3_N ()
           endif



           if (day = 82) then
               fertiliser apply amount = 3 (kg/ha), depth = 50 (mm), type = NO3_N ()
           endif



           if (day = 90) then
               fertiliser apply amount = 125 (kg/ha), depth = 50 (mm), type = NO3_N ()
           endif



           if (day = 91) then
               fertiliser apply amount = 2 (kg/ha), depth = 50 (mm), type = NO3_N ()
           endif



           if (day = 98) then
               fertiliser apply amount = 1 (kg/ha), depth = 50 (mm), type = NO3_N ()
           endif



           if (day = 102) then
               fertiliser apply amount = 2 (kg/ha), depth = 50 (mm), type = NO3_N ()
           endif



           if (day = 107) then
               fertiliser apply amount = 1 (kg/ha), depth = 50 (mm), type = NO3_N ()
           endif



           if (day = 110) then
               fertiliser apply amount = 50 (kg/ha), depth = 50 (mm), type = NO3_N ()
           endif



           if (day = 111) then
               fertiliser apply amount = 2 (kg/ha), depth = 50 (mm), type = NO3_N ()
           endif



           if (day = 115) then
               fertiliser apply amount = 3 (kg/ha), depth = 50 (mm), type = NO3_N ()
           endif



           if (day = 118) then
               fertiliser apply amount = 3 (kg/ha), depth = 50 (mm), type = NO3_N ()
           endif



           if (day = 123) then
               fertiliser apply amount = 2 (kg/ha), depth = 50 (mm), type = NO3_N ()
           endif
```
  simulation Wheat_FACE95_LowNHighCO2
    clock
      start_date = 15/12/1995  # Select the start date of the simulation
      end_date = 18/05/1996  # Select the end date of the simulation
    summaryfile: filename=Wheat_FACE95_LowNHighCO2.sum
    metfile met: filename=FACE95.met
    area paddock
      registrations global
      outputfile: filename=Wheat_FACE95_LowNHighCO2.out
        outputfiledescription DailyVariables -> DailyVariables
      manager: same as Wheat_APS26_DryN000.paddock.Manager
      soil FACEField: same as Wheat_FACE95_HighNNormalCO2.paddock.FACEField
      wheat
      irrigation
        automatic_irrigation = off  # switch
        asw_depth = 600.0  # Depth to which ASW is calculated. (mm)
        crit_fr_asw = 0.9  # Fraction of ASW below which irrigation is applied (0-1.0)
        irrigation_efficiency = 1.0  # Efficiency of the irrigation. (0-1.0)
      logic Irrigator: same as Wheat_FACE95_LowNNormalCO2.paddock.Irrigator
      fertiliser
      logic Fertilizer: same as Wheat_FACE95_LowNNormalCO2.paddock.Fertilizer
  simulation Wheat_FACE95_HighNHighCO2
    clock
      start_date = 15/12/1995  # Select the start date of the simulation
      end_date = 18/05/1996  # Select the end date of the simulation
    summaryfile: filename=Wheat_FACE95_HighNHighCO2.sum
    metfile met: filename=FACE95.met
    area paddock
      registrations global
      outputfile: filename=Wheat_FACE95_HighNHighCO2.out
        outputfiledescription DailyVariables -> DailyVariables
      manager: same as Wheat_APS26_DryN000.paddock.Manager
      soil FACEField: Site=Maricopa RS; Region=USA; LocalName=Maricopa RS; SoilType=FACESoil; NearestTown=Unknown; NaturalVegetation=Unknown
        Water: Cona=2; DiffusConst=88; DiffusSlope=35; U=6; Salb=0.2; Cn2Bare=60; CnRed=20; CnCov=0.8
          layer:
            thickness  bd    ll15  airdry  dul   sat   sw     swcon
            50         1.31  0.2   0.03    0.32  0.42  0.296  0.34
            100        1.27  0.2   0.03    0.32  0.42  0.296  0.34
            150        1.27  0.2   0.03    0.32  0.42  0.296  0.34
            200        1.3   0.2   0.02    0.32  0.42  0.259  0.34
            100        1.47  0.2   0.01    0.32  0.39  0.233  0.34
            100        1.47  0.2   0.01    0.32  0.39  0.233  0.34
            200        1.57  0.19  0.01    0.3   0.36  0.175  0.3
            200        1.57  0.16  0       0.28  0.35  0.137  0.25
            100        1.57  0.16  0       0.28  0.35  0.143  0.25
            100        1.57  0.16  0       0.28  0.35  0.143  0.25
            200        1.57  0.14  0       0.25  0.34  0.141  0.2
            200        1.57  0.14  0       0.25  0.34  0.125  0.2
            200        1.57  0.13  0       0.24  0.33  0.103  0.18
            200        1.57  0.13  0       0.24  0.33  0.106  0.18
        Nitrogen: CnCanopyFact=0.8; RootCn=20; RootWt=1500; SoilCn=15; EnrACoeff=1.0; EnrBCoeff=1.0
          layer:
            oc    ph   fbiom  finert  no3   nh4
            0.41  8.5  0.04   0.31    5.75  2.26
            0.35  8.5  0.04   0.31    5.75  2.26
            0.27  8.5  0.03   0.31    8.7   2.37
            0.24  8.6  0.02   0.31    7.76  1.99
            0.16  8.6  0.01   0.31    7.76  1.99
            0.16  8.6  0.01   0.31    4.16  0.95
            0.3   8.6  0.01   0.25    4.16  0.95
            0.1   8.6  0.01   0.2     1.92  0.7
            0.1   8.6  0.01   0.2     1.92  0.7
            0.1   8.6  0.01   0.2     0.73  0.65
            0.1   8.6  0.01   0.2     0.73  0.65
            0.1   8.6  0.01   0.2     0.43  0.32
            0.1   8.6  0.01   0.17    0.53  0.42
            0.1   8.6  0.01   0.17    0.53  0.42
        InitWater
          sw=[0.296, 0.296, 0.296, 0.259, 0.233, 0.233, 0.175, 0.137, 0.143, 0.143, 0.141, 0.125, 0.103, 0.106]
        InitNitrogen
          layer:
            no3   nh4
            5.75  2.26
            5.75  2.26
            8.7   2.37
            7.76  1.99
            7.76  1.99
            4.16  0.95
            4.16  0.95
            1.92  0.7
            1.92  0.7
            0.73  0.65
            0.73  0.65
            0.43  0.32
            0.53  0.42
            0.53  0.42
        SoilCrop Wheat: same as Wheat_FACE92_DryNormalCO2.paddock.FACEField.Wheat
      wheat
      irrigation
        automatic_irrigation = off  # switch
        asw_depth = 600.0  # Depth to which ASW is calculated. (mm)
        crit_fr_asw = 0.9  # Fraction of ASW below which irrigation is applied (0-1.0)
        irrigation_efficiency = 1.0  # Efficiency of the irrigation. (0-1.0)
      logic Irrigator: same as Wheat_FACE95_HighNNormalCO2.paddock.Irrigator
      fertiliser
      logic Fertilizer: same as Wheat_FACE95_HighNNormalCO2.paddock.Fertilizer
  simulation Wheat_FACE96_LowNNormalCO2
    clock
      start_date = 15/12/1996  # Select the start date of the simulation
      end_date = 30/05/1997  # Select the end date of the simulation
    summaryfile: filename=Wheat_FACE96_LowNNormalCO2.sum
    metfile met: filename=FACE96.met
    area paddock
      registrations global
      outputfile: filename=Wheat_FACE96_LowNNormalCO2.out
        outputfiledescription DailyVariables -> DailyVariables
      manager: same as Wheat_APS26_DryN000.paddock.Manager
      soil FACEField: Site=Maricopa RS; Region=USA; LocalName=Maricopa RS; SoilType=FACESoil; NearestTown=Unknown; NaturalVegetation=Unknown
        Water: Cona=2; DiffusConst=88; DiffusSlope=35; U=6; Salb=0.2; Cn2Bare=60; CnRed=20; CnCov=0.8
          layer:
            thickness  bd    ll15  airdry  dul   sat   sw     swcon
            50         1.31  0.2   0.03    0.32  0.42  0.267  0.34
            100        1.27  0.2   0.03    0.32  0.42  0.267  0.34
            150        1.27  0.2   0.03    0.32  0.42  0.267  0.34
            200        1.3   0.2   0.02    0.32  0.42  0.279  0.34
            100        1.47  0.2   0.01    0.32  0.39  0.273  0.34
            100        1.47  0.2   0.01    0.32  0.39  0.267  0.34
            200        1.57  0.19  0.01    0.3   0.36  0.188  0.3
            200        1.57  0.16  0       0.28  0.35  0.176  0.25
            100        1.57  0.16  0       0.28  0.35  0.185  0.25
            100        1.57  0.16  0       0.28  0.35  0.195  0.25
            200        1.57  0.14  0       0.25  0.34  0.197  0.2
            200        1.57  0.14  0       0.25  0.34  0.18   0.2
            200        1.57  0.13  0       0.24  0.33  0.175  0.18
            200        1.57  0.13  0       0.24  0.33  0.183  0.18
        Nitrogen: CnCanopyFact=0.8; RootCn=20; RootWt=1500; SoilCn=15; EnrACoeff=1.0; EnrBCoeff=1.0
          layer:
            oc    ph   fbiom  finert  no3   nh4
            0.41  8.5  0.04   0.31    1.68  0.2
            0.35  8.5  0.04   0.31    1.68  0.2
            0.27  8.5  0.03   0.31    0.69  0.14
            0.24  8.6  0.02   0.31    0.68  0.15
            0.16  8.6  0.01   0.31    0.47  0.11
            0.16  8.6  0.01   0.31    0.35  0.07
            0.3   8.6  0.01   0.25    0.22  0.04
            0.1   8.6  0.01   0.2     0.27  0.03
            0.1   8.6  0.01   0.2     0.32  0.03
            0.1   8.6  0.01   0.2     0.32  0.03
            0.1   8.6  0.01   0.2     0.32  0.03
            0.1   8.6  0.01   0.2     0.32  0.03
            0.1   8.6  0.01   0.17    0.32  0.03
            0.1   8.6  0.01   0.17    0.32  0.03
        InitWater
          sw=[0.267, 0.267, 0.267, 0.279, 0.273, 0.267, 0.188, 0.176, 0.185, 0.195, 0.197, 0.18, 0.175, 0.183]
        InitNitrogen
          layer:
            no3   nh4
            1.68  0.2
            1.68  0.2
            0.69  0.14
            0.68  0.15
            0.47  0.11
            0.35  0.07
            0.22  0.04
            0.27  0.03
            0.32  0.03
            0.32  0.03
            0.32  0.03
            0.32  0.03
            0.32  0.03
            0.32  0.03
        SoilCrop Wheat: same as Wheat_FACE92_DryNormalCO2.paddock.FACEField.Wheat
      wheat
      irrigation
        automatic_irrigation = off  # switch
        asw_depth = 600.0  # Depth to which ASW is calculated. (mm)
        crit_fr_asw = 0.9  # Fraction of ASW below which irrigation is applied (0-1.0)
        irrigation_efficiency = 1.0  # Efficiency of the irrigation. (0-1.0)
      logic Irrigator
        on startofday:
```
           if (day = 93) then
               irrigation apply amount = 42 (mm)
           endif



           if (day = 364) then
               irrigation apply amount = 30 (mm)
           endif



           if (day = 30) then
               irrigation apply amount = 25 (mm)
           endif



           if (day = 50) then
               irrigation apply amount = 40 (mm)
           endif



           if (day = 64) then
               irrigation apply amount = 35 (mm)
           endif



           if (day = 72) then
               irrigation apply amount = 40 (mm)
           endif



           if (day = 77) then
               irrigation apply amount = 30 (mm)
           endif



           if (day = 86) then
               irrigation apply amount = 66 (mm)
           endif



           if (day = 97) then
               irrigation apply amount = 22 (mm)
           endif



           if (day = 102) then
               irrigation apply amount = 43 (mm)
           endif



           if (day = 107) then
               irrigation apply amount = 38 (mm)
           endif



           if (day = 112) then
               irrigation apply amount = 44 (mm)
           endif



           if (day = 119) then
               irrigation apply amount = 60 (mm)
           endif



           if (day = 123) then
               irrigation apply amount = 30 (mm)
           endif



           if (day = 129) then
               irrigation apply amount = 3 (mm)
           endif
```
      fertiliser
      logic Fertilizer
        on startofday:
```
           if (day = 350) then
               fertiliser apply amount = 22 (kg/ha), depth = 50 (mm), type = NO3_N ()
           endif



           if (day = 363) then
               fertiliser apply amount = 5 (kg/ha), depth = 50 (mm), type = NO3_N ()
           endif



           if (day = 30) then
               fertiliser apply amount = 2 (kg/ha), depth = 50 (mm), type = NO3_N ()
           endif



           if (day = 31) then
               fertiliser apply amount = 50 (kg/ha), depth = 50 (mm), type = NO3_N ()
           endif



           if (day = 50) then
               fertiliser apply amount = 0 (kg/ha), depth = 50 (mm), type = NO3_N ()
           endif



           if (day = 63) then
               fertiliser apply amount = 2 (kg/ha), depth = 50 (mm), type = NO3_N ()
           endif



           if (day = 71) then
               fertiliser apply amount = 2 (kg/ha), depth = 50 (mm), type = NO3_N ()
           endif



           if (day = 76) then
               fertiliser apply amount = 0 (kg/ha), depth = 50 (mm), type = NO3_N ()
           endif



           if (day = 85) then
               fertiliser apply amount = 2 (kg/ha), depth = 50 (mm), type = NO3_N ()
           endif



           if (day = 91) then
               fertiliser apply amount = 3 (kg/ha), depth = 50 (mm), type = NO3_N ()
           endif



           if (day = 96) then
               fertiliser apply amount = 2 (kg/ha), depth = 50 (mm), type = NO3_N ()
           endif



           if (day = 101) then
               fertiliser apply amount = 3 (kg/ha), depth = 50 (mm), type = NO3_N ()
           endif



           if (day = 106) then
               fertiliser apply amount = 6 (kg/ha), depth = 50 (mm), type = NO3_N ()
           endif



           if (day = 111) then
               fertiliser apply amount = 3 (kg/ha), depth = 50 (mm), type = NO3_N ()
           endif



           if (day = 118) then
               fertiliser apply amount = 5 (kg/ha), depth = 50 (mm), type = NO3_N ()
           endif



           if (day = 123) then
               fertiliser apply amount = 2 (kg/ha), depth = 50 (mm), type = NO3_N ()
           endif



           if (day = 129) then
               fertiliser apply amount = 0 (kg/ha), depth = 50 (mm), type = NO3_N ()
           endif
```
  simulation Wheat_FACE96_HighNNormalCO2
    clock
      start_date = 15/12/1996  # Select the start date of the simulation
      end_date = 30/05/1997  # Select the end date of the simulation
    summaryfile: filename=Wheat_FACE96_HighNNormalCO2.sum
    metfile met: filename=FACE96.met
    area paddock
      registrations global
      outputfile: filename=Wheat_FACE96_HighNNormalCO2.out
        outputfiledescription DailyVariables -> DailyVariables
      manager: same as Wheat_APS26_DryN000.paddock.Manager
      soil FACEField: Site=Maricopa RS; Region=USA; LocalName=Maricopa RS; SoilType=FACESoil; NearestTown=Unknown; NaturalVegetation=Unknown
        Water: Cona=2; DiffusConst=88; DiffusSlope=35; U=6; Salb=0.2; Cn2Bare=60; CnRed=20; CnCov=0.8
          layer:
            thickness  bd    ll15  airdry  dul   sat   sw     swcon
            50         1.31  0.2   0.03    0.32  0.42  0.266  0.34
            100        1.27  0.2   0.03    0.32  0.42  0.266  0.34
            150        1.27  0.2   0.03    0.32  0.42  0.266  0.34
            200        1.3   0.2   0.02    0.32  0.42  0.28   0.34
            100        1.47  0.2   0.01    0.32  0.39  0.264  0.34
            100        1.47  0.2   0.01    0.32  0.39  0.247  0.34
            200        1.57  0.19  0.01    0.3   0.36  0.209  0.3
            200        1.57  0.16  0       0.28  0.35  0.194  0.25
            100        1.57  0.16  0       0.28  0.35  0.193  0.25
            100        1.57  0.16  0       0.28  0.35  0.192  0.25
            200        1.57  0.14  0       0.25  0.34  0.19   0.2
            200        1.57  0.14  0       0.25  0.34  0.19   0.2
            200        1.57  0.13  0       0.24  0.33  0.173  0.18
            200        1.57  0.13  0       0.24  0.33  0.178  0.18
        Nitrogen: CnCanopyFact=0.8; RootCn=20; RootWt=1500; SoilCn=15; EnrACoeff=1.0; EnrBCoeff=1.0
          layer:
            oc    ph   fbiom  finert  no3   nh4
            0.41  8.5  0.04   0.31    5.81  0.19
            0.35  8.5  0.04   0.31    5.81  0.19
            0.27  8.5  0.03   0.31    1.36  0.21
            0.24  8.6  0.02   0.31    1.05  0.17
            0.16  8.6  0.01   0.31    0.42  0.11
            0.16  8.6  0.01   0.31    0.39  0.09
            0.3   8.6  0.01   0.25    0.37  0.07
            0.1   8.6  0.01   0.2     0.41  0.07
            0.1   8.6  0.01   0.2     0.46  0.07
            0.1   8.6  0.01   0.2     0.46  0.07
            0.1   8.6  0.01   0.2     0.46  0.07
            0.1   8.6  0.01   0.2     0.46  0.07
            0.1   8.6  0.01   0.17    0.46  0.07
            0.1   8.6  0.01   0.17    0.46  0.07
        InitWater
          sw=[0.266, 0.266, 0.266, 0.28, 0.264, 0.247, 0.209, 0.194, 0.193, 0.192, 0.19, 0.19, 0.173, 0.178]
        InitNitrogen
          layer:
            no3   nh4
            5.81  0.19
            5.81  0.19
            1.36  0.21
            1.05  0.17
            0.42  0.11
            0.39  0.09
            0.37  0.07
            0.41  0.07
            0.46  0.07
            0.46  0.07
            0.46  0.07
            0.46  0.07
            0.46  0.07
            0.46  0.07
        SoilCrop Wheat: same as Wheat_FACE92_DryNormalCO2.paddock.FACEField.Wheat
      wheat
      irrigation
        automatic_irrigation = off  # switch
        asw_depth = 600.0  # Depth to which ASW is calculated. (mm)
        crit_fr_asw = 0.9  # Fraction of ASW below which irrigation is applied (0-1.0)
        irrigation_efficiency = 1.0  # Efficiency of the irrigation. (0-1.0)
      logic Irrigator
        on startofday:
```
           if (day = 93) then
               irrigation apply amount = 42 (mm)
           endif



           if (day = 364) then
               irrigation apply amount = 30 (mm)
           endif



           if (day = 30) then
               irrigation apply amount = 25 (mm)
           endif



           if (day = 50) then
               irrigation apply amount = 40 (mm)
           endif



           if (day = 64) then
               irrigation apply amount = 35 (mm)
           endif



           if (day = 72) then
               irrigation apply amount = 40 (mm)
           endif



           if (day = 77) then
               irrigation apply amount = 30 (mm)
           endif



           if (day = 86) then
               irrigation apply amount = 66 (mm)
           endif



           if (day = 97) then
               irrigation apply amount = 22 (mm)
           endif



           if (day = 102) then
               irrigation apply amount = 43 (mm)
           endif



           if (day = 107) then
               irrigation apply amount = 38 (mm)
           endif



           if (day = 112) then
               irrigation apply amount = 44 (mm)
           endif



           if (day = 119) then
               irrigation apply amount = 60 (mm)
           endif



           if (day = 123) then
               irrigation apply amount = 68 (mm)
           endif



           if (day = 128) then
               irrigation apply amount = 35 (mm)
           endif



           if (day = 129) then
               irrigation apply amount = 3 (mm)
           endif
```
      fertiliser
      logic Fertilizer
        on startofday:
```
           if (day = 350) then
               fertiliser apply amount = 22 (kg/ha), depth = 50 (mm), type = NO3_N ()
           endif



           if (day = 363) then
               fertiliser apply amount = 5 (kg/ha), depth = 50 (mm), type = NO3_N ()
           endif



           if (day = 30) then
               fertiliser apply amount = 2 (kg/ha), depth = 50 (mm), type = NO3_N ()
           endif



           if (day = 50) then
               fertiliser apply amount = 0 (kg/ha), depth = 50 (mm), type = NO3_N ()
           endif



           if (day = 63) then
               fertiliser apply amount = 2 (kg/ha), depth = 50 (mm), type = NO3_N ()
           endif



           if (day = 71) then
               fertiliser apply amount = 2 (kg/ha), depth = 50 (mm), type = NO3_N ()
           endif



           if (day = 76) then
               fertiliser apply amount = 0 (kg/ha), depth = 50 (mm), type = NO3_N ()
           endif



           if (day = 85) then
               fertiliser apply amount = 2 (kg/ha), depth = 50 (mm), type = NO3_N ()
           endif



           if (day = 91) then
               fertiliser apply amount = 3 (kg/ha), depth = 50 (mm), type = NO3_N ()
           endif



           if (day = 96) then
               fertiliser apply amount = 2 (kg/ha), depth = 50 (mm), type = NO3_N ()
           endif



           if (day = 101) then
               fertiliser apply amount = 3 (kg/ha), depth = 50 (mm), type = NO3_N ()
           endif



           if (day = 106) then
               fertiliser apply amount = 6 (kg/ha), depth = 50 (mm), type = NO3_N ()
           endif



           if (day = 111) then
               fertiliser apply amount = 3 (kg/ha), depth = 50 (mm), type = NO3_N ()
           endif



           if (day = 118) then
               fertiliser apply amount = 5 (kg/ha), depth = 50 (mm), type = NO3_N ()
           endif



           if (day = 123) then
               fertiliser apply amount = 5 (kg/ha), depth = 50 (mm), type = NO3_N ()
           endif



           if (day = 128) then
               fertiliser apply amount = 3 (kg/ha), depth = 50 (mm), type = NO3_N ()
           endif



           if (day = 129) then
               fertiliser apply amount = 0 (kg/ha), depth = 50 (mm), type = NO3_N ()
           endif
```
  simulation Wheat_FACE96_LowNHighCO2
    clock
      start_date = 15/12/1996  # Select the start date of the simulation
      end_date = 30/05/1997  # Select the end date of the simulation
    summaryfile: filename=Wheat_FACE96_LowNHighCO2.sum
    metfile met: filename=FACE96.met
    area paddock
      registrations global
      outputfile: filename=Wheat_FACE96_LowNHighCO2.out
        outputfiledescription DailyVariables -> DailyVariables
      manager: same as Wheat_APS26_DryN000.paddock.Manager
      soil FACEField: Site=Maricopa RS; Region=USA; LocalName=Maricopa RS; SoilType=FACESoil; NearestTown=Unknown; NaturalVegetation=Unknown
        Water: Cona=2; DiffusConst=88; DiffusSlope=35; U=6; Salb=0.2; Cn2Bare=60; CnRed=20; CnCov=0.8
          layer:
            thickness  bd    ll15  airdry  dul   sat   sw     swcon
            50         1.31  0.2   0.03    0.32  0.42  0.268  0.34
            100        1.27  0.2   0.03    0.32  0.42  0.268  0.34
            150        1.27  0.2   0.03    0.32  0.42  0.268  0.34
            200        1.3   0.2   0.02    0.32  0.42  0.279  0.34
            100        1.47  0.2   0.01    0.32  0.39  0.269  0.34
            100        1.47  0.2   0.01    0.32  0.39  0.259  0.34
            200        1.57  0.19  0.01    0.3   0.36  0.212  0.3
            200        1.57  0.16  0       0.28  0.35  0.162  0.25
            100        1.57  0.16  0       0.28  0.35  0.156  0.25
            100        1.57  0.16  0       0.28  0.35  0.15   0.25
            200        1.57  0.14  0       0.25  0.34  0.145  0.2
            200        1.57  0.14  0       0.25  0.34  0.144  0.2
            200        1.57  0.13  0       0.24  0.33  0.159  0.18
            200        1.57  0.13  0       0.24  0.33  0.169  0.18
        Nitrogen: CnCanopyFact=0.8; RootCn=20; RootWt=1500; SoilCn=15; EnrACoeff=1.0; EnrBCoeff=1.0
          layer:
            oc    ph   fbiom  finert  no3   nh4
            0.41  8.5  0.04   0.31    5.22  0.29
            0.35  8.5  0.04   0.31    5.22  0.29
            0.27  8.5  0.03   0.31    0.84  0.16
            0.24  8.6  0.02   0.31    0.96  0.17
            0.16  8.6  0.01   0.31    0.43  0.15
            0.16  8.6  0.01   0.31    0.34  0.09
            0.3   8.6  0.01   0.25    0.25  0.04
            0.1   8.6  0.01   0.2     0.26  0.02
            0.1   8.6  0.01   0.2     0.27  0.01
            0.1   8.6  0.01   0.2     0.27  0.01
            0.1   8.6  0.01   0.2     0.27  0.01
            0.1   8.6  0.01   0.2     0.27  0.01
            0.1   8.6  0.01   0.17    0.27  0.01
            0.1   8.6  0.01   0.17    0.27  0.01
        InitWater
          sw=[0.268, 0.268, 0.268, 0.279, 0.269, 0.259, 0.212, 0.162, 0.156, 0.15, 0.145, 0.144, 0.159, 0.169]
        InitNitrogen
          layer:
            no3   nh4
            5.22  0.29
            5.22  0.29
            0.84  0.16
            0.96  0.17
            0.43  0.15
            0.34  0.09
            0.25  0.04
            0.26  0.02
            0.27  0.01
            0.27  0.01
            0.27  0.01
            0.27  0.01
            0.27  0.01
            0.27  0.01
        SoilCrop Wheat: same as Wheat_FACE92_DryNormalCO2.paddock.FACEField.Wheat
      wheat
      irrigation
        automatic_irrigation = off  # switch
        asw_depth = 600.0  # Depth to which ASW is calculated. (mm)
        crit_fr_asw = 0.9  # Fraction of ASW below which irrigation is applied (0-1.0)
        irrigation_efficiency = 1.0  # Efficiency of the irrigation. (0-1.0)
      logic Irrigator: same as Wheat_FACE96_LowNNormalCO2.paddock.Irrigator
      fertiliser
      logic Fertilizer
        on startofday:
```
           if (day = 350) then
               fertiliser apply amount = 22 (kg/ha), depth = 50 (mm), type = NO3_N ()
           endif



           if (day = 363) then
               fertiliser apply amount = 5 (kg/ha), depth = 50 (mm), type = NO3_N ()
           endif



           if (day = 30) then
               fertiliser apply amount = 2 (kg/ha), depth = 50 (mm), type = NO3_N ()
           endif



           if (day = 50) then
               fertiliser apply amount = 0 (kg/ha), depth = 50 (mm), type = NO3_N ()
           endif



           if (day = 63) then
               fertiliser apply amount = 2 (kg/ha), depth = 50 (mm), type = NO3_N ()
           endif



           if (day = 71) then
               fertiliser apply amount = 2 (kg/ha), depth = 50 (mm), type = NO3_N ()
           endif



           if (day = 76) then
               fertiliser apply amount = 0 (kg/ha), depth = 50 (mm), type = NO3_N ()
           endif



           if (day = 85) then
               fertiliser apply amount = 2 (kg/ha), depth = 50 (mm), type = NO3_N ()
           endif



           if (day = 91) then
               fertiliser apply amount = 3 (kg/ha), depth = 50 (mm), type = NO3_N ()
           endif



           if (day = 96) then
               fertiliser apply amount = 2 (kg/ha), depth = 50 (mm), type = NO3_N ()
           endif



           if (day = 101) then
               fertiliser apply amount = 3 (kg/ha), depth = 50 (mm), type = NO3_N ()
           endif



           if (day = 106) then
               fertiliser apply amount = 6 (kg/ha), depth = 50 (mm), type = NO3_N ()
           endif



           if (day = 111) then
               fertiliser apply amount = 3 (kg/ha), depth = 50 (mm), type = NO3_N ()
           endif



           if (day = 118) then
               fertiliser apply amount = 5 (kg/ha), depth = 50 (mm), type = NO3_N ()
           endif



           if (day = 123) then
               fertiliser apply amount = 2 (kg/ha), depth = 50 (mm), type = NO3_N ()
           endif



           if (day = 129) then
               fertiliser apply amount = 0 (kg/ha), depth = 50 (mm), type = NO3_N ()
           endif
```
  simulation Wheat_FACE96_HighNHighCO2
    clock
      start_date = 15/12/1996  # Select the start date of the simulation
      end_date = 30/05/1997  # Select the end date of the simulation
    summaryfile: filename=Wheat_FACE96_HighNHighCO2.sum
    metfile met: filename=FACE96.met
    area paddock
      registrations global
      outputfile: filename=Wheat_FACE96_HighNHighCO2.out
        outputfiledescription DailyVariables -> DailyVariables
      manager: same as Wheat_APS26_DryN000.paddock.Manager
      soil FACEField: Site=Maricopa RS; Region=USA; LocalName=Maricopa RS; SoilType=FACESoil; NearestTown=Unknown; NaturalVegetation=Unknown
        Water: Cona=2; DiffusConst=88; DiffusSlope=35; U=6; Salb=0.2; Cn2Bare=60; CnRed=20; CnCov=0.8
          layer:
            thickness  bd    ll15  airdry  dul   sat   sw     swcon
            50         1.31  0.2   0.03    0.32  0.42  0.273  0.34
            100        1.27  0.2   0.03    0.32  0.42  0.273  0.34
            150        1.27  0.2   0.03    0.32  0.42  0.273  0.34
            200        1.3   0.2   0.02    0.32  0.42  0.276  0.34
            100        1.47  0.2   0.01    0.32  0.39  0.261  0.34
            100        1.47  0.2   0.01    0.32  0.39  0.246  0.34
            200        1.57  0.19  0.01    0.3   0.36  0.209  0.3
            200        1.57  0.16  0       0.28  0.35  0.193  0.25
            100        1.57  0.16  0       0.28  0.35  0.181  0.25
            100        1.57  0.16  0       0.28  0.35  0.17   0.25
            200        1.57  0.14  0       0.25  0.34  0.17   0.2
            200        1.57  0.14  0       0.25  0.34  0.186  0.2
            200        1.57  0.13  0       0.24  0.33  0.171  0.18
            200        1.57  0.13  0       0.24  0.33  0.18   0.18
        Nitrogen: CnCanopyFact=0.8; RootCn=20; RootWt=1500; SoilCn=15; EnrACoeff=1.0; EnrBCoeff=1.0
          layer:
            oc    ph   fbiom  finert  no3   nh4
            0.41  8.5  0.04   0.31    4.2   0.18
            0.35  8.5  0.04   0.31    4.2   0.18
            0.27  8.5  0.03   0.31    1.05  0.18
            0.24  8.6  0.02   0.31    2.03  0.18
            0.16  8.6  0.01   0.31    0.7   0.11
            0.16  8.6  0.01   0.31    0.66  0.1
            0.3   8.6  0.01   0.25    0.62  0.08
            0.1   8.6  0.01   0.2     0.53  0.1
            0.1   8.6  0.01   0.2     0.44  0.12
            0.1   8.6  0.01   0.2     0.44  0.12
            0.1   8.6  0.01   0.2     0.44  0.12
            0.1   8.6  0.01   0.2     0.44  0.12
            0.1   8.6  0.01   0.17    0.44  0.12
            0.1   8.6  0.01   0.17    0.44  0.12
        InitWater
          sw=[0.273, 0.273, 0.273, 0.276, 0.261, 0.246, 0.209, 0.193, 0.181, 0.17, 0.17, 0.186, 0.171, 0.18]
        InitNitrogen
          layer:
            no3   nh4
            4.2   0.18
            4.2   0.18
            1.05  0.18
            2.03  0.18
            0.7   0.11
            0.66  0.1
            0.62  0.08
            0.53  0.1
            0.44  0.12
            0.44  0.12
            0.44  0.12
            0.44  0.12
            0.44  0.12
            0.44  0.12
        SoilCrop Wheat: same as Wheat_FACE92_DryNormalCO2.paddock.FACEField.Wheat
      wheat
      irrigation
        automatic_irrigation = off  # switch
        asw_depth = 600.0  # Depth to which ASW is calculated. (mm)
        crit_fr_asw = 0.9  # Fraction of ASW below which irrigation is applied (0-1.0)
        irrigation_efficiency = 1.0  # Efficiency of the irrigation. (0-1.0)
      logic Irrigator: same as Wheat_FACE96_HighNNormalCO2.paddock.Irrigator
      fertiliser
      logic Fertilizer
        on startofday:
```
           if (day = 350) then
               fertiliser apply amount = 22 (kg/ha), depth = 50 (mm), type = NO3_N ()
           endif



           if (day = 363) then
               fertiliser apply amount = 5 (kg/ha), depth = 50 (mm), type = NO3_N ()
           endif



           if (day = 30) then
               fertiliser apply amount = 2 (kg/ha), depth = 50 (mm), type = NO3_N ()
           endif



           if (day = 50) then
               fertiliser apply amount = 0 (kg/ha), depth = 50 (mm), type = NO3_N ()
           endif



           if (day = 63) then
               fertiliser apply amount = 2 (kg/ha), depth = 50 (mm), type = NO3_N ()
           endif



           if (day = 71) then
               fertiliser apply amount = 2 (kg/ha), depth = 50 (mm), type = NO3_N ()
           endif



           if (day = 76) then
               fertiliser apply amount = 125 (kg/ha), depth = 50 (mm), type = NO3_N ()
           endif



           if (day = 85) then
               fertiliser apply amount = 2 (kg/ha), depth = 50 (mm), type = NO3_N ()
           endif



           if (day = 91) then
               fertiliser apply amount = 3 (kg/ha), depth = 50 (mm), type = NO3_N ()
           endif



           if (day = 96) then
               fertiliser apply amount = 2 (kg/ha), depth = 50 (mm), type = NO3_N ()
           endif



           if (day = 101) then
               fertiliser apply amount = 3 (kg/ha), depth = 50 (mm), type = NO3_N ()
           endif



           if (day = 106) then
               fertiliser apply amount = 50 (kg/ha), depth = 50 (mm), type = NO3_N ()
           endif



           if (day = 111) then
               fertiliser apply amount = 3 (kg/ha), depth = 50 (mm), type = NO3_N ()
           endif



           if (day = 118) then
               fertiliser apply amount = 5 (kg/ha), depth = 50 (mm), type = NO3_N ()
           endif



           if (day = 123) then
               fertiliser apply amount = 5 (kg/ha), depth = 50 (mm), type = NO3_N ()
           endif



           if (day = 128) then
               fertiliser apply amount = 3 (kg/ha), depth = 50 (mm), type = NO3_N ()
           endif



           if (day = 129) then
               fertiliser apply amount = 0 (kg/ha), depth = 50 (mm), type = NO3_N ()
           endif
```
  simulation Wheat_Beverly90_Early
    clock
      start_date = 1/05/1990  # Select the start date of the simulation
      end_date = 30/11/1990  # Select the end date of the simulation
    summaryfile: filename=Wheat_Beverly90_Early.sum
    metfile met: filename=Beverly90.met
    area paddock
      registrations global
      outputfile: filename=Wheat_Beverly90_Early.out
        outputfiledescription DailyVariables -> DailyVariables
      manager: same as Wheat_APS26_DryN000.paddock.Manager
      soil BeverlyField: Site=Beverly; Region=WA; LocalName=Beverly; SoilType=BeverlySoil; NearestTown=Unknown; NaturalVegetation=Unknown
        Water: Cona=2; DiffusConst=88; DiffusSlope=35; U=6; Salb=0.13; Cn2Bare=60; CnRed=20; CnCov=0.8
          layer:
            thickness  bd    ll15  airdry  dul   sat   sw    swcon  mwcon
            100        1.7   0.05  0.03    0.16  0.29  0.12  1      1.00
            100        1.75  0.04  0.03    0.21  0.29  0.15  1      1.00
            100        1.8   0.06  0.04    0.21  0.29  0.18  1      1.00
            100        1.85  0.1   0.04    0.22  0.29  0.2   1      1.00
            100        1.85  0.13  0.04    0.22  0.28  0.2   0.11   0.00
            100        1.85  0.14  0.04    0.22  0.24  0.21  1      1.00
            100        1.85  0.17  0.04    0.22  0.24  0.22  1      1.00
            200        1.85  0.17  0.04    0.22  0.24  0.22  1      1.00
            200        1.85  0.17  0.04    0.21  0.24  0.21  1      1.00
            200        1.85  0.17  0.04    0.19  0.24  0.19  1      1.00
        Nitrogen: CnCanopyFact=0.8; RootCn=20; RootWt=1500; SoilCn=13; EnrACoeff=1.0; EnrBCoeff=1.0
          layer:
            fbiom  finert  oc    ph
            0.04   0.1     0.81  4.7
            0.03   0.1     0.26  4.7
            0.02   0.2     0.10  4.7
            0.01   0.8     0.10  6.0
            0.01   0.9     0.10  6.0
            0.01   0.9     0.10  6.0
            0.01   0.9     0.10  6.0
            0.01   0.9     0.10  6.0
            0.01   0.9     0.10  6.0
            0.01   0.9     0.10  6.0
        InitWater
          sw=[0.12, 0.15, 0.18, 0.2, 0.2, 0.21, 0.22, 0.22, 0.21, 0.19]
        InitNitrogen
          layer:
            no3    nh4
            4.000  4.000
            1.000  0.000
            1.000  0.000
            0.500  0.000
            0.500  0.000
            0.500  0.000
            0.500  0.000
            0.500  0.000
            0.500  0.000
            0.500  0.000
        SoilCrop Wheat
          layer:
            ll    kl    xf
            0.05  0.06  0.2
            0.04  0.06  0.2
            0.06  0.06  0.4
            0.06  0.06  0.4
            0.13  0.06  0.4
            0.14  0.06  0.2
            0.17  0.06  0.2
            0.17  0.06  0.2
            0.17  0.06  0.2
            0.17  0.06  0
      wheat
      irrigation
        automatic_irrigation = off  # switch
        asw_depth = 600.0  # Depth to which ASW is calculated. (mm)
        crit_fr_asw = 0.9  # Fraction of ASW below which irrigation is applied (0-1.0)
        irrigation_efficiency = 1.0  # Efficiency of the irrigation. (0-1.0)
      logic Irrigator
      fertiliser
      logic Fertilizer
        on startofday:
```
           if (day = 150) then
               fertiliser apply amount = 30 (kg/ha), depth = 50 (mm), type = NO3_N ()
           endif



           if (day = 198) then
               fertiliser apply amount = 30 (kg/ha), depth = 50 (mm), type = NO3_N ()
           endif
```
  simulation Wheat_Beverly90_Late
    clock
      start_date = 1/05/1990  # Select the start date of the simulation
      end_date = 30/11/1990  # Select the end date of the simulation
    summaryfile: filename=Wheat_Beverly90_Late.sum
    metfile met: filename=Beverly90.met
    area paddock
      registrations global
      outputfile: filename=Wheat_Beverly90_Late.out
        outputfiledescription DailyVariables -> DailyVariables
      manager: same as Wheat_APS26_DryN000.paddock.Manager
      soil BeverlyField: Site=Beverly; Region=WA; LocalName=Beverly; SoilType=BeverlySoil; NearestTown=Unknown; NaturalVegetation=Unknown
        Water: same as Wheat_Beverly90_Early.paddock.BeverlyField.Water
        Nitrogen: same as Wheat_Beverly90_Early.paddock.BeverlyField.Nitrogen
        other
        InitWater
          sw=[0.12, 0.15, 0.18, 0.2, 0.2, 0.21, 0.22, 0.22, 0.21, 0.19]
        InitNitrogen
          layer:
            no3    nh4
            4.000  4.000
            1.000  0.000
            1.000  0.000
            0.500  0.000
            0.500  0.000
            0.500  0.000
            0.500  0.000
            0.500  0.000
            0.500  0.000
            0.500  0.000
        SoilCrop Wheat: same as Wheat_Beverly90_Early.paddock.BeverlyField.Wheat
      wheat
      irrigation
        automatic_irrigation = off  # switch
        asw_depth = 600.0  # Depth to which ASW is calculated. (mm)
        crit_fr_asw = 0.9  # Fraction of ASW below which irrigation is applied (0-1.0)
        irrigation_efficiency = 1.0  # Efficiency of the irrigation. (0-1.0)
      logic Irrigator
      fertiliser
      logic Fertilizer
        on startofday:
```
           if (day = 165) then
               fertiliser apply amount = 30 (kg/ha), depth = 50 (mm), type = NO3_N ()
           endif



           if (day = 198) then
               fertiliser apply amount = 30 (kg/ha), depth = 50 (mm), type = NO3_N ()
           endif
```
  simulation Wheat_Beverly90_n15
    clock
      start_date = 1/05/1990  # Select the start date of the simulation
      end_date = 30/11/1990  # Select the end date of the simulation
    summaryfile: filename=Wheat_Beverly90_n15.sum
    metfile met: filename=Beverly90.met
    area paddock
      registrations global
      outputfile: filename=Wheat_Beverly90_n15.out
        outputfiledescription DailyVariables -> DailyVariables
      manager: same as Wheat_APS26_DryN000.paddock.Manager
      soil BeverlyField: Site=Beverly; Region=WA; LocalName=Beverly; SoilType=BeverlySoil; NearestTown=Unknown; NaturalVegetation=Unknown
        Water: Cona=2; DiffusConst=88; DiffusSlope=35; U=6; Salb=0.13; Cn2Bare=60; CnRed=20; CnCov=0.8
          layer:
            thickness  bd    ll15  airdry  dul   sat   sw    swcon
            100        1.7   0.05  0.03    0.16  0.29  0.12  1
            100        1.75  0.04  0.03    0.21  0.29  0.15  1
            100        1.8   0.06  0.04    0.21  0.29  0.18  1
            100        1.85  0.1   0.04    0.22  0.29  0.2   1
            100        1.85  0.13  0.04    0.22  0.28  0.2   0.11
            100        1.85  0.14  0.04    0.22  0.24  0.21  1
            100        1.85  0.17  0.04    0.22  0.24  0.22  1
            200        1.85  0.17  0.04    0.22  0.24  0.22  1
            200        1.85  0.17  0.04    0.21  0.24  0.21  1
            200        1.85  0.17  0.04    0.19  0.24  0.19  1
        Nitrogen: CnCanopyFact=0.8; RootCn=20; RootWt=1500; SoilCn=13; EnrACoeff=1.0; EnrBCoeff=1.0
        InitWater
          sw=[0.12, 0.15, 0.18, 0.2, 0.2, 0.21, 0.22, 0.22, 0.21, 0.19]
        SoilCrop Wheat: same as Wheat_Beverly90_Early.paddock.BeverlyField.Wheat
      wheat
      irrigation
        automatic_irrigation = off  # switch
        asw_depth = 600.0  # Depth to which ASW is calculated. (mm)
        crit_fr_asw = 0.9  # Fraction of ASW below which irrigation is applied (0-1.0)
        irrigation_efficiency = 1.0  # Efficiency of the irrigation. (0-1.0)
      logic Irrigator
      fertiliser
      logic Fertilizer
        on startofday:
```
           if (day = 152) then
               fertiliser apply amount = 8 (kg/ha), depth = 50 (mm), type = NO3_N ()
           endif



           if (day = 187) then
               fertiliser apply amount = 8 (kg/ha), depth = 50 (mm), type = NO3_N ()
           endif
```
  simulation Wheat_Beverly90_n30
    clock
      start_date = 1/05/1990  # Select the start date of the simulation
      end_date = 30/11/1990  # Select the end date of the simulation
    summaryfile: filename=Wheat_Beverly90_n30.sum
    metfile met: filename=Beverly90.met
    area paddock
      registrations global
      outputfile: filename=Wheat_Beverly90_n30.out
        outputfiledescription DailyVariables -> DailyVariables
      manager: same as Wheat_APS26_DryN000.paddock.Manager
      soil BeverlyField: same as Wheat_Beverly90_n15.paddock.BeverlyField
      wheat
      irrigation
        automatic_irrigation = off  # switch
        asw_depth = 600.0  # Depth to which ASW is calculated. (mm)
        crit_fr_asw = 0.9  # Fraction of ASW below which irrigation is applied (0-1.0)
        irrigation_efficiency = 1.0  # Efficiency of the irrigation. (0-1.0)
      logic Irrigator
      fertiliser
      logic Fertilizer
        on startofday:
```
           if (day = 152) then
               fertiliser apply amount = 15 (kg/ha), depth = 50 (mm), type = NO3_N ()
           endif



           if (day = 187) then
               fertiliser apply amount = 15 (kg/ha), depth = 50 (mm), type = NO3_N ()
           endif
```
  simulation Wheat_Beverly90_n60
    clock
      start_date = 1/05/1990  # Select the start date of the simulation
      end_date = 30/11/1990  # Select the end date of the simulation
    summaryfile: filename=Wheat_Beverly90_n60.sum
    metfile met: filename=Beverly90.met
    area paddock
      registrations global
      outputfile: filename=Wheat_Beverly90_n60.out
        outputfiledescription DailyVariables -> DailyVariables
      manager: same as Wheat_APS26_DryN000.paddock.Manager
      soil BeverlyField: same as Wheat_Beverly90_n15.paddock.BeverlyField
      wheat
      irrigation
        automatic_irrigation = off  # switch
        asw_depth = 600.0  # Depth to which ASW is calculated. (mm)
        crit_fr_asw = 0.9  # Fraction of ASW below which irrigation is applied (0-1.0)
        irrigation_efficiency = 1.0  # Efficiency of the irrigation. (0-1.0)
      logic Irrigator
      fertiliser
      logic Fertilizer
        on startofday:
```
           if (day = 152) then
               fertiliser apply amount = 30 (kg/ha), depth = 50 (mm), type = NO3_N ()
           endif



           if (day = 187) then
               fertiliser apply amount = 30 (kg/ha), depth = 50 (mm), type = NO3_N ()
           endif
```
  simulation Wheat_Beverly91_Early
    clock
      start_date = 1/05/1991  # Select the start date of the simulation
      end_date = 30/11/1991  # Select the end date of the simulation
    summaryfile: filename=Wheat_Beverly91_Early.sum
    metfile met: filename=Beverly91.met
    area paddock
      registrations global
      outputfile: filename=Wheat_Beverly91_Early.out
        outputfiledescription DailyVariables -> DailyVariables
      manager: same as Wheat_APS26_DryN000.paddock.Manager
      soil BeverlyField: Site=Beverly; Region=WA; LocalName=Beverly; SoilType=BeverlySoil; NearestTown=Unknown; NaturalVegetation=Unknown
        Water: Cona=2; DiffusConst=88; DiffusSlope=35; U=6; Salb=0.13; Cn2Bare=60; CnRed=20; CnCov=0.8
          layer:
            thickness  bd    ll15  airdry  dul   sat   sw    swcon
            100        1.7   0.05  0.03    0.16  0.29  0.03  1
            100        1.75  0.04  0.03    0.21  0.29  0.08  1
            100        1.8   0.06  0.04    0.21  0.29  0.1   1
            100        1.85  0.1   0.04    0.22  0.29  0.21  1
            100        1.85  0.13  0.04    0.22  0.28  0.18  0.11
            100        1.85  0.14  0.04    0.22  0.24  0.21  1
            100        1.85  0.17  0.04    0.22  0.24  0.22  1
            200        1.85  0.17  0.04    0.22  0.24  0.22  1
            200        1.85  0.17  0.04    0.21  0.24  0.21  1
            200        1.85  0.17  0.04    0.19  0.24  0.19  1
        Nitrogen: CnCanopyFact=0.8; RootCn=20; RootWt=1500; SoilCn=13; EnrACoeff=1.0; EnrBCoeff=1.0
        InitWater
          sw=[0.03, 0.08, 0.1, 0.21, 0.18, 0.21, 0.22, 0.22, 0.21, 0.19]
        SoilCrop Wheat: same as Wheat_Beverly90_Early.paddock.BeverlyField.Wheat
      wheat
      irrigation
        automatic_irrigation = off  # switch
        asw_depth = 600.0  # Depth to which ASW is calculated. (mm)
        crit_fr_asw = 0.9  # Fraction of ASW below which irrigation is applied (0-1.0)
        irrigation_efficiency = 1.0  # Efficiency of the irrigation. (0-1.0)
      logic Irrigator
      fertiliser
      logic Fertilizer
        on startofday:
```
           if (day = 157) then
               fertiliser apply amount = 50 (kg/ha), depth = 50 (mm), type = NO3_N ()
           endif



           if (day = 199) then
               fertiliser apply amount = 20 (kg/ha), depth = 50 (mm), type = NO3_N ()
           endif



           if (day = 221) then
               fertiliser apply amount = 20 (kg/ha), depth = 50 (mm), type = NO3_N ()
           endif
```
  simulation Wheat_Beverly91_Late
    clock
      start_date = 1/05/1991  # Select the start date of the simulation
      end_date = 30/11/1991  # Select the end date of the simulation
    summaryfile: filename=Wheat_Beverly91_Late.sum
    metfile met: filename=Beverly91.met
    area paddock
      registrations global
      outputfile: filename=Wheat_Beverly91_Late.out
        outputfiledescription DailyVariables -> DailyVariables
      manager: same as Wheat_APS26_DryN000.paddock.Manager
      soil BeverlyField: same as Wheat_Beverly91_Early.paddock.BeverlyField
      wheat
      irrigation
        automatic_irrigation = off  # switch
        asw_depth = 600.0  # Depth to which ASW is calculated. (mm)
        crit_fr_asw = 0.9  # Fraction of ASW below which irrigation is applied (0-1.0)
        irrigation_efficiency = 1.0  # Efficiency of the irrigation. (0-1.0)
      logic Irrigator
      fertiliser
      logic Fertilizer
        on startofday:
```
           if (day = 179) then
               fertiliser apply amount = 50 (kg/ha), depth = 50 (mm), type = NO3_N ()
           endif



           if (day = 221) then
               fertiliser apply amount = 40 (kg/ha), depth = 50 (mm), type = NO3_N ()
           endif
```
  simulation Wheat_Beverly92_Early(high)
    clock
      start_date = 29/04/1992  # Select the start date of the simulation
      end_date = 5/12/1992  # Select the end date of the simulation
    summaryfile: filename=Wheat_Beverly92_Early(high).sum
    metfile met: filename=Beverly92.met
    area paddock
      registrations global
      outputfile: filename=Wheat_Beverly92_Early(high).out
        outputfiledescription DailyVariables -> DailyVariables
      manager: same as Wheat_APS26_DryN000.paddock.Manager
      soil BeverlyField: Site=Beverly; Region=WA; LocalName=Beverly; SoilType=BeverlySoil; NearestTown=Unknown; NaturalVegetation=Unknown
        Water: Cona=2; DiffusConst=88; DiffusSlope=35; U=6; Salb=0.13; Cn2Bare=60; CnRed=20; CnCov=0.8
          layer:
            thickness  bd    ll15  airdry  dul   sat   sw    swcon
            100        1.7   0.05  0.03    0.16  0.29  0.12  1
            100        1.75  0.04  0.03    0.21  0.29  0.08  1
            100        1.8   0.06  0.04    0.21  0.29  0.09  1
            100        1.85  0.1   0.04    0.22  0.29  0.2   1
            100        1.85  0.13  0.04    0.22  0.28  0.2   0.11
            100        1.85  0.14  0.04    0.22  0.24  0.21  1
            100        1.85  0.17  0.04    0.22  0.24  0.21  1
            200        1.85  0.17  0.04    0.22  0.24  0.22  1
            200        1.85  0.17  0.04    0.21  0.24  0.22  1
            200        1.85  0.17  0.04    0.19  0.24  0.21  1
        Nitrogen: CnCanopyFact=0.8; RootCn=20; RootWt=1500; SoilCn=13; EnrACoeff=1.0; EnrBCoeff=1.0
        InitWater
          sw=[0.12, 0.08, 0.09, 0.2, 0.2, 0.21, 0.21, 0.22, 0.22, 0.21]
        SoilCrop Wheat: same as Wheat_Beverly90_Early.paddock.BeverlyField.Wheat
      wheat
      irrigation
        automatic_irrigation = off  # switch
        asw_depth = 600.0  # Depth to which ASW is calculated. (mm)
        crit_fr_asw = 0.9  # Fraction of ASW below which irrigation is applied (0-1.0)
        irrigation_efficiency = 1.0  # Efficiency of the irrigation. (0-1.0)
      logic Irrigator
      fertiliser
      logic Fertilizer
        on startofday:
```
           if (day = 121) then
               fertiliser apply amount = 20 (kg/ha), depth = 50 (mm), type = NO3_N ()
           endif



           if (day = 168) then
               fertiliser apply amount = 30 (kg/ha), depth = 50 (mm), type = NO3_N ()
           endif



           if (day = 202) then
               fertiliser apply amount = 30 (kg/ha), depth = 50 (mm), type = NO3_N ()
           endif
```
  simulation Wheat_Beverly92_Early(normal)
    clock
      start_date = 29/04/1992  # Select the start date of the simulation
      end_date = 5/12/1992  # Select the end date of the simulation
    summaryfile: filename=Wheat_Beverly92_Early(normal).sum
    metfile met: filename=Beverly92.met
    area paddock
      registrations global
      outputfile: filename=Wheat_Beverly92_Early(normal).out
        outputfiledescription DailyVariables -> DailyVariables
      manager: same as Wheat_APS26_DryN000.paddock.Manager
      soil BeverlyField: same as Wheat_Beverly92_Early(high).paddock.BeverlyField
      wheat
      irrigation
        automatic_irrigation = off  # switch
        asw_depth = 600.0  # Depth to which ASW is calculated. (mm)
        crit_fr_asw = 0.9  # Fraction of ASW below which irrigation is applied (0-1.0)
        irrigation_efficiency = 1.0  # Efficiency of the irrigation. (0-1.0)
      logic Irrigator
      fertiliser
      logic Fertilizer: same as Wheat_Beverly92_Early(high).paddock.Fertilizer
  simulation Wheat_Beverly92_Late(high)
    clock
      start_date = 29/04/1992  # Select the start date of the simulation
      end_date = 5/12/1992  # Select the end date of the simulation
    summaryfile: filename=Wheat_Beverly92_Late(high).sum
    metfile met: filename=Beverly92.met
    area paddock
      registrations global
      outputfile: filename=Wheat_Beverly92_Late(high).out
        outputfiledescription DailyVariables -> DailyVariables
      manager: same as Wheat_APS26_DryN000.paddock.Manager
      soil BeverlyField: same as Wheat_Beverly92_Early(high).paddock.BeverlyField
      wheat
      irrigation
        automatic_irrigation = off  # switch
        asw_depth = 600.0  # Depth to which ASW is calculated. (mm)
        crit_fr_asw = 0.9  # Fraction of ASW below which irrigation is applied (0-1.0)
        irrigation_efficiency = 1.0  # Efficiency of the irrigation. (0-1.0)
      logic Irrigator
      fertiliser
      logic Fertilizer
        on startofday:
```
           if (day = 168) then
               fertiliser apply amount = 30 (kg/ha), depth = 50 (mm), type = NO3_N ()
           endif



           if (day = 202) then
               fertiliser apply amount = 30 (kg/ha), depth = 50 (mm), type = NO3_N ()
           endif



           if (day = 230) then
               fertiliser apply amount = 30 (kg/ha), depth = 50 (mm), type = NO3_N ()
           endif
```
  simulation Wheat_Beverly92_Late(normal)
    clock
      start_date = 29/04/1992  # Select the start date of the simulation
      end_date = 5/12/1992  # Select the end date of the simulation
    summaryfile: filename=Wheat_Beverly92_Late(normal).sum
    metfile met: filename=Beverly92.met
    area paddock
      registrations global
      outputfile: filename=Wheat_Beverly92_Late(normal).out
        outputfiledescription DailyVariables -> DailyVariables
      manager: same as Wheat_APS26_DryN000.paddock.Manager
      soil BeverlyField: same as Wheat_Beverly92_Early(high).paddock.BeverlyField
      wheat
      irrigation
        automatic_irrigation = off  # switch
        asw_depth = 600.0  # Depth to which ASW is calculated. (mm)
        crit_fr_asw = 0.9  # Fraction of ASW below which irrigation is applied (0-1.0)
        irrigation_efficiency = 1.0  # Efficiency of the irrigation. (0-1.0)
      logic Irrigator
      fertiliser
      logic Fertilizer: same as Wheat_Beverly92_Late(high).paddock.Fertilizer
  simulation Wheat_Beverly93_EarlyN40
    clock
      start_date = 1/05/1993  # Select the start date of the simulation
      end_date = 30/11/1993  # Select the end date of the simulation
    summaryfile: filename=Wheat_Beverly93_EarlyN40.sum
    metfile met: filename=Beverly93.met
    area paddock
      registrations global
      outputfile: filename=Wheat_Beverly93_EarlyN40.out
        outputfiledescription DailyVariables -> DailyVariables
      manager: same as Wheat_APS26_DryN000.paddock.Manager
      soil BeverlyField: same as Wheat_Beverly90_n15.paddock.BeverlyField
      wheat
      irrigation
        automatic_irrigation = off  # switch
        asw_depth = 600.0  # Depth to which ASW is calculated. (mm)
        crit_fr_asw = 0.9  # Fraction of ASW below which irrigation is applied (0-1.0)
        irrigation_efficiency = 1.0  # Efficiency of the irrigation. (0-1.0)
      logic Irrigator
      fertiliser
      logic Fertilizer
        on startofday:
```
           if (day = 125) then
               fertiliser apply amount = 40 (kg/ha), depth = 50 (mm), type = NO3_N ()
           endif
```
  simulation Wheat_Beverly93_EarlyN40I30
    clock
      start_date = 1/05/1993  # Select the start date of the simulation
      end_date = 30/11/1993  # Select the end date of the simulation
    summaryfile: filename=Wheat_Beverly93_EarlyN40I30.sum
    metfile met: filename=Beverly93.met
    area paddock
      registrations global
      outputfile: filename=Wheat_Beverly93_EarlyN40I30.out
        outputfiledescription DailyVariables -> DailyVariables
      manager: same as Wheat_APS26_DryN000.paddock.Manager
      soil BeverlyField: same as Wheat_Beverly90_n15.paddock.BeverlyField
      wheat
      irrigation
        automatic_irrigation = off  # switch
        asw_depth = 600.0  # Depth to which ASW is calculated. (mm)
        crit_fr_asw = 0.9  # Fraction of ASW below which irrigation is applied (0-1.0)
        irrigation_efficiency = 1.0  # Efficiency of the irrigation. (0-1.0)
      logic Irrigator
        on startofday:
```
           if (day = 265) then
               irrigation apply amount = 10 (mm)
           endif



           if (day = 271) then
               irrigation apply amount = 0 (mm)
           endif



           if (day = 280) then
               irrigation apply amount = 10 (mm)
           endif



           if (day = 286) then
               irrigation apply amount = 0 (mm)
           endif



           if (day = 293) then
               irrigation apply amount = 10 (mm)
           endif



           if (day = 300) then
               irrigation apply amount = 0 (mm)
           endif
```
      fertiliser
      logic Fertilizer
        on startofday:
```
           if (day = 125) then
               fertiliser apply amount = 40 (kg/ha), depth = 50 (mm), type = NO3_N ()
           endif
```
  simulation Wheat_Beverly93_EarlyN40I85
    clock
      start_date = 1/05/1993  # Select the start date of the simulation
      end_date = 30/11/1993  # Select the end date of the simulation
    summaryfile: filename=Wheat_Beverly93_EarlyN40I85.sum
    metfile met: filename=Beverly93.met
    area paddock
      registrations global
      outputfile: filename=Wheat_Beverly93_EarlyN40I85.out
        outputfiledescription DailyVariables -> DailyVariables
      manager: same as Wheat_APS26_DryN000.paddock.Manager
      soil BeverlyField: same as Wheat_Beverly90_n15.paddock.BeverlyField
      wheat
      irrigation
        automatic_irrigation = off  # switch
        asw_depth = 600.0  # Depth to which ASW is calculated. (mm)
        crit_fr_asw = 0.9  # Fraction of ASW below which irrigation is applied (0-1.0)
        irrigation_efficiency = 1.0  # Efficiency of the irrigation. (0-1.0)
      logic Irrigator
        on startofday:
```
           if (day = 265) then
               irrigation apply amount = 10 (mm)
           endif



           if (day = 271) then
               irrigation apply amount = 15 (mm)
           endif



           if (day = 280) then
               irrigation apply amount = 10 (mm)
           endif



           if (day = 286) then
               irrigation apply amount = 15 (mm)
           endif



           if (day = 293) then
               irrigation apply amount = 20 (mm)
           endif



           if (day = 300) then
               irrigation apply amount = 15 (mm)
           endif
```
      fertiliser
      logic Fertilizer
        on startofday:
```
           if (day = 125) then
               fertiliser apply amount = 40 (kg/ha), depth = 50 (mm), type = NO3_N ()
           endif
```
  simulation Wheat_Beverly93_EarlyN80
    clock
      start_date = 1/05/1993  # Select the start date of the simulation
      end_date = 30/11/1993  # Select the end date of the simulation
    summaryfile: filename=Wheat_Beverly93_EarlyN80.sum
    metfile met: filename=Beverly93.met
    area paddock
      registrations global
      outputfile: filename=Wheat_Beverly93_EarlyN80.out
        outputfiledescription DailyVariables -> DailyVariables
      manager: same as Wheat_APS26_DryN000.paddock.Manager
      soil BeverlyField: same as Wheat_Beverly90_n15.paddock.BeverlyField
      wheat
      irrigation
        automatic_irrigation = off  # switch
        asw_depth = 600.0  # Depth to which ASW is calculated. (mm)
        crit_fr_asw = 0.9  # Fraction of ASW below which irrigation is applied (0-1.0)
        irrigation_efficiency = 1.0  # Efficiency of the irrigation. (0-1.0)
      logic Irrigator
      fertiliser
      logic Fertilizer
        on startofday:
```
           if (day = 125) then
               fertiliser apply amount = 40 (kg/ha), depth = 50 (mm), type = NO3_N ()
           endif



           if (day = 173) then
               fertiliser apply amount = 40 (kg/ha), depth = 50 (mm), type = NO3_N ()
           endif
```
  simulation Wheat_Beverly93_LateN0
    clock
      start_date = 1/05/1993  # Select the start date of the simulation
      end_date = 30/11/1993  # Select the end date of the simulation
    summaryfile: filename=Wheat_Beverly93_LateN0.sum
    metfile met: filename=Beverly93.met
    area paddock
      registrations global
      outputfile: filename=Wheat_Beverly93_LateN0.out
        outputfiledescription DailyVariables -> DailyVariables
      manager: same as Wheat_APS26_DryN000.paddock.Manager
      soil BeverlyField: same as Wheat_Beverly90_n15.paddock.BeverlyField
      wheat
      irrigation
        automatic_irrigation = off  # switch
        asw_depth = 600.0  # Depth to which ASW is calculated. (mm)
        crit_fr_asw = 0.9  # Fraction of ASW below which irrigation is applied (0-1.0)
        irrigation_efficiency = 1.0  # Efficiency of the irrigation. (0-1.0)
      logic Irrigator
      fertiliser
      logic Fertilizer
  simulation Wheat_Beverly93_LateN80
    clock
      start_date = 1/05/1993  # Select the start date of the simulation
      end_date = 30/11/1993  # Select the end date of the simulation
    summaryfile: filename=Wheat_Beverly93_LateN80.sum
    metfile met: filename=Beverly93.met
    area paddock
      registrations global
      outputfile: filename=Wheat_Beverly93_LateN80.out
        outputfiledescription DailyVariables -> DailyVariables
      manager: same as Wheat_APS26_DryN000.paddock.Manager
      soil BeverlyField: same as Wheat_Beverly90_n15.paddock.BeverlyField
      wheat
      irrigation
        automatic_irrigation = off  # switch
        asw_depth = 600.0  # Depth to which ASW is calculated. (mm)
        crit_fr_asw = 0.9  # Fraction of ASW below which irrigation is applied (0-1.0)
        irrigation_efficiency = 1.0  # Efficiency of the irrigation. (0-1.0)
      logic Irrigator
      fertiliser
      logic Fertilizer
        on startofday:
```
           if (day = 166) then
               fertiliser apply amount = 40 (kg/ha), depth = 50 (mm), type = NO3_N ()
           endif



           if (day = 223) then
               fertiliser apply amount = 40 (kg/ha), depth = 50 (mm), type = NO3_N ()
           endif
```
  simulation Wheat_Wongan83_Single
    clock
      start_date = 13/06/1983  # Select the start date of the simulation
      end_date = 11/11/1983  # Select the end date of the simulation
    summaryfile: filename=Wheat_Wongan83_Single.sum
    metfile met: filename=Wongan83.met
    area paddock
      registrations global
      outputfile: filename=Wheat_Wongan83_Single.out
        outputfiledescription DailyVariables -> DailyVariables
      manager: same as Wheat_APS26_DryN000.paddock.Manager
      soil UnRipped: Site=WonganSite; Region=WA; LocalName=WonganSite; SoilType=WonganUnrippedSoil; NearestTown=Unknown; NaturalVegetation=Unknown
        Water: Cona=2; DiffusConst=88; DiffusSlope=35; U=6; Salb=0.13; Cn2Bare=60; CnRed=20; CnCov=0.8
          layer:
            thickness  bd    ll15  airdry  dul   sat   sw     swcon
            50         1.31  0.07  0.04    0.13  0.35  0.12   0.35
            50         1.31  0.07  0.05    0.13  0.35  0.13   0.35
            100        1.45  0.08  0.05    0.14  0.35  0.14   0.35
            200        1.48  0.09  0.05    0.14  0.35  0.14   0.35
            200        1.53  0.09  0.05    0.15  0.35  0.135  0.35
            200        1.5   0.09  0.05    0.15  0.35  0.11   0.35
            400        1.5   0.1   0.05    0.16  0.35  0.1    0.35
            400        1.5   0.11  0.05    0.17  0.35  0.11   0.35
            600        1.5   0.13  0.05    0.17  0.35  0.119  0.35
            600        1.5   0.16  0.05    0.17  0.35  0.134  0.35
        Nitrogen: CnCanopyFact=0.8; RootCn=40; RootWt=1500; SoilCn=13; EnrACoeff=1.0; EnrBCoeff=1.0
          layer:
            oc    ph   fbiom  finert  no3  nh4
            1.23  4.7  0.04   0.1     6    4
            0.43  5.1  0.04   0.1     5    3
            0.37  5.1  0.03   0.1     5    2
            0.26  6    0.02   0.2     4    2
            0.21  6    0.01   0.8     4    1
            0.2   6    0.01   0.9     4    1
            0.18  6    0.01   0.9     4    0
            0.18  6    0.01   0.9     2    0
            0.17  6    0.01   0.9     2    0
            0.17  6    0.01   0.9     0.1  0
        InitWater
          sw=[0.12, 0.13, 0.14, 0.14, 0.135, 0.11, 0.1, 0.11, 0.119, 0.134]
        InitNitrogen
          layer:
            no3  nh4
            6    4
            5    3
            5    2
            4    2
            4    1
            4    1
            4    0
            2    0
            2    0
            0.1  0
        SoilCrop Wheat
          layer:
            ll    kl    xf
            0.05  0.06  0.2
            0.05  0.06  0.1
            0.08  0.06  0.4
            0.09  0.06  0.8
            0.09  0.06  1
            0.1   0.06  1
            0.1   0.06  1
            0.11  0.06  1
            0.12  0.06  0.7
            0.13  0.06  0.7
      wheat
      irrigation
        automatic_irrigation = off  # switch
        asw_depth = 600.0  # Depth to which ASW is calculated. (mm)
        crit_fr_asw = 0.9  # Fraction of ASW below which irrigation is applied (0-1.0)
        irrigation_efficiency = 1.0  # Efficiency of the irrigation. (0-1.0)
      logic Irrigator
      fertiliser
      logic Fertilizer
        on startofday:
```
           if (day = 186) then
               fertiliser apply amount = 45 (kg/ha), depth = 50 (mm), type = NO3_N ()
           endif
```
  simulation Wheat_Wongan83Unripped_UnrippedN000
    clock
      start_date = 13/06/1983  # Select the start date of the simulation
      end_date = 11/11/1983  # Select the end date of the simulation
    summaryfile: filename=Wheat_Wongan83Unripped_UnrippedN000.sum
    metfile met: filename=Wongan83Unripped.met
    area paddock
      registrations global
      outputfile: filename=Wheat_Wongan83Unripped_UnrippedN000.out
        outputfiledescription DailyVariables -> DailyVariables
      manager: same as Wheat_APS26_DryN000.paddock.Manager
      soil UnRipped: same as Wheat_Wongan83_Single.paddock.UnRipped
      wheat
      irrigation
        automatic_irrigation = off  # switch
        asw_depth = 600.0  # Depth to which ASW is calculated. (mm)
        crit_fr_asw = 0.9  # Fraction of ASW below which irrigation is applied (0-1.0)
        irrigation_efficiency = 1.0  # Efficiency of the irrigation. (0-1.0)
      logic Irrigator
      fertiliser
      logic Fertilizer
  simulation Wheat_Wongan83Unripped_UnrippedN010
    clock
      start_date = 13/06/1983  # Select the start date of the simulation
      end_date = 11/11/1983  # Select the end date of the simulation
    summaryfile: filename=Wheat_Wongan83Unripped_UnrippedN010.sum
    metfile met: filename=Wongan83Unripped.met
    area paddock
      registrations global
      outputfile: filename=Wheat_Wongan83Unripped_UnrippedN010.out
        outputfiledescription DailyVariables -> DailyVariables
      manager: same as Wheat_APS26_DryN000.paddock.Manager
      soil UnRipped: same as Wheat_Wongan83_Single.paddock.UnRipped
      wheat
      irrigation
        automatic_irrigation = off  # switch
        asw_depth = 600.0  # Depth to which ASW is calculated. (mm)
        crit_fr_asw = 0.9  # Fraction of ASW below which irrigation is applied (0-1.0)
        irrigation_efficiency = 1.0  # Efficiency of the irrigation. (0-1.0)
      logic Irrigator
      fertiliser
      logic Fertilizer
        on startofday:
```
           if (day = 167) then
               fertiliser apply amount = 8 (kg/ha), depth = 50 (mm), type = NO3_N ()
           endif
```
  simulation Wheat_Wongan83Unripped_UnrippedN025
    clock
      start_date = 13/06/1983  # Select the start date of the simulation
      end_date = 11/11/1983  # Select the end date of the simulation
    summaryfile: filename=Wheat_Wongan83Unripped_UnrippedN025.sum
    metfile met: filename=Wongan83Unripped.met
    area paddock
      registrations global
      outputfile: filename=Wheat_Wongan83Unripped_UnrippedN025.out
        outputfiledescription DailyVariables -> DailyVariables
      manager: same as Wheat_APS26_DryN000.paddock.Manager
      soil UnRipped: same as Wheat_Wongan83_Single.paddock.UnRipped
      wheat
      irrigation
        automatic_irrigation = off  # switch
        asw_depth = 600.0  # Depth to which ASW is calculated. (mm)
        crit_fr_asw = 0.9  # Fraction of ASW below which irrigation is applied (0-1.0)
        irrigation_efficiency = 1.0  # Efficiency of the irrigation. (0-1.0)
      logic Irrigator
      fertiliser
      logic Fertilizer
        on startofday:
```
           if (day = 167) then
               fertiliser apply amount = 25 (kg/ha), depth = 50 (mm), type = NO3_N ()
           endif
```
  simulation Wheat_Wongan83Unripped_UnrippedN050
    clock
      start_date = 13/06/1983  # Select the start date of the simulation
      end_date = 11/11/1983  # Select the end date of the simulation
    summaryfile: filename=Wheat_Wongan83Unripped_UnrippedN050.sum
    metfile met: filename=Wongan83Unripped.met
    area paddock
      registrations global
      outputfile: filename=Wheat_Wongan83Unripped_UnrippedN050.out
        outputfiledescription DailyVariables -> DailyVariables
      manager: same as Wheat_APS26_DryN000.paddock.Manager
      soil UnRipped: same as Wheat_Wongan83_Single.paddock.UnRipped
      wheat
      irrigation
        automatic_irrigation = off  # switch
        asw_depth = 600.0  # Depth to which ASW is calculated. (mm)
        crit_fr_asw = 0.9  # Fraction of ASW below which irrigation is applied (0-1.0)
        irrigation_efficiency = 1.0  # Efficiency of the irrigation. (0-1.0)
      logic Irrigator
      fertiliser
      logic Fertilizer
        on startofday:
```
           if (day = 167) then
               fertiliser apply amount = 50 (kg/ha), depth = 50 (mm), type = NO3_N ()
           endif
```
  simulation Wheat_Wongan83Unripped_UnrippedN100
    clock
      start_date = 13/06/1983  # Select the start date of the simulation
      end_date = 11/11/1983  # Select the end date of the simulation
    summaryfile: filename=Wheat_Wongan83Unripped_UnrippedN100.sum
    metfile met: filename=Wongan83Unripped.met
    area paddock
      registrations global
      outputfile: filename=Wheat_Wongan83Unripped_UnrippedN100.out
        outputfiledescription DailyVariables -> DailyVariables
      manager: same as Wheat_APS26_DryN000.paddock.Manager
      soil UnRipped: same as Wheat_Wongan83_Single.paddock.UnRipped
      wheat
      irrigation
        automatic_irrigation = off  # switch
        asw_depth = 600.0  # Depth to which ASW is calculated. (mm)
        crit_fr_asw = 0.9  # Fraction of ASW below which irrigation is applied (0-1.0)
        irrigation_efficiency = 1.0  # Efficiency of the irrigation. (0-1.0)
      logic Irrigator
      fertiliser
      logic Fertilizer
        on startofday:
```
           if (day = 167) then
               fertiliser apply amount = 100 (kg/ha), depth = 50 (mm), type = NO3_N ()
           endif
```
  simulation Wheat_Wongan83Ripped_RippedN000
    clock
      start_date = 13/06/1983  # Select the start date of the simulation
      end_date = 11/11/1983  # Select the end date of the simulation
    summaryfile: filename=Wheat_Wongan83Ripped_RippedN000.sum
    metfile met: filename=Wongan83Ripped.met
    area paddock
      registrations global
      outputfile: filename=Wheat_Wongan83Ripped_RippedN000.out
        outputfiledescription DailyVariables -> DailyVariables
      manager: same as Wheat_APS26_DryN000.paddock.Manager
      soil Ripped: Site=WonganSite; Region=WA; LocalName=WonganSite; SoilType=WonganRippedSoil; NearestTown=Unknown; NaturalVegetation=Unknown
        Water: same as Wheat_Wongan83_Single.paddock.UnRipped.Water
        Nitrogen: same as Wheat_Wongan83_Single.paddock.UnRipped.Nitrogen
        InitWater
          sw=[0.12, 0.13, 0.14, 0.14, 0.135, 0.11, 0.1, 0.11, 0.119, 0.134]
        InitNitrogen
          layer:
            no3  nh4
            6    4
            5    3
            5    2
            4    2
            4    1
            4    1
            4    0
            2    0
            2    0
            0.1  0
        SoilCrop Wheat
          layer:
            ll    kl    xf
            0.05  0.06  0.4
            0.05  0.06  0.4
            0.08  0.06  0.6
            0.09  0.06  0.8
            0.09  0.06  1
            0.1   0.06  1
            0.1   0.06  1
            0.11  0.06  1
            0.12  0.06  0.7
            0.13  0.06  0.7
      wheat
      irrigation
        automatic_irrigation = off  # switch
        asw_depth = 600.0  # Depth to which ASW is calculated. (mm)
        crit_fr_asw = 0.9  # Fraction of ASW below which irrigation is applied (0-1.0)
        irrigation_efficiency = 1.0  # Efficiency of the irrigation. (0-1.0)
      logic Irrigator
      fertiliser
      logic Fertilizer
  simulation Wheat_Wongan83Ripped_RippedN010
    clock
      start_date = 13/06/1983  # Select the start date of the simulation
      end_date = 11/11/1983  # Select the end date of the simulation
    summaryfile: filename=Wheat_Wongan83Ripped_RippedN010.sum
    metfile met: filename=Wongan83Ripped.met
    area paddock
      registrations global
      outputfile: filename=Wheat_Wongan83Ripped_RippedN010.out
        outputfiledescription DailyVariables -> DailyVariables
      manager: same as Wheat_APS26_DryN000.paddock.Manager
      soil Ripped: same as Wheat_Wongan83Ripped_RippedN000.paddock.Ripped
      wheat
      irrigation
        automatic_irrigation = off  # switch
        asw_depth = 600.0  # Depth to which ASW is calculated. (mm)
        crit_fr_asw = 0.9  # Fraction of ASW below which irrigation is applied (0-1.0)
        irrigation_efficiency = 1.0  # Efficiency of the irrigation. (0-1.0)
      logic Irrigator
      fertiliser
      logic Fertilizer
        on startofday:
```
           if (day = 167) then
               fertiliser apply amount = 8 (kg/ha), depth = 50 (mm), type = NO3_N ()
           endif
```
  simulation Wheat_Wongan83Ripped_RippedN025
    clock
      start_date = 13/06/1983  # Select the start date of the simulation
      end_date = 11/11/1983  # Select the end date of the simulation
    summaryfile: filename=Wheat_Wongan83Ripped_RippedN025.sum
    metfile met: filename=Wongan83Ripped.met
    area paddock
      registrations global
      outputfile: filename=Wheat_Wongan83Ripped_RippedN025.out
        outputfiledescription DailyVariables -> DailyVariables
      manager: same as Wheat_APS26_DryN000.paddock.Manager
      soil Ripped: same as Wheat_Wongan83Ripped_RippedN000.paddock.Ripped
      wheat
      irrigation
        automatic_irrigation = off  # switch
        asw_depth = 600.0  # Depth to which ASW is calculated. (mm)
        crit_fr_asw = 0.9  # Fraction of ASW below which irrigation is applied (0-1.0)
        irrigation_efficiency = 1.0  # Efficiency of the irrigation. (0-1.0)
      logic Irrigator
      fertiliser
      logic Fertilizer
        on startofday:
```
           if (day = 167) then
               fertiliser apply amount = 25 (kg/ha), depth = 50 (mm), type = NO3_N ()
           endif
```
  simulation Wheat_Wongan83Ripped_RippedN050
    clock
      start_date = 13/06/1983  # Select the start date of the simulation
      end_date = 11/11/1983  # Select the end date of the simulation
    summaryfile: filename=Wheat_Wongan83Ripped_RippedN050.sum
    metfile met: filename=Wongan83Ripped.met
    area paddock
      registrations global
      outputfile: filename=Wheat_Wongan83Ripped_RippedN050.out
        outputfiledescription DailyVariables -> DailyVariables
      manager: same as Wheat_APS26_DryN000.paddock.Manager
      soil Ripped: same as Wheat_Wongan83Ripped_RippedN000.paddock.Ripped
      wheat
      irrigation
        automatic_irrigation = off  # switch
        asw_depth = 600.0  # Depth to which ASW is calculated. (mm)
        crit_fr_asw = 0.9  # Fraction of ASW below which irrigation is applied (0-1.0)
        irrigation_efficiency = 1.0  # Efficiency of the irrigation. (0-1.0)
      logic Irrigator
      fertiliser
      logic Fertilizer
        on startofday:
```
           if (day = 167) then
               fertiliser apply amount = 50 (kg/ha), depth = 50 (mm), type = NO3_N ()
           endif
```
  simulation Wheat_Wongan83Ripped_RippedN100
    clock
      start_date = 13/06/1983  # Select the start date of the simulation
      end_date = 11/11/1983  # Select the end date of the simulation
    summaryfile: filename=Wheat_Wongan83Ripped_RippedN100.sum
    metfile met: filename=Wongan83Ripped.met
    area paddock
      registrations global
      outputfile: filename=Wheat_Wongan83Ripped_RippedN100.out
        outputfiledescription DailyVariables -> DailyVariables
      manager: same as Wheat_APS26_DryN000.paddock.Manager
      soil Ripped: same as Wheat_Wongan83Ripped_RippedN000.paddock.Ripped
      wheat
      irrigation
        automatic_irrigation = off  # switch
        asw_depth = 600.0  # Depth to which ASW is calculated. (mm)
        crit_fr_asw = 0.9  # Fraction of ASW below which irrigation is applied (0-1.0)
        irrigation_efficiency = 1.0  # Efficiency of the irrigation. (0-1.0)
      logic Irrigator
      fertiliser
      logic Fertilizer
        on startofday:
```
           if (day = 167) then
               fertiliser apply amount = 100 (kg/ha), depth = 50 (mm), type = NO3_N ()
           endif
```
  simulation Wheat_Wongan84_N000
    clock
      start_date = 8/06/1984  # Select the start date of the simulation
      end_date = 25/11/1984  # Select the end date of the simulation
    summaryfile: filename=Wheat_Wongan84_N000.sum
    metfile met: filename=Wongan84.met
    area paddock
      registrations global
      outputfile: filename=Wheat_Wongan84_N000.out
        outputfiledescription DailyVariables -> DailyVariables
      manager: same as Wheat_APS26_DryN000.paddock.Manager
      soil Wongan84: Site=WonganSite; Region=WA; LocalName=WonganSite; SoilType=WonganUnrippedSoil; NearestTown=Unknown; NaturalVegetation=Unknown
        Water: Cona=2; DiffusConst=88; DiffusSlope=35; U=6; Salb=0.13; Cn2Bare=60; CnRed=20; CnCov=0.8
          layer:
            thickness  bd    ll15  airdry  dul   sat   sw     swcon
            50         1.31  0.07  0.04    0.13  0.35  0.1    0.35
            50         1.31  0.07  0.05    0.13  0.35  0.12   0.35
            100        1.45  0.08  0.05    0.14  0.35  0.135  0.35
            200        1.48  0.09  0.05    0.14  0.35  0.129  0.35
            200        1.53  0.09  0.05    0.15  0.35  0.135  0.35
            200        1.5   0.09  0.05    0.15  0.35  0.141  0.35
            400        1.5   0.1   0.05    0.16  0.35  0.146  0.35
            400        1.5   0.11  0.05    0.17  0.35  0.152  0.35
            600        1.5   0.13  0.05    0.17  0.35  0.158  0.35
            600        1.5   0.16  0.05    0.17  0.35  0.166  0.35
        Nitrogen: CnCanopyFact=0.8; RootCn=40; RootWt=1500; SoilCn=13; EnrACoeff=1.0; EnrBCoeff=1.0
          layer:
            oc    ph   fbiom  finert  no3  nh4
            1.23  4.7  0.04   0.1     1    4
            0.43  5.1  0.04   0.1     2    3
            0.37  5.1  0.03   0.1     1    2
            0.26  6    0.02   0.2     0    2
            0.21  6    0.01   0.8     0    1
            0.2   6    0.01   0.9     0    1
            0.18  6    0.01   0.9     4    0
            0.18  6    0.01   0.9     4    0
            0.17  6    0.01   0.9     4    0
            0.17  6    0.01   0.9     4    0
        InitWater
          sw=[0.1, 0.12, 0.135, 0.129, 0.135, 0.141, 0.146, 0.152, 0.158, 0.166]
        InitNitrogen
          layer:
            no3  nh4
            1    4
            2    3
            1    2
            0    2
            0    1
            0    1
            4    0
            4    0
            4    0
            4    0
        SoilCrop Wheat: same as Wheat_Wongan83_Single.paddock.UnRipped.Wheat
      wheat
      irrigation
        automatic_irrigation = off  # switch
        asw_depth = 600.0  # Depth to which ASW is calculated. (mm)
        crit_fr_asw = 0.9  # Fraction of ASW below which irrigation is applied (0-1.0)
        irrigation_efficiency = 1.0  # Efficiency of the irrigation. (0-1.0)
      logic Irrigator
      fertiliser
      logic Fertilizer
  simulation Wheat_Wongan84_N050
    clock
      start_date = 8/06/1984  # Select the start date of the simulation
      end_date = 25/11/1984  # Select the end date of the simulation
    summaryfile: filename=Wheat_Wongan84_N050.sum
    metfile met: filename=Wongan84.met
    area paddock
      registrations global
      outputfile: filename=Wheat_Wongan84_N050.out
        outputfiledescription DailyVariables -> DailyVariables
      manager: same as Wheat_APS26_DryN000.paddock.Manager
      soil Wongan84: same as Wheat_Wongan84_N000.paddock.Wongan84
      wheat
      irrigation
        automatic_irrigation = off  # switch
        asw_depth = 600.0  # Depth to which ASW is calculated. (mm)
        crit_fr_asw = 0.9  # Fraction of ASW below which irrigation is applied (0-1.0)
        irrigation_efficiency = 1.0  # Efficiency of the irrigation. (0-1.0)
      logic Irrigator
      fertiliser
      logic Fertilizer
        on startofday:
```
           if (day = 166) then
               fertiliser apply amount = 50 (kg/ha), depth = 50 (mm), type = NO3_N ()
           endif
```
  simulation Wheat_Wongan84_N300
    clock
      start_date = 8/06/1984  # Select the start date of the simulation
      end_date = 25/11/1984  # Select the end date of the simulation
    summaryfile: filename=Wheat_Wongan84_N300.sum
    metfile met: filename=Wongan84.met
    area paddock
      registrations global
      outputfile: filename=Wheat_Wongan84_N300.out
        outputfiledescription DailyVariables -> DailyVariables
      manager: same as Wheat_APS26_DryN000.paddock.Manager
      soil Wongan84: same as Wheat_Wongan84_N000.paddock.Wongan84
      wheat
      irrigation
        automatic_irrigation = off  # switch
        asw_depth = 600.0  # Depth to which ASW is calculated. (mm)
        crit_fr_asw = 0.9  # Fraction of ASW below which irrigation is applied (0-1.0)
        irrigation_efficiency = 1.0  # Efficiency of the irrigation. (0-1.0)
      logic Irrigator
      fertiliser
      logic Fertilizer
        on startofday:
```
           if (day = 166) then
               fertiliser apply amount = 300 (kg/ha), depth = 50 (mm), type = NO3_N ()
           endif
```
  simulation Wheat_Wongan84_N325
    clock
      start_date = 8/06/1984  # Select the start date of the simulation
      end_date = 25/11/1984  # Select the end date of the simulation
    summaryfile: filename=Wheat_Wongan84_N325.sum
    metfile met: filename=Wongan84.met
    area paddock
      registrations global
      outputfile: filename=Wheat_Wongan84_N325.out
        outputfiledescription DailyVariables -> DailyVariables
      manager: same as Wheat_APS26_DryN000.paddock.Manager
      soil Wongan84: same as Wheat_Wongan84_N000.paddock.Wongan84
      wheat
      irrigation
        automatic_irrigation = off  # switch
        asw_depth = 600.0  # Depth to which ASW is calculated. (mm)
        crit_fr_asw = 0.9  # Fraction of ASW below which irrigation is applied (0-1.0)
        irrigation_efficiency = 1.0  # Efficiency of the irrigation. (0-1.0)
      logic Irrigator
      fertiliser
      logic Fertilizer
        on startofday:
```
           if (day = 87) then
               fertiliser apply amount = 148 (kg/ha), depth = 50 (mm), type = NO3_N ()
           endif



           if (day = 166) then
               fertiliser apply amount = 74 (kg/ha), depth = 50 (mm), type = NO3_N ()
           endif



           if (day = 220) then
               fertiliser apply amount = 113 (kg/ha), depth = 50 (mm), type = NO3_N ()
           endif
```
